# OpenSim document version 40600
InverseKinematicsTool:
  model_file: RBDS001\scaling\RBDS001_complex.osim
  time_range: 11.495 19.168
  output_motion_file: RBDS001\ik\T25\RBDS001_T25_ik_complex.mot
  marker_file: RBDS001\RBDS001runT25.trc
  report_marker_locations: true
  IKTaskSet:
    IKMarkerTask R.ASIS: weight=2.5
    IKMarkerTask L.ASIS: weight=2.5
    IKMarkerTask R.PSIS: weight=2.5
    IKMarkerTask L.PSIS: weight=2.5
    IKMarkerTask R.Iliac.Crest: weight=1
    IKMarkerTask L.Iliac.Crest: weight=1
    IKMarkerTask R.GTR: apply=false weight=0
    IKMarkerTask R.Thigh.Top.Lateral: weight=5
    IKMarkerTask R.Thigh.Bottom.Lateral: weight=5
    IKMarkerTask R.Thigh.Top.Medial: weight=5
    IKMarkerTask R.Thigh.Bottom.Medial: weight=5
    IKMarkerTask R.Knee: apply=false weight=0
    IKMarkerTask R.Knee.Medial: apply=false weight=0
    IKMarkerTask R.HF: apply=false weight=0
    IKMarkerTask R.TT: apply=false weight=0
    IKMarkerTask R.Shank.Top.Lateral: weight=5
    IKMarkerTask R.Shank.Bottom.Lateral: weight=5
    IKMarkerTask R.Shank.Top.Medial: weight=5
    IKMarkerTask R.Shank.Bottom.Medial: weight=5
    IKMarkerTask R.Ankle: apply=false weight=0
    IKMarkerTask R.Ankle.Medial: apply=false weight=0
    IKMarkerTask R.Heel.Top: weight=5
    IKMarkerTask R.Heel.Bottom: weight=5
    IKMarkerTask R.Heel.Lateral: weight=5
    IKMarkerTask R.MT1: weight=10
    IKMarkerTask R.MT2: apply=false weight=0
    IKMarkerTask R.MT5: weight=10
    IKMarkerTask L.GTR: apply=false weight=0
    IKMarkerTask L.Thigh.Top.Lateral: weight=5
    IKMarkerTask L.Thigh.Bottom.Lateral: weight=5
    IKMarkerTask L.Thigh.Top.Medial: weight=5
    IKMarkerTask L.Thigh.Bottom.Medial: weight=5
    IKMarkerTask L.Knee: apply=false weight=0
    IKMarkerTask L.Knee.Medial: apply=false weight=0
    IKMarkerTask L.HF: apply=false weight=0
    IKMarkerTask L.TT: apply=false weight=0
    IKMarkerTask L.Shank.Top.Lateral: weight=5
    IKMarkerTask L.Shank.Bottom.Lateral: weight=5
    IKMarkerTask L.Shank.Top.Medial: weight=5
    IKMarkerTask L.Shank.Bottom.Medial: weight=5
    IKMarkerTask L.Ankle: apply=false weight=0
    IKMarkerTask L.Ankle.Medial: apply=false weight=0
    IKMarkerTask L.Heel.Top: weight=5
    IKMarkerTask L.Heel.Bottom: weight=5
    IKMarkerTask L.Heel.Lateral: weight=5
    IKMarkerTask L.MT1: weight=10
    IKMarkerTask L.MT2: apply=false weight=0
    IKMarkerTask L.MT5: weight=10
