# OpenSim document version 40600
Model:
  gravity: 0 -9.80665 0
  length_units: meters
  force_units: N
  credits:
    Rajagopal, A, Dembia, C.L., DeMers, M.S., Delp, D.D., Hicks, J.L., and Delp, S.L.
  publications:
    Rajagopal, Apoorva, et al. "Full-Body Musculoskeletal Model for Muscle-Driven Simulation of Human Gait." IEEE Transactions on Biomedical Engineering 63.10 (2016): 2068-2079. (2016)
  Ground
  BodySet:
    Body pelvis: mass=35.7606 [kg] mass_center=(-0.06747703 0 0) inertia=(0.07990405 0.07990405 0.03576583 0 0 0)
        meshes=(r_pelvis.vtp l_pelvis.vtp sacrum.vtp)
      WrapCylinder Gmax1_at_pelvis_r: xyz_body_rotation=(-0.6 0.45 0) translation=(-0.07348984 -0.08244605 0.06341108)
          quadrant=-x radius=0.03725683 length=0.1460823
      WrapCylinder Gmax2_at_pelvis_r: xyz_body_rotation=(-0.75 0.39 0) translation=(-0.07635308 -0.06912144 0.07068776)
          quadrant=all radius=0.03776392 length=0.09498586
      WrapCylinder Gmax3_at_pelvis_r: xyz_body_rotation=(-0.1 0 0) translation=(-0.07921632 -0.07328538 0.07068776)
          quadrant=all radius=0.0357903 length=0.1037669
      WrapCylinder Gmax1_at_pelvis_l: xyz_body_rotation=(0.6 -0.45 0) translation=(-0.07348984 -0.08244605 -0.06341108)
          quadrant=-x radius=0.03725683 length=0.1460823
      WrapCylinder Gmax2_at_pelvis_l: xyz_body_rotation=(0.75 -0.39 0)
          translation=(-0.07635308 -0.06912144 -0.07068776) quadrant=all radius=0.03776392 length=0.09498586
      WrapCylinder Gmax3_at_pelvis_l: xyz_body_rotation=(0.1 0 0) translation=(-0.07921632 -0.07328538 -0.07068776)
          quadrant=all radius=0.0357903 length=0.1037669
      WrapCylinder PS_at_brim_r: xyz_body_rotation=(-0.25 -0.27 0.1) translation=(-0.0706266 -0.0499673 0.0681929)
          quadrant=-y radius=0.04518001 length=0.1023002
      WrapCylinder PS_at_brim_l: xyz_body_rotation=(0.25 0.27 0.1) translation=(-0.0706266 -0.0499673 -0.0681929)
          quadrant=-y radius=0.04518001 length=0.1023002
      WrapCylinder IL_at_brim_r: xyz_body_rotation=(-0.32 -0.24 0.9) translation=(-0.06776336 -0.05413125 0.07858816)
          quadrant=-y radius=0.04984688 length=0.1017294
      WrapCylinder IL_at_brim_l: xyz_body_rotation=(0.32 0.24 0.9) translation=(-0.06776336 -0.05413125 -0.07858816)
          quadrant=-y radius=0.04984688 length=0.1017294
    Body femur_r: mass=7.228811 mass_center=(0 -0.1569964 0) inertia=(0.09317347 0.03210717 0.09317347 0 0 0)
        meshes=r_femur.vtp
      WrapCylinder Gastroc_at_condyles_r: translation=(0.005424481 -0.3786383 0) quadrant=all radius=0.02510505
          length=0.1084896
      WrapCylinder KnExt_at_fem_r: xyz_body_rotation=(-0.0623366 0.0507601 0)
          translation=(0.003892911 -0.3719263 0.002268637) quadrant=all radius=0.02511354 length=0.1084318
      WrapCylinder AB_at_femshaft_r: xyz_body_rotation=(1.66157 0.186644 0)
          translation=(0.01588657 -0.1039824 0.0253486) quadrant=all radius=0.01784847 length=0.06516395
      WrapCylinder AL_at_femshaft_r: xyz_body_rotation=(1.77711 0.136489 0)
          translation=(0.03334179 -0.2141698 0.01639679) quadrant=all radius=0.02171657 length=0.09339264
      WrapCylinder AMprox_at_femshaft_r: xyz_body_rotation=(1.61126 0.18656 0)
          translation=(0.005623006 -0.06731894 0.02755962) quadrant=all radius=0.02283447 length=0.06508609
      WrapCylinder AMmid_at_femshaft_r: xyz_body_rotation=(1.61139 0.13656 0)
          translation=(0.02496617 -0.1484179 0.02233172) quadrant=all radius=0.02318453 length=0.1112445
      WrapCylinder AMdist_at_femshaft_r: xyz_body_rotation=(1.71188 0.186636 0)
          translation=(0.03428977 -0.2407918 0.01015962) quadrant=all radius=0.02356341 length=0.1865707
      WrapCylinder AMisch_at_condyles_r: xyz_body_rotation=(1.71115 -0.463363 0)
          translation=(-0.02457409 -0.3480065 -0.003422164) quadrant=all radius=0.04274401 length=0.230537
      WrapCylinder PECT_at_femshaft_r: xyz_body_rotation=(1.81295 0.276344 0)
          translation=(0.006602385 -0.07803911 0.03302478) quadrant=all radius=0.01612977 length=0.04728231
    Body tibia_r: mass=2.881375 mass_center=(0 -0.1887991 0) inertia=(0.03974041 0.003423381 0.03974041 0 0 0)
        meshes=(r_tibia.vtp r_fibula.vtp)
      WrapCylinder GasLat_at_shank_r: xyz_body_rotation=(2.96723 -0.279725 -1.47812)
          translation=(-0.006877252 -0.07483199 -0.003066883) quadrant=-y radius=0.05330992 length=0.09317322
      WrapCylinder GasMed_at_shank_r: xyz_body_rotation=(2.96723 0.0279725 -1.47812)
          translation=(-0.006877252 -0.07483199 -0.003066883) quadrant=-y radius=0.05330286 length=0.09319258
      WrapCylinder GR_at_condyles_r: xyz_body_rotation=(0 -0.4 0) translation=(-0.002788075 -0.02022486 0) quadrant=all
          radius=0.03493083 length=0.09293584
      WrapCylinder SM_at_condyles_r: xyz_body_rotation=(0 -0.1 0) translation=(-0.0009293584 -0.02022486 0)
          quadrant=all radius=0.03415459 length=0.09293584
      WrapCylinder ST_at_condyles_r: xyz_body_rotation=(0 -0.2 0) translation=(-0.001858717 -0.02073048 0) quadrant=all
          radius=0.04123778 length=0.09293584
      WrapCylinder BF_at_gastroc_r: translation=(-0.05390279 -0.06067459 0) quadrant=y radius=0.02910902
          length=0.1394038
    Body patella_r: mass=0.06699245 mass_center=(0.001662315 0.02438061 0)
        inertia=(1.902313e-6 8.689658e-6 8.689658e-6 0 0 0) meshes=r_patella.vtp
    Body talus_r: mass=0.07771746 mass_center=(0 0 0) inertia=(0.0007303943 0.0007008227 0.0007008227 0 0 0)
        meshes=r_talus.vtp
    Body calcn_r: mass=0.9714682 mass_center=(0.09821333 0.03279679 0)
        inertia=(0.001105452 0.002951611 0.002951611 0 0 0) meshes=r_foot.vtp
    Body toes_r: mass=0.168336 mass_center=(0.03398181 0.006559359 -0.01626377)
        inertia=(7.896088e-5 0.0001519282 0.0001519282 0 0 0) meshes=r_bofoot.vtp
    Body femur_l: mass=7.228811 mass_center=(0 -0.1554673 0) inertia=(0.09099769 0.03074546 0.09099769 0 0 0)
        meshes=l_femur.vtp
      WrapCylinder Gastroc_at_condyles_l: translation=(0.005308205 -0.3749505 0) quadrant=all radius=0.02470193
          length=0.1061641
      WrapCylinder KnExt_at_fem_l: xyz_body_rotation=(0.0623366 -0.0507601 0)
          translation=(0.003809465 -0.3683038 -0.002220008) quadrant=all radius=0.02470962 length=0.1061111
      WrapCylinder AB_at_femshaft_l: xyz_body_rotation=(-1.66157 -0.186644 0)
          translation=(0.01554603 -0.1029696 -0.02480524) quadrant=all radius=0.01746912 length=0.06448566
      WrapCylinder AL_at_femshaft_l: xyz_body_rotation=(-1.77711 -0.136489 0)
          translation=(0.03262709 -0.2120839 -0.01604532) quadrant=all radius=0.02125664 length=0.0923955
      WrapCylinder AMprox_at_femshaft_l: xyz_body_rotation=(-1.61126 -0.18656 0)
          translation=(0.005502475 -0.06666327 -0.02696887) quadrant=all radius=0.02234853 length=0.06441509
      WrapCylinder AMmid_at_femshaft_l: xyz_body_rotation=(-1.61139 -0.13656 0)
          translation=(0.02443101 -0.1469724 -0.02185303) quadrant=all radius=0.02268956 length=0.1101253
      WrapCylinder AMdist_at_femshaft_l: xyz_body_rotation=(-1.71188 -0.186636 0)
          translation=(0.03355476 -0.2384466 -0.009941843) quadrant=all radius=0.02306374 length=0.1845965
      WrapCylinder AMisch_at_condyles_l: xyz_body_rotation=(-1.71115 0.463363 0)
          translation=(-0.02404734 -0.344617 0.003348809) quadrant=all radius=0.04186862 length=0.2275538
      WrapCylinder PECT_at_femshaft_l: xyz_body_rotation=(-1.81295 -0.276344 0)
          translation=(0.006460861 -0.07727904 -0.03231688) quadrant=all radius=0.01579296 length=0.04672933
    Body tibia_l: mass=2.881375 mass_center=(0 -0.1884658 0) inertia=(0.03962467 0.003460216 0.03962467 0 0 0)
        meshes=(l_tibia.vtp l_fibula.vtp)
      WrapCylinder GasLat_at_shank_l: xyz_body_rotation=(-2.96723 0.279725 -1.47812)
          translation=(-0.006914152 -0.07469988 0.003083338) quadrant=-y radius=0.05340218 length=0.09365146
      WrapCylinder GasMed_at_shank_l: xyz_body_rotation=(-2.96723 -0.0279725 -1.47812)
          translation=(-0.006914152 -0.07469988 0.003083338) quadrant=-y radius=0.05339586 length=0.09366916
      WrapCylinder GR_at_condyles_l: xyz_body_rotation=(0 0.4 0) translation=(-0.002803035 -0.02018916 0) quadrant=all
          radius=0.03498845 length=0.09343449
      WrapCylinder SM_at_condyles_l: xyz_body_rotation=(0 0.1 0) translation=(-0.0009343449 -0.02018916 0) quadrant=all
          radius=0.03421093 length=0.09343449
      WrapCylinder ST_at_condyles_l: xyz_body_rotation=(0 0.2 0) translation=(-0.00186869 -0.02069389 0) quadrant=all
          radius=0.04130581 length=0.09343449
      WrapCylinder BF_at_gastroc_l: translation=(-0.05419201 -0.06056747 0) quadrant=all radius=0.02915704
          length=0.1401517
    Body patella_l: mass=0.06699245 mass_center=(0.001646124 0.02414315 0)
        inertia=(1.865437e-6 8.521213e-6 8.521213e-6 0 0 0) meshes=l_patella.vtp
    Body talus_l: mass=0.07771746 mass_center=(0 0 0) inertia=(0.0007330169 0.0007057453 0.0007057453 0 0 0)
        meshes=l_talus.vtp
    Body calcn_l: mass=0.9714682 mass_center=(0.09700225 0.03235113 0)
        inertia=(0.001096281 0.002888229 0.002888229 0 0 0) meshes=l_foot.vtp
    Body toes_l: mass=0.168336 mass_center=(0.03356278 0.006470226 0.01635104)
        inertia=(7.830582e-5 0.0001488445 0.0001488445 0 0 0) meshes=l_bofoot.vtp
  JointSet:
    CustomJoint ground_pelvis: socket_parent_frame=ground_offset socket_child_frame=pelvis_offset
      Coordinate pelvis_tilt: default_value=0 range=(-1.570796 1.570796) clamped=true
      Coordinate pelvis_list: default_value=0 range=(-1.570796 1.570796) clamped=true
      Coordinate pelvis_rotation: default_value=0 range=(-1.570796 1.570796) clamped=true
      Coordinate pelvis_tx: default_value=0 range=(-5 5) clamped=true
      Coordinate pelvis_ty: default_value=0.94 range=(-1 2) clamped=true
      Coordinate pelvis_tz: default_value=0 range=(-3 3) clamped=true
      PhysicalOffsetFrame ground_offset: socket_parent=/ground translation=(0 0 0) [meters]
      PhysicalOffsetFrame pelvis_offset: socket_parent=/bodyset/pelvis translation=(0 0 0)
      SpatialTransform:
        TransformAxis rotation1: coordinates=pelvis_tilt axis=(0 0 1) LinearFunction(coefficients=1 0)
        TransformAxis rotation2: coordinates=pelvis_list axis=(1 0 0) LinearFunction(coefficients=1 0)
        TransformAxis rotation3: coordinates=pelvis_rotation axis=(0 1 0) LinearFunction(coefficients=1 0)
        TransformAxis translation1: coordinates=pelvis_tx axis=(1 0 0) LinearFunction(coefficients=1 0)
        TransformAxis translation2: coordinates=pelvis_ty axis=(0 1 0) LinearFunction(coefficients=1 0)
        TransformAxis translation3: coordinates=pelvis_tz axis=(0 0 1) LinearFunction(coefficients=1 0)
    CustomJoint hip_r: socket_parent_frame=pelvis_offset socket_child_frame=femur_r_offset
      Coordinate hip_flexion_r: default_value=0 range=(-0.5235988 2.094395) clamped=true
      Coordinate hip_adduction_r: default_value=0 range=(-0.8726646 0.5235988) clamped=true
      Coordinate hip_rotation_r: default_value=0 range=(-0.6981317 0.6981317) clamped=true
      PhysicalOffsetFrame pelvis_offset: socket_parent=/bodyset/pelvis translation=(-0.05371057 -0.06536556 0.08031377)
      PhysicalOffsetFrame femur_r_offset: socket_parent=/bodyset/femur_r translation=(0 0 0)
      SpatialTransform: axes_held_at_zero=(translation1 translation2 translation3)
        TransformAxis rotation1: coordinates=hip_flexion_r axis=(0 0 1) LinearFunction(coefficients=1 0)
        TransformAxis rotation2: coordinates=hip_adduction_r axis=(1 0 0) LinearFunction(coefficients=1 0)
        TransformAxis rotation3: coordinates=hip_rotation_r axis=(0 1 0) LinearFunction(coefficients=1 0)
    CustomJoint walker_knee_r: socket_parent_frame=femur_r_offset socket_child_frame=tibia_r_offset
      Coordinate knee_angle_r: default_value=0 range=(0 2.0944) clamped=true
      PhysicalOffsetFrame femur_r_offset: socket_parent=/bodyset/femur_r
          translation=(-0.00877681 -0.3767544 -0.002983464) orientation=(-1.64157 1.44618 1.5708) [radians]
      PhysicalOffsetFrame tibia_r_offset: socket_parent=/bodyset/tibia_r
          translation=(-0.007518082 -0.003574542 -0.001379856) orientation=(-1.64157 1.44618 1.5708)
      SpatialTransform: axes_held_at_zero=translation3
        TransformAxis rotation1: coordinates=knee_angle_r axis=(1 0 0) LinearFunction(coefficients=1 0)
        TransformAxis rotation2: coordinates=knee_angle_r axis=(0 0 1)
          SimmSpline: x=(0 0.174533 0.349066 0.523599 0.698132 0.872665 1.0472 1.22173 1.39626 1.5708 1.74533 1.91986 2.0944)
              y=(0 0.0126809 0.0226969 0.0296054 0.0332049 0.0335354 0.0308779 0.0257548 0.0189295 0.011407 0.00443314 -0.00050475 -0.0016782)
        TransformAxis rotation3: coordinates=knee_angle_r axis=(0 1 0)
          SimmSpline: x=(0 0.174533 0.349066 0.523599 0.698132 0.872665 1.0472 1.22173 1.39626 1.5708 1.74533 1.91986 2.0944)
              y=(0 0.059461 0.109399 0.150618 0.18392 0.210107 0.229983 0.24435 0.254012 0.25977 0.262428 0.262788 0.261654)
        TransformAxis translation1: coordinates=knee_angle_r axis=(0 1 0)
          MultiplierFunction: scale=0.9235081
            SimmSpline: x=(0 0.174533 0.349066 0.523599 0.698132 0.872665 1.0472 1.22173 1.39626 1.5708 1.74533 1.91986 2.0944)
                y=(0 0.000479 0.000835 0.001086 0.001251 0.001346 0.001391 0.001403 0.0014 0.0014 0.001421 0.001481 0.001599)
        TransformAxis translation2: coordinates=knee_angle_r axis=(0 0 1)
          MultiplierFunction: scale=1.084896
            SimmSpline: x=(0 0.174533 0.349066 0.523599 0.698132 0.872665 1.0472 1.22173 1.39626 1.5708 1.74533 1.91986 2.0944)
                y=(0 0.000988 0.001899 0.002734 0.003492 0.004173 0.004777 0.005305 0.005756 0.00613 0.006427 0.006648 0.006792)
    CustomJoint patellofemoral_r: socket_parent_frame=femur_r_offset socket_child_frame=patella_r_offset
      Coordinate knee_angle_r_beta: default_value=0 range=(-99999.9 99999.9) clamped=false
      PhysicalOffsetFrame femur_r_offset: socket_parent=/bodyset/femur_r
          translation=(-0.00877681 -0.3767544 -0.002983464)
      PhysicalOffsetFrame patella_r_offset: socket_parent=/bodyset/patella_r translation=(0 0 0)
      SpatialTransform: axes_held_at_zero=(rotation2 rotation3)
        TransformAxis rotation1: coordinates=knee_angle_r_beta axis=(0 0 1)
          SimmSpline: x=(0 0.174533 0.349066 0.523599 0.698132 0.872665 1.0472 1.22173 1.39626 1.5708 1.74533 1.91986 2.0944)
              y=(0.00113686 -0.00629212 -0.105582 -0.253683 -0.414245 -0.579047 -0.747244 -0.91799 -1.09044 -1.26379 -1.43763 -1.61186 -1.78634)
        TransformAxis translation1: coordinates=knee_angle_r_beta axis=(1 0 0)
          MultiplierFunction: scale=1.084896
            SimmSpline: x=(0 0.174533 0.349066 0.523599 0.698132 0.872665 1.0472 1.22173 1.39626 1.5708 1.74533 1.91986 2.0944)
                y=(0.0524 0.0488 0.0437 0.0371 0.0296 0.0216 0.0136 0.0057 -0.0019 -0.0088 -0.0148 -0.0196 -0.0227)
        TransformAxis translation2: coordinates=knee_angle_r_beta axis=(0 1 0)
          MultiplierFunction: scale=0.9235081
            SimmSpline: x=(0 0.174533 0.349066 0.523599 0.698132 0.872665 1.0472 1.22173 1.39626 1.5708 1.74533 1.91986 2.0944)
                y=(-0.0108 -0.019 -0.0263 -0.0322 -0.0367 -0.0395 -0.0408 -0.0404 -0.0384 -0.0349 -0.0301 -0.0245 -0.0187)
        TransformAxis translation3: axis=(0 0 1) MultiplierFunction(scale=1.084896, Constant(value=0.00275))
    PinJoint ankle_r: socket_parent_frame=tibia_r_offset socket_child_frame=talus_r_offset
      Coordinate ankle_angle_r: default_value=0 range=(-0.6981317 0.6981317) clamped=true
      PhysicalOffsetFrame tibia_r_offset: socket_parent=/bodyset/tibia_r translation=(-0.009293584 -0.4044972 0)
          orientation=(0.175895 -0.105208 0.0186622)
      PhysicalOffsetFrame talus_r_offset: socket_parent=/bodyset/talus_r translation=(0 0 0)
          orientation=(0.175895 -0.105208 0.0186622)
    PinJoint subtalar_r: socket_parent_frame=talus_r_offset socket_child_frame=calcn_r_offset
      Coordinate subtalar_angle_r: default_value=0 range=(-0.6981317 0.6981317) clamped=true locked=true
      PhysicalOffsetFrame talus_r_offset: socket_parent=/bodyset/talus_r
          translation=(-0.04532481 -0.04242165 0.007360519) orientation=(-1.76819 0.906223 1.8196)
      PhysicalOffsetFrame calcn_r_offset: socket_parent=/bodyset/calcn_r translation=(0 0 0)
          orientation=(-1.76819 0.906223 1.8196)
    PinJoint mtp_r: socket_parent_frame=calcn_r_offset socket_child_frame=toes_r_offset
      Coordinate mtp_angle_r: default_value=0 range=(-0.5235988 0.5235988) clamped=true locked=true
      PhysicalOffsetFrame calcn_r_offset: socket_parent=/bodyset/calcn_r
          translation=(0.1756054 -0.002186453 0.001003707) orientation=(-3.14159 0.619901 0)
      PhysicalOffsetFrame toes_r_offset: socket_parent=/bodyset/toes_r translation=(0 0 0)
          orientation=(-3.14159 0.619901 0)
    CustomJoint hip_l: socket_parent_frame=pelvis_offset socket_child_frame=femur_l_offset
      Coordinate hip_flexion_l: default_value=0 range=(-0.5235988 2.094395) clamped=true
      Coordinate hip_adduction_l: default_value=0 range=(-0.8726646 0.5235988) clamped=true
      Coordinate hip_rotation_l: default_value=0 range=(-0.6981317 0.6981317) clamped=true
      PhysicalOffsetFrame pelvis_offset: socket_parent=/bodyset/pelvis
          translation=(-0.05371057 -0.06536556 -0.08031377)
      PhysicalOffsetFrame femur_l_offset: socket_parent=/bodyset/femur_l translation=(0 0 0)
      SpatialTransform: axes_held_at_zero=(translation1 translation2 translation3)
        TransformAxis rotation1: coordinates=hip_flexion_l axis=(0 0 1) LinearFunction(coefficients=1 0)
        TransformAxis rotation2: coordinates=hip_adduction_l axis=(1 0 0) LinearFunction(coefficients=-1 0)
        TransformAxis rotation3: coordinates=hip_rotation_l axis=(0 1 0) LinearFunction(coefficients=-1 0)
    CustomJoint walker_knee_l: socket_parent_frame=femur_l_offset socket_child_frame=tibia_l_offset
      Coordinate knee_angle_l: default_value=0 range=(0 2.0944) clamped=true
      PhysicalOffsetFrame femur_l_offset: socket_parent=/bodyset/femur_l
          translation=(-0.008588676 -0.3730849 0.002919513) orientation=(1.64157 -1.44618 1.5708)
      PhysicalOffsetFrame tibia_l_offset: socket_parent=/bodyset/tibia_l
          translation=(-0.007558421 -0.003568232 0.001387259) orientation=(1.64157 -1.44618 1.5708)
      SpatialTransform: axes_held_at_zero=translation3
        TransformAxis rotation1: coordinates=knee_angle_l axis=(-1 0 0) LinearFunction(coefficients=1 0)
        TransformAxis rotation2: coordinates=knee_angle_l axis=(0 0 1)
          SimmSpline: x=(0 0.174533 0.349066 0.523599 0.698132 0.872665 1.0472 1.22173 1.39626 1.5708 1.74533 1.91986 2.0944)
              y=(0 0.0126809 0.0226969 0.0296054 0.0332049 0.0335354 0.0308779 0.0257548 0.0189295 0.011407 0.00443314 -0.00050475 -0.0016782)
        TransformAxis rotation3: coordinates=knee_angle_l axis=(0 1 0)
          SimmSpline: x=(0 0.174533 0.349066 0.523599 0.698132 0.872665 1.0472 1.22173 1.39626 1.5708 1.74533 1.91986 2.0944)
              y=(0 -0.059461 -0.109399 -0.150618 -0.18392 -0.210107 -0.229983 -0.24435 -0.254012 -0.25977 -0.262428 -0.262788 -0.261654)
        TransformAxis translation1: coordinates=knee_angle_l axis=(0 1 0)
          MultiplierFunction: scale=0.9145134
            SimmSpline: x=(0 0.174533 0.349066 0.523599 0.698132 0.872665 1.0472 1.22173 1.39626 1.5708 1.74533 1.91986 2.0944)
                y=(0 0.000479 0.000835 0.001086 0.001251 0.001346 0.001391 0.001403 0.0014 0.0014 0.001421 0.001481 0.001599)
        TransformAxis translation2: coordinates=knee_angle_l axis=(0 0 1)
          MultiplierFunction: scale=1.061641
            SimmSpline: x=(0 0.174533 0.349066 0.523599 0.698132 0.872665 1.0472 1.22173 1.39626 1.5708 1.74533 1.91986 2.0944)
                y=(0 -0.000988 -0.001899 -0.002734 -0.003492 -0.004173 -0.004777 -0.005305 -0.005756 -0.00613 -0.006427 -0.006648 -0.006792)
    CustomJoint patellofemoral_l: socket_parent_frame=femur_l_offset socket_child_frame=patella_l_offset
      Coordinate knee_angle_l_beta: default_value=0 range=(-99999.9 99999.9) clamped=false
      PhysicalOffsetFrame femur_l_offset: socket_parent=/bodyset/femur_l
          translation=(-0.008588676 -0.3730849 0.002919513)
      PhysicalOffsetFrame patella_l_offset: socket_parent=/bodyset/patella_l translation=(0 0 0)
      SpatialTransform: axes_held_at_zero=(rotation2 rotation3)
        TransformAxis rotation1: coordinates=knee_angle_l_beta axis=(0 0 1)
          SimmSpline: x=(0 0.174533 0.349066 0.523599 0.698132 0.872665 1.0472 1.22173 1.39626 1.5708 1.74533 1.91986 2.0944)
              y=(0.00113686 -0.00629212 -0.105582 -0.253683 -0.414245 -0.579047 -0.747244 -0.91799 -1.09044 -1.26379 -1.43763 -1.61186 -1.78634)
        TransformAxis translation1: coordinates=knee_angle_l_beta axis=(1 0 0)
          MultiplierFunction: scale=1.061641
            SimmSpline: x=(0 0.174533 0.349066 0.523599 0.698132 0.872665 1.0472 1.22173 1.39626 1.5708 1.74533 1.91986 2.0944)
                y=(0.0524 0.0488 0.0437 0.0371 0.0296 0.0216 0.0136 0.0057 -0.0019 -0.0088 -0.0148 -0.0196 -0.0227)
        TransformAxis translation2: coordinates=knee_angle_l_beta axis=(0 1 0)
          MultiplierFunction: scale=0.9145134
            SimmSpline: x=(0 0.174533 0.349066 0.523599 0.698132 0.872665 1.0472 1.22173 1.39626 1.5708 1.74533 1.91986 2.0944)
                y=(-0.0108 -0.019 -0.0263 -0.0322 -0.0367 -0.0395 -0.0408 -0.0404 -0.0384 -0.0349 -0.0301 -0.0245 -0.0187)
        TransformAxis translation3: axis=(0 0 1) MultiplierFunction(scale=1.061641, Constant(value=-0.00275))
    PinJoint ankle_l: socket_parent_frame=tibia_l_offset socket_child_frame=talus_l_offset
      Coordinate ankle_angle_l: default_value=0 range=(-0.6981317 0.6981317) clamped=true
      PhysicalOffsetFrame tibia_l_offset: socket_parent=/bodyset/tibia_l translation=(-0.009343449 -0.4037832 0)
          orientation=(-0.175895 0.105208 0.0186622)
      PhysicalOffsetFrame talus_l_offset: socket_parent=/bodyset/talus_l translation=(0 0 0)
          orientation=(-0.175895 0.105208 0.0186622)
    PinJoint subtalar_l: socket_parent_frame=talus_l_offset socket_child_frame=calcn_l_offset
      Coordinate subtalar_angle_l: default_value=0 range=(-0.6981317 0.6981317) clamped=true locked=true
      PhysicalOffsetFrame talus_l_offset: socket_parent=/bodyset/talus_l
          translation=(-0.045568 -0.04234676 -0.007400012) orientation=(1.76819 -0.906223 1.8196)
      PhysicalOffsetFrame calcn_l_offset: socket_parent=/bodyset/calcn_l translation=(0 0 0)
          orientation=(1.76819 -0.906223 1.8196)
    PinJoint mtp_l: socket_parent_frame=calcn_l_offset socket_child_frame=toes_l_offset
      Coordinate mtp_angle_l: default_value=0 range=(-0.5235988 0.5235988) clamped=true locked=true
      PhysicalOffsetFrame calcn_l_offset: socket_parent=/bodyset/calcn_l
          translation=(0.17344 -0.002156742 -0.001009093) orientation=(-3.14159 -0.619901 0)
      PhysicalOffsetFrame toes_l_offset: socket_parent=/bodyset/toes_l translation=(0 0 0)
          orientation=(-3.14159 -0.619901 0)
  ConstraintSet:
    CoordinateCouplerConstraint patellofemoral_knee_angle_r_con: independent_coordinate_names=knee_angle_r
        dependent_coordinate_name=knee_angle_r_beta scale_factor=1
        coupled_coordinates_function=LinearFunction(coefficients=1 0)
    CoordinateCouplerConstraint patellofemoral_knee_angle_l_con: independent_coordinate_names=knee_angle_l
        dependent_coordinate_name=knee_angle_l_beta scale_factor=1
        coupled_coordinates_function=LinearFunction(coefficients=1 0)
  ForceSet:
    Millard2012EquilibriumMuscle [values shared by the 80 below unless stated]: fiber_damping=0.01
        default_activation=0.01 minimum_activation=0.01
      ActiveForceLengthCurve: min_norm_active_fiber_length=0.25 transition_norm_fiber_length=0.77
          max_norm_active_fiber_length=1.9 shallow_ascending_slope=0.75 minimum_value=0
      ForceVelocityCurve: concentric_slope_at_vmax=0 concentric_slope_near_vmax=0.25 isometric_slope=5
          eccentric_slope_at_vmax=0 eccentric_slope_near_vmax=0.15 max_eccentric_velocity_force_multiplier=1.4
      TendonForceLengthCurve
    Millard2012EquilibriumMuscle addbrev_r: max_isometric_force=625.8197 optimal_fiber_length=0.1015288
        tendon_slack_length=0.03491006 pennation_angle_at_optimal=0.1147809 [radians]
      PathPoint P1: pelvis (-0.0182293 -0.07828211 0.0160087)
      PathPoint P2: femur_r (-0.002169792 -0.108974 0.02701391)
      PathWrap: wrap_object=AB_at_femshaft_r method=hybrid
      FiberForceLengthCurve: strain_at_zero_force=-0.1927643 strain_at_one_norm_force=0.5015522
          stiffness_at_low_force=0.2 stiffness_at_one_norm_force=2.880531 curviness=0.75
    Millard2012EquilibriumMuscle addlong_r: max_isometric_force=916.8 optimal_fiber_length=0.1016262
        tendon_slack_length=0.1237917 pennation_angle_at_optimal=0.1377704
      PathPoint P1: pelvis (-0.007234454 -0.07403489 0.01962625)
      PathPoint P2: femur_r (0.01221593 -0.2210601 0.01717391)
      PathWrap: wrap_object=AL_at_femshaft_r method=hybrid
      FiberForceLengthCurve: strain_at_zero_force=-0.1917374 strain_at_one_norm_force=0.5002995
          stiffness_at_low_force=0.2 stiffness_at_one_norm_force=2.890019 curviness=0.75
    Millard2012EquilibriumMuscle addmagDist_r: max_isometric_force=597.2951 optimal_fiber_length=0.1688705
        tendon_slack_length=0.08327324 pennation_angle_at_optimal=0.194705
      PathPoint P1: pelvis (-0.07066477 -0.1063221 0.04139392)
      PathPoint P2: femur_r (0.01220508 -0.2424209 0.02093849)
      PathWrap: wrap_object=AMdist_at_femshaft_r method=hybrid
      FiberForceLengthCurve: strain_at_zero_force=-3.981963e-9 strain_at_one_norm_force=0.7 stiffness_at_low_force=0.2
          stiffness_at_one_norm_force=2.857143 curviness=0.75
    Millard2012EquilibriumMuscle addmagIsch_r: max_isometric_force=597.2951 optimal_fiber_length=0.1464679
        tendon_slack_length=0.2028637 pennation_angle_at_optimal=0.1680443
      PathPoint P1: pelvis (-0.08553454 -0.1080626 0.04335863)
      PathPoint P2: femur_r (0.00521835 -0.3582934 -0.03550865)
      PathWrap: wrap_object=AMisch_at_condyles_r method=hybrid
      FiberForceLengthCurve: strain_at_zero_force=0.007389956 strain_at_one_norm_force=0.7000392
          stiffness_at_low_force=0.2 stiffness_at_one_norm_force=2.887464 curviness=0.75
    Millard2012EquilibriumMuscle addmagMid_r: max_isometric_force=597.2951 optimal_fiber_length=0.1358265
        tendon_slack_length=0.04599331 pennation_angle_at_optimal=0.2073076
      PathPoint P1: pelvis (-0.05025941 -0.1005592 0.02966807)
      PathPoint P2: femur_r (0.002625449 -0.1499777 0.03170066)
      PathWrap: wrap_object=AMmid_at_femshaft_r method=hybrid
      FiberForceLengthCurve: strain_at_zero_force=-3.981963e-9 strain_at_one_norm_force=0.7 stiffness_at_low_force=0.2
          stiffness_at_one_norm_force=2.857143 curviness=0.75
    Millard2012EquilibriumMuscle addmagProx_r: max_isometric_force=597.2951 optimal_fiber_length=0.1092057
        tendon_slack_length=0.04170097 pennation_angle_at_optimal=0.3114833
      PathPoint P1: pelvis (-0.02956773 -0.08956639 0.01418953)
      PathPoint P2: femur_r (-0.01656636 -0.07282785 0.03473837)
      PathWrap: wrap_object=AMprox_at_femshaft_r method=hybrid
      FiberForceLengthCurve: strain_at_zero_force=-3.981963e-9 strain_at_one_norm_force=0.7 stiffness_at_low_force=0.2
          stiffness_at_one_norm_force=2.857143 curviness=0.75
    Millard2012EquilibriumMuscle bflh_r: max_isometric_force=1313.184 optimal_fiber_length=0.09188012
        tendon_slack_length=0.3061666 pennation_angle_at_optimal=0.1759182
      PathPoint P1: pelvis (-0.099259 -0.0991851 0.06091622)
      PathPoint P2: tibia_r (-0.03131938 -0.03539351 0.02351277)
      PathPoint P3: tibia_r (-0.02667259 -0.04601156 0.02815956)
      FiberForceLengthCurve: strain_at_zero_force=0.1965607 strain_at_one_norm_force=0.7068715
          stiffness_at_low_force=0.2 stiffness_at_one_norm_force=3.91918 curviness=0.75
    Millard2012EquilibriumMuscle bfsh_r: max_isometric_force=557.1148 optimal_fiber_length=0.1035243
        tendon_slack_length=0.09931692 pennation_angle_at_optimal=0.2642232
      PathPoint P1: femur_r (0.005424481 -0.1949526 0.02538657)
      PathPoint P2: tibia_r (-0.02797369 -0.04237109 0.0295536)
      PathWrap: wrap_object=BF_at_gastroc_r method=hybrid
      FiberForceLengthCurve: strain_at_zero_force=0.115251 strain_at_one_norm_force=0.6888986
          stiffness_at_low_force=0.2 stiffness_at_one_norm_force=3.486462 curviness=0.75
    Millard2012EquilibriumMuscle edl_r: max_isometric_force=603.4982 optimal_fiber_length=0.0694865
        tendon_slack_length=0.369868 pennation_angle_at_optimal=0.2182582
      PathPoint P1: tibia_r (-0.01486973 -0.1170008 0.01905185)
      PathPoint P2: tibia_r (0.01524148 -0.3802274 0.01040881)
      PathPoint P3: calcn_r (0.09025805 0.03935615 0.0007434867)
      PathPoint P4: calcn_r (0.1587127 0.006012746 0.01208166)
      PathPoint P5: toes_r (0.00029464 0.005138165 0.01421918)
      PathPoint P6: toes_r (0.0435085 -0.0004372906 0.02323396)
      FiberForceLengthCurve: strain_at_zero_force=0.1317998 strain_at_one_norm_force=0.7072192
          stiffness_at_low_force=0.2 stiffness_at_one_norm_force=3.475726 curviness=0.75
    Millard2012EquilibriumMuscle ehl_r: max_isometric_force=285.8675 optimal_fiber_length=0.07476264
        tendon_slack_length=0.326632 pennation_angle_at_optimal=0.1972681
      PathPoint P1: tibia_r (-0.01301102 -0.1567427 0.01756487)
      PathPoint P2: tibia_r (0.006598445 -0.2941706 0.01524148)
      PathPoint P3: tibia_r (0.01858717 -0.3734521 -0.002602204)
      PathPoint P4: calcn_r (0.09526693 0.04252651 -0.01960946)
      PathPoint P5: calcn_r (0.1269898 0.0337807 -0.02388451)
      PathPoint P6: calcn_r (0.1703019 0.01519585 -0.02602204)
      PathPoint P7: toes_r (0.02926757 0.004482229 -0.02276928)
      PathPoint P8: toes_r (0.0552941 0.00371697 -0.01728607)
      FiberForceLengthCurve: strain_at_zero_force=0.1051406 strain_at_one_norm_force=0.7178208
          stiffness_at_low_force=0.2 stiffness_at_one_norm_force=3.264346 curviness=0.75
    Millard2012EquilibriumMuscle fdl_r: max_isometric_force=423.177 optimal_fiber_length=0.04429337
        tendon_slack_length=0.3761688 pennation_angle_at_optimal=0.2248391
      PathPoint P1: tibia_r (-0.002137524 -0.1852597 -0.001672845)
      PathPoint P2: tibia_r (-0.01635671 -0.3685981 -0.01152404)
      PathPoint P3: calcn_r (0.04282101 0.03443663 -0.02602204)
      PathPoint P4: calcn_r (0.06953503 0.01924079 -0.02444213)
      PathPoint P5: calcn_r (0.1628377 -0.008855135 0.01078056)
      PathPoint P6: toes_r (-0.001866053 -0.008527167 0.01366157)
      PathPoint P7: toes_r (0.0279908 -0.007761908 0.01998121)
      PathPoint P8: toes_r (0.04331208 -0.006559359 0.02249047)
      FiberForceLengthCurve: strain_at_zero_force=-0.01205975 strain_at_one_norm_force=0.6997089
          stiffness_at_low_force=0.2 stiffness_at_one_norm_force=2.809902 curviness=0.75
    Millard2012EquilibriumMuscle fhl_r: max_isometric_force=907.8393 optimal_fiber_length=0.05230727
        tendon_slack_length=0.3516991 pennation_angle_at_optimal=0.2580255
      PathPoint P1: tibia_r (-0.02881011 -0.2187319 0.01858717)
      PathPoint P2: tibia_r (-0.02249047 -0.3712273 -0.007063124)
      PathPoint P3: calcn_r (0.03673178 0.03017305 -0.02239754)
      PathPoint P4: calcn_r (0.1019454 0.00743394 -0.02379158)
      PathPoint P5: calcn_r (0.1695162 -0.0057941 -0.02499974)
      PathPoint P6: toes_r (0.01522307 -0.00699665 -0.024628)
      PathPoint P7: toes_r (0.05519589 -0.01115091 -0.01682139)
      FiberForceLengthCurve: strain_at_zero_force=0.01130745 strain_at_one_norm_force=0.7002505
          stiffness_at_low_force=0.2 stiffness_at_one_norm_force=2.902997 curviness=0.75
    Millard2012EquilibriumMuscle gaslat_r: max_isometric_force=1575.059 optimal_fiber_length=0.05864191
        tendon_slack_length=0.3750591 pennation_angle_at_optimal=0.2102268
      PathPoint P1: femur_r (-0.003254688 -0.352226 0.03005162)
      PathPoint P2: calcn_r (0.004321386 0.03389002 -0.0049256)
      PathWrap: wrap_object=GasLat_at_shank_r method=hybrid
      PathWrap pathwrap_0: wrap_object=Gastroc_at_condyles_r method=hybrid
      FiberForceLengthCurve: strain_at_zero_force=-0.05983233 strain_at_one_norm_force=0.7435102
          stiffness_at_low_force=0.2 stiffness_at_one_norm_force=2.489598 curviness=0.75
    Millard2012EquilibriumMuscle gasmed_r: max_isometric_force=3115.515 optimal_fiber_length=0.05096643
        tendon_slack_length=0.3984539 pennation_angle_at_optimal=0.1656816
      PathPoint P1: femur_r (0.008679169 -0.3498249 -0.02256584)
      PathPoint P2: calcn_r (0.004321386 0.03389002 -0.0049256)
      PathWrap: wrap_object=GasMed_at_shank_r method=hybrid
      PathWrap pathwrap_0: wrap_object=Gastroc_at_condyles_r method=hybrid
      FiberForceLengthCurve: strain_at_zero_force=0.1998358 strain_at_one_norm_force=0.7902371
          stiffness_at_low_force=0.2 stiffness_at_one_norm_force=3.387526 curviness=0.75
    Millard2012EquilibriumMuscle glmax1_r: max_isometric_force=983.7836 optimal_fiber_length=0.1317838
        tendon_slack_length=0.04378529 pennation_angle_at_optimal=0.3540118
      PathPoint P1: pelvis (-0.1174883 0.0287312 0.05852531)
      PathPoint P2: pelvis (-0.1199698 -0.02015348 0.08097907)
      PathPoint P3: femur_r (-0.04816939 -0.03010636 0.03276386)
      PathPoint P4: femur_r (-0.03005162 -0.05227056 0.05099012)
      PathWrap: wrap_object=Gmax1_at_pelvis_r method=hybrid
      FiberForceLengthCurve: strain_at_zero_force=-0.07534176 strain_at_one_norm_force=0.8468075
          stiffness_at_low_force=0.2 stiffness_at_one_norm_force=2.168846 curviness=0.75
    Millard2012EquilibriumMuscle glmax2_r: max_isometric_force=1406.046 optimal_fiber_length=0.1434484
        tendon_slack_length=0.06202742 pennation_angle_at_optimal=0.3673821
      PathPoint P1: pelvis (-0.1256963 0.007245259 0.0480261)
      PathPoint P2: pelvis (-0.1282732 -0.05071681 0.08451346)
      PathPoint P3: femur_r (-0.04882032 -0.05393287 0.02733938)
      PathPoint P4: femur_r (-0.01692438 -0.09382843 0.04545715)
      PathWrap: wrap_object=Gmax2_at_pelvis_r method=hybrid
      FiberForceLengthCurve: strain_at_zero_force=0.199275 strain_at_one_norm_force=0.7164175
          stiffness_at_low_force=0.2 stiffness_at_one_norm_force=3.867406 curviness=0.75
    Millard2012EquilibriumMuscle glmax3_r: max_isometric_force=947.7541 optimal_fiber_length=0.1587182
        tendon_slack_length=0.06625926 pennation_angle_at_optimal=0.3824161
      PathPoint P1: pelvis (-0.1240738 -0.04372139 0.009355733)
      PathPoint P2: pelvis (-0.1214968 -0.1051812 0.04521938)
      PathPoint P3: femur_r (-0.03048558 -0.1038947 0.01019802)
      PathPoint P4: femur_r (-0.006509377 -0.1310458 0.04458923)
      PathWrap: wrap_object=Gmax3_at_pelvis_r method=hybrid
      FiberForceLengthCurve: strain_at_zero_force=0.1989714 strain_at_one_norm_force=0.7121937
          stiffness_at_low_force=0.2 stiffness_at_one_norm_force=3.896947 curviness=0.75
    Millard2012EquilibriumMuscle glmed1_r: max_isometric_force=1093.467 optimal_fiber_length=0.0661144
        tendon_slack_length=0.05055201 pennation_angle_at_optimal=0.3165559
      PathPoint P1: pelvis (-0.0468974 0.02178013 0.1198453)
      PathPoint P2_0: femur_r (-0.01507111 -0.01689531 0.06421459)
      FiberForceLengthCurve: strain_at_zero_force=-3.729382e-9 strain_at_one_norm_force=0.7 stiffness_at_low_force=0.2
          stiffness_at_one_norm_force=2.857143 curviness=0.75
    Millard2012EquilibriumMuscle glmed2_r: max_isometric_force=765.0917 optimal_fiber_length=0.07345921
        tendon_slack_length=0.06565926 pennation_angle_at_optimal=0.3165559
      PathPoint P1: pelvis (-0.0808649 0.04549849 0.08522399)
      PathPoint P2_0: femur_r (-0.02390679 -0.009197307 0.06089112)
      FiberForceLengthCurve: strain_at_zero_force=0.06397124 strain_at_one_norm_force=0.7014005
          stiffness_at_low_force=0.2 stiffness_at_one_norm_force=3.137603 curviness=0.75
    Millard2012EquilibriumMuscle glmed3_r: max_isometric_force=871.1993 optimal_fiber_length=0.07126968
        tendon_slack_length=0.04416069 pennation_angle_at_optimal=0.3165559
      PathPoint P1: pelvis (-0.09531326 0.01295768 0.0664274)
      PathPoint P2_0: femur_r (-0.03352329 -0.004340488 0.05619762)
      FiberForceLengthCurve: strain_at_zero_force=0.1252157 strain_at_one_norm_force=0.7030514
          stiffness_at_low_force=0.2 stiffness_at_one_norm_force=3.461191 curviness=0.75
    Millard2012EquilibriumMuscle glmin1_r: max_isometric_force=374.0459 optimal_fiber_length=0.07015916
        tendon_slack_length=0.0166502 pennation_angle_at_optimal=0.1745329
      PathPoint P1: pelvis (-0.02823111 -9.012157e-5 0.1231365)
      PathPoint P2: femur_r (0.005955341 -0.01430385 0.06079519)
      FiberForceLengthCurve: strain_at_zero_force=-3.729382e-9 strain_at_one_norm_force=0.7 stiffness_at_low_force=0.2
          stiffness_at_one_norm_force=2.857143 curviness=0.75
    Millard2012EquilibriumMuscle glmin2_r: max_isometric_force=394.8197 optimal_fiber_length=0.0596587
        tendon_slack_length=0.02780421 pennation_angle_at_optimal=0
      PathPoint P1: pelvis (-0.05879187 0.008328106 0.1051432)
      PathPoint P2: femur_r (0.003844374 -0.008322904 0.05691834)
      FiberForceLengthCurve: strain_at_zero_force=0.003039474 strain_at_one_norm_force=0.7000285
          stiffness_at_low_force=0.2 stiffness_at_one_norm_force=2.869486 curviness=0.75
    Millard2012EquilibriumMuscle glmin3_r: max_isometric_force=446.7738 optimal_fiber_length=0.0330682
        tendon_slack_length=0.04427005 pennation_angle_at_optimal=0.01745329
      PathPoint P1: pelvis (-0.07530322 -0.01290822 0.08295417)
      PathPoint P2: femur_r (-0.003879737 -0.001169808 0.05561356)
      FiberForceLengthCurve: strain_at_zero_force=0.007461173 strain_at_one_norm_force=0.7002322
          stiffness_at_low_force=0.2 stiffness_at_one_norm_force=2.886957 curviness=0.75
    Millard2012EquilibriumMuscle grac_r: max_isometric_force=281.3115 optimal_fiber_length=0.2160282
        tendon_slack_length=0.1631248 pennation_angle_at_optimal=0.1720016
      PathPoint P1: pelvis (-0.04520102 -0.1076962 0.02553076)
      PathPoint P2: tibia_r (-0.01711878 -0.04808461 -0.0275183)
      PathPoint P3: tibia_r (0.001654258 -0.07040275 -0.01461881)
      PathWrap: wrap_object=GR_at_condyles_r method=hybrid
      FiberForceLengthCurve: strain_at_zero_force=-0.1969779 strain_at_one_norm_force=0.8027483
          stiffness_at_low_force=0.2 stiffness_at_one_norm_force=2.000548 curviness=0.75
    Millard2012EquilibriumMuscle iliacus_r: max_isometric_force=1021.141 optimal_fiber_length=0.09542325
        tendon_slack_length=0.08604269 pennation_angle_at_optimal=0.279914
      PathPoint P1: pelvis (-0.05774201 0.02573316 0.08763203)
      PathPoint P2: pelvis (-0.01288458 -0.04638631 0.07858816)
      PathPoint P3: femur_r (-0.002495261 -0.05217821 0.01508006)
      PathPoint P4: femur_r (-0.01323573 -0.05882747 0.02126396)
      PathWrap: wrap_object=IL_at_brim_r method=hybrid range=(2 3)
      FiberForceLengthCurve: strain_at_zero_force=-0.1703103 strain_at_one_norm_force=0.5005449
          stiffness_at_low_force=0.2 stiffness_at_one_norm_force=2.98127 curviness=0.75
    Millard2012EquilibriumMuscle perbrev_r: max_isometric_force=521.2016 optimal_fiber_length=0.04552795
        tendon_slack_length=0.1479433 pennation_angle_at_optimal=0.2052361
      PathPoint P1: tibia_r (-0.02258341 -0.2560468 0.0233269)
      PathPoint P2: tibia_r (-0.03150525 -0.3936769 0.02314102)
      PathPoint P3: tibia_r (-0.02648671 -0.4049017 0.02369864)
      PathPoint P4: calcn_r (0.04625848 0.02951712 0.02165405)
      PathPoint P5: calcn_r (0.06649042 0.02394166 0.03187699)
      FiberForceLengthCurve: strain_at_zero_force=-0.04234068 strain_at_one_norm_force=0.6987541
          stiffness_at_low_force=0.2 stiffness_at_one_norm_force=2.69871 curviness=0.75
    Millard2012EquilibriumMuscle perlong_r: max_isometric_force=1115.371 optimal_fiber_length=0.05073743
        tendon_slack_length=0.3318116 pennation_angle_at_optimal=0.2479525
      PathPoint P1: tibia_r (-0.01858717 -0.1388437 0.02620791)
      PathPoint P2: tibia_r (-0.02946066 -0.3943848 0.02202579)
      PathPoint P3: tibia_r (-0.02527855 -0.405913 0.0223046)
      PathPoint P4: calcn_r (0.04301744 0.02514421 0.02053882)
      PathPoint P5: calcn_r (0.06688327 0.0115882 0.02639378)
      PathPoint P6: calcn_r (0.08367775 0.007543263 0.01096643)
      PathPoint P7: calcn_r (0.1181506 0.009292425 -0.01710019)
      FiberForceLengthCurve: strain_at_zero_force=-0.1323481 strain_at_one_norm_force=0.6924185
          stiffness_at_low_force=0.2 stiffness_at_one_norm_force=2.424929 curviness=0.75
    Millard2012EquilibriumMuscle piri_r: max_isometric_force=1029.787 optimal_fiber_length=0.02551368
        tendon_slack_length=0.112757 pennation_angle_at_optimal=0.1745329
      PathPoint P1: pelvis (-0.09716884 -0.005438108 0.014044)
      PathPoint P2: pelvis (-0.09736926 -0.02553329 0.06332792)
      PathPoint P3: femur_r (-0.01605646 -0.003324629 0.04740996)
      FiberForceLengthCurve: strain_at_zero_force=0.09922992 strain_at_one_norm_force=0.7028348
          stiffness_at_low_force=0.2 stiffness_at_one_norm_force=3.313426 curviness=0.75
    Millard2012EquilibriumMuscle psoas_r: max_isometric_force=1426.79 optimal_fiber_length=0.1044572
        tendon_slack_length=0.08894779 pennation_angle_at_optimal=0.2155251
      PathPoint P1: pelvis (-0.05783746 0.05163288 0.04054151)
      PathPoint P2: pelvis (-0.01956548 -0.05446436 0.0681929)
      PathPoint P3: femur_r (-0.01432063 -0.04312783 0.004990522)
      PathPoint P4: femur_r (-0.02549506 -0.04839183 0.009547086)
      PathWrap: wrap_object=PS_at_brim_r method=hybrid range=(2 3)
      FiberForceLengthCurve: strain_at_zero_force=-0.09543841 strain_at_one_norm_force=0.5010382
          stiffness_at_low_force=0.2 stiffness_at_one_norm_force=3.353023 curviness=0.75
    Millard2012EquilibriumMuscle recfem_r: max_isometric_force=2191.741 optimal_fiber_length=0.07079435
        tendon_slack_length=0.4183242 pennation_angle_at_optimal=0.2170149
      PathPoint P1: pelvis (-0.02290592 -0.03231219 0.09698777)
      PathPoint P2: patella_r (0.009235081 0.0452519 0.0006464557)
      PathPoint P3: patella_r (0.01117445 0.0403573 -0.0009235081)
      PathPoint P4: patella_r (0.004617541 0.002281065 2.770524e-5)
      PathPoint P5: tibia_r (0.03029708 -0.06382967 -0.0004367985)
      PathWrap: wrap_object=KnExt_at_fem_r method=hybrid
      FiberForceLengthCurve: strain_at_zero_force=0.1999726 strain_at_one_norm_force=0.8999622
          stiffness_at_low_force=0.2 stiffness_at_one_norm_force=2.857186 curviness=0.75
    Millard2012EquilibriumMuscle sart_r: max_isometric_force=249.4131 optimal_fiber_length=0.3741104
        tendon_slack_length=0.1151107 pennation_angle_at_optimal=0.02613542
      PathPoint P1: pelvis (-0.01861106 -0.0129915 0.1097739)
      PathPoint P2: femur_r (-0.003254688 -0.3295077 -0.04567413)
      PathPoint P3: tibia_r (-0.0233269 -0.04055085 -0.03392158)
      PathPoint P4: tibia_r (-0.0147768 -0.06057346 -0.02453506)
      PathPoint P5: tibia_r (0.01263927 -0.08191069 -0.002416332)
      FiberForceLengthCurve: strain_at_zero_force=-0.1984568 strain_at_one_norm_force=0.7212821
          stiffness_at_low_force=0.2 stiffness_at_one_norm_force=2.17453 curviness=0.75
    Millard2012EquilibriumMuscle semimem_r: max_isometric_force=2200.987 optimal_fiber_length=0.06488637
        tendon_slack_length=0.3268636 pennation_angle_at_optimal=0.2545615
      PathPoint P1: pelvis (-0.09420061 -0.09493788 0.06382689)
      PathPoint P2: tibia_r (-0.02695139 -0.04216884 -0.01821543)
      PathWrap: wrap_object=SM_at_condyles_r method=hybrid
      FiberForceLengthCurve: strain_at_zero_force=0.1994426 strain_at_one_norm_force=0.7353994
          stiffness_at_low_force=0.2 stiffness_at_one_norm_force=3.731644 curviness=0.75
    Millard2012EquilibriumMuscle semiten_r: max_isometric_force=591.2951 optimal_fiber_length=0.1827053
        tendon_slack_length=0.2340133 pennation_angle_at_optimal=0.241295
      PathPoint P1: pelvis (-0.09906812 -0.1043484 0.05353558)
      PathPoint P2: tibia_r (-0.02899598 -0.05137115 -0.02128231)
      PathPoint P3: tibia_r (0.001765781 -0.07816909 -0.01087349)
      PathWrap: wrap_object=ST_at_condyles_r method=hybrid
      FiberForceLengthCurve: strain_at_zero_force=0.007279189 strain_at_one_norm_force=0.7803276
          stiffness_at_low_force=0.2 stiffness_at_one_norm_force=2.58716 curviness=0.75
    Millard2012EquilibriumMuscle soleus_r: max_isometric_force=6194.843 optimal_fiber_length=0.04407293
        tendon_slack_length=0.2772146 pennation_angle_at_optimal=0.3814289
      PathPoint P1: tibia_r (-0.007063124 -0.09262987 0.009107713)
      PathPoint P2: calcn_r (0.004321386 0.03389002 -0.0049256)
      FiberForceLengthCurve: strain_at_zero_force=0.1569032 strain_at_one_norm_force=0.8506533
          stiffness_at_low_force=0.2 stiffness_at_one_norm_force=2.882882 curviness=0.75
    Millard2012EquilibriumMuscle tfl_r: max_isometric_force=411.2066 optimal_fiber_length=0.08536452
        tendon_slack_length=0.4039063 pennation_angle_at_optimal=0.05235988
      PathPoint P1: pelvis (-0.01941257 0.009036875 0.1344081)
      PathPoint P2: femur_r (0.03189595 -0.09188906 0.0647683)
      PathPoint P3: femur_r (0.01160839 -0.3740208 0.03515063)
      PathPoint P4: tibia_r (0.01003707 -0.04146097 0.0321558)
      FiberForceLengthCurve: strain_at_zero_force=0.07118385 strain_at_one_norm_force=0.7197196
          stiffness_at_low_force=0.2 stiffness_at_one_norm_force=3.08387 curviness=0.75
    Millard2012EquilibriumMuscle tibant_r: max_isometric_force=1227.452 optimal_fiber_length=0.06906574
        tendon_slack_length=0.2431569 pennation_angle_at_optimal=0.1951828
      PathPoint P1: tibia_r (0.01431212 -0.1326751 0.01505561)
      PathPoint P2: tibia_r (0.0233269 -0.1927429 0.01189579)
      PathPoint P3: tibia_r (0.02165405 -0.3700139 -0.01226753)
      PathPoint P4: calcn_r (0.1145167 0.01945943 -0.02834543)
      FiberForceLengthCurve: strain_at_zero_force=0.1892237 strain_at_one_norm_force=0.7076768
          stiffness_at_low_force=0.2 stiffness_at_one_norm_force=3.85763 curviness=0.75
    Millard2012EquilibriumMuscle tibpost_r: max_isometric_force=1730.154 optimal_fiber_length=0.0378366
        tendon_slack_length=0.2810515 pennation_angle_at_optimal=0.2264891
      PathPoint P1: tibia_r (-0.00381037 -0.1318661 0.009572392)
      PathPoint P2: tibia_r (-0.01524148 -0.3696094 -0.01626377)
      PathPoint P3: calcn_r (0.04095496 0.03651377 -0.02657965)
      PathPoint P4: calcn_r (0.07582069 0.0173823 -0.02611497)
      FiberForceLengthCurve: strain_at_zero_force=-0.1916705 strain_at_one_norm_force=0.6862359
          stiffness_at_low_force=0.2 stiffness_at_one_norm_force=2.278147 curviness=0.75
    Millard2012EquilibriumMuscle vasint_r: max_isometric_force=1697.361 optimal_fiber_length=0.09493906
        tendon_slack_length=0.1933302 pennation_angle_at_optimal=0.06309973
      PathPoint P1: femur_r (0.03146199 -0.177683 0.03363178)
      PathPoint P2: femur_r (0.03634402 -0.1924591 0.03091954)
      PathPoint P3: patella_r (0.005356347 0.04432839 -0.0005541049)
      PathPoint P4: patella_r (0.004617541 0.002281065 -0.0003601682)
      PathPoint P5: tibia_r (0.0302692 -0.06391056 0.0003996241)
      PathWrap: wrap_object=KnExt_at_fem_r method=hybrid
      FiberForceLengthCurve: strain_at_zero_force=0.1999153 strain_at_one_norm_force=0.8514363
          stiffness_at_low_force=0.2 stiffness_at_one_norm_force=3.06974 curviness=0.75
    Millard2012EquilibriumMuscle vaslat_r: max_isometric_force=5148.767 optimal_fiber_length=0.09560253
        tendon_slack_length=0.2121734 pennation_angle_at_optimal=0.2528673
      PathPoint P1: femur_r (0.005207501 -0.1712184 0.03786287)
      PathPoint P2: femur_r (0.02918371 -0.239281 0.04437225)
      PathPoint P3: patella_r (0.009512134 0.03906439 0.01302146)
      PathPoint P4: patella_r (0.004617541 0.002281065 0.006769315)
      PathPoint P5: tibia_r (0.03024132 -0.06409259 0.004749022)
      PathWrap: wrap_object=KnExt_at_fem_r method=hybrid
      FiberForceLengthCurve: strain_at_zero_force=0.1999632 strain_at_one_norm_force=0.8928189
          stiffness_at_low_force=0.2 stiffness_at_one_norm_force=2.886604 curviness=0.75
    Millard2012EquilibriumMuscle vasmed_r: max_isometric_force=2747.823 optimal_fiber_length=0.09299709
        tendon_slack_length=0.1920508 pennation_angle_at_optimal=0.4222225
      PathPoint P1: femur_r (0.01518855 -0.1938444 0.02039605)
      PathPoint P2: femur_r (0.0386223 -0.2557194 0.0009764065)
      PathPoint P3: patella_r (0.005818101 0.04109611 -0.01569964)
      PathPoint P4: patella_r (0.004617541 0.002281065 -0.007849819)
      PathPoint P5: tibia_r (0.02964653 -0.06428472 -0.00630105)
      PathWrap: wrap_object=KnExt_at_fem_r method=hybrid
      FiberForceLengthCurve: strain_at_zero_force=0.1999354 strain_at_one_norm_force=0.8518332
          stiffness_at_low_force=0.2 stiffness_at_one_norm_force=3.067965 curviness=0.75
    Millard2012EquilibriumMuscle addbrev_l: max_isometric_force=625.8197 optimal_fiber_length=0.1006896
        tendon_slack_length=0.03462149 pennation_angle_at_optimal=0.1147809
      PathPoint P1: pelvis (-0.0182293 -0.07828211 -0.0160087)
      PathPoint P2: femur_l (-0.002123282 -0.1079126 -0.02643486)
      PathWrap: wrap_object=AB_at_femshaft_l method=hybrid
      FiberForceLengthCurve: strain_at_zero_force=-0.1927643 strain_at_one_norm_force=0.5015522
          stiffness_at_low_force=0.2 stiffness_at_one_norm_force=2.880531 curviness=0.75
    Millard2012EquilibriumMuscle addlong_l: max_isometric_force=916.8 optimal_fiber_length=0.1007015
        tendon_slack_length=0.1226654 pennation_angle_at_optimal=0.1377704
      PathPoint P1: pelvis (-0.007234454 -0.07403489 -0.01962625)
      PathPoint P2: femur_l (0.01195408 -0.2189071 -0.01680578)
      PathWrap: wrap_object=AL_at_femshaft_l method=hybrid
      FiberForceLengthCurve: strain_at_zero_force=-0.1917374 strain_at_one_norm_force=0.5002995
          stiffness_at_low_force=0.2 stiffness_at_one_norm_force=2.890019 curviness=0.75
    Millard2012EquilibriumMuscle addmagDist_l: max_isometric_force=597.2951 optimal_fiber_length=0.1669544
        tendon_slack_length=0.0823284 pennation_angle_at_optimal=0.194705
      PathPoint P1: pelvis (-0.07066477 -0.1063221 -0.04139392)
      PathPoint P2: femur_l (0.01194346 -0.2400598 -0.02048967)
      PathWrap: wrap_object=AMdist_at_femshaft_l method=hybrid
      FiberForceLengthCurve: strain_at_zero_force=-3.981963e-9 strain_at_one_norm_force=0.7 stiffness_at_low_force=0.2
          stiffness_at_one_norm_force=2.857143 curviness=0.75
    Millard2012EquilibriumMuscle addmagIsch_l: max_isometric_force=597.2951 optimal_fiber_length=0.1448614
        tendon_slack_length=0.2006386 pennation_angle_at_optimal=0.1680443
      PathPoint P1: pelvis (-0.08553454 -0.1080626 -0.04335863)
      PathPoint P2: femur_l (0.005106493 -0.3548038 0.03474751)
      PathWrap: wrap_object=AMisch_at_condyles_l method=hybrid
      FiberForceLengthCurve: strain_at_zero_force=0.007389956 strain_at_one_norm_force=0.7000392
          stiffness_at_low_force=0.2 stiffness_at_one_norm_force=2.887464 curviness=0.75
    Millard2012EquilibriumMuscle addmagMid_l: max_isometric_force=597.2951 optimal_fiber_length=0.1343023
        tendon_slack_length=0.04547719 pennation_angle_at_optimal=0.2073076
      PathPoint P1: pelvis (-0.05025941 -0.1005592 -0.02966807)
      PathPoint P2: femur_l (0.002569171 -0.148517 -0.03102115)
      PathWrap: wrap_object=AMmid_at_femshaft_l method=hybrid
      FiberForceLengthCurve: strain_at_zero_force=-3.981963e-9 strain_at_one_norm_force=0.7 stiffness_at_low_force=0.2
          stiffness_at_one_norm_force=2.857143 curviness=0.75
    Millard2012EquilibriumMuscle addmagProx_l: max_isometric_force=597.2951 optimal_fiber_length=0.1082288
        tendon_slack_length=0.04132791 pennation_angle_at_optimal=0.3114833
      PathPoint P1: pelvis (-0.02956773 -0.08956639 -0.01418953)
      PathPoint P2: femur_l (-0.01621126 -0.07211853 -0.03399374)
      PathWrap: wrap_object=AMprox_at_femshaft_l method=hybrid
      FiberForceLengthCurve: strain_at_zero_force=-3.981963e-9 strain_at_one_norm_force=0.7 stiffness_at_low_force=0.2
          stiffness_at_one_norm_force=2.857143 curviness=0.75
    Millard2012EquilibriumMuscle bflh_l: max_isometric_force=1313.184 optimal_fiber_length=0.0910138
        tendon_slack_length=0.3032798 pennation_angle_at_optimal=0.1759182
      PathPoint P1: pelvis (-0.099259 -0.0991851 -0.06091622)
      PathPoint P2: tibia_l (-0.03148742 -0.03533103 -0.02363893)
      PathPoint P3: tibia_l (-0.0268157 -0.04593033 -0.02831065)
      FiberForceLengthCurve: strain_at_zero_force=0.1965607 strain_at_one_norm_force=0.7068715
          stiffness_at_low_force=0.2 stiffness_at_one_norm_force=3.91918 curviness=0.75
    Millard2012EquilibriumMuscle bfsh_l: max_isometric_force=557.1148 optimal_fiber_length=0.1026727
        tendon_slack_length=0.0984999 pennation_angle_at_optimal=0.2642232
      PathPoint P1: femur_l (0.005308205 -0.1930538 -0.0248424)
      PathPoint P2: tibia_l (-0.02812378 -0.04229629 -0.02971217)
      PathWrap: wrap_object=BF_at_gastroc_l method=hybrid
      FiberForceLengthCurve: strain_at_zero_force=0.115251 strain_at_one_norm_force=0.6888986
          stiffness_at_low_force=0.2 stiffness_at_one_norm_force=3.486462 curviness=0.75
    Millard2012EquilibriumMuscle edl_l: max_isometric_force=603.4982 optimal_fiber_length=0.06907004
        tendon_slack_length=0.3676512 pennation_angle_at_optimal=0.2182582
      PathPoint P1: tibia_l (-0.01494952 -0.1167943 -0.01915407)
      PathPoint P2: tibia_l (0.01532326 -0.3795562 -0.01046466)
      PathPoint P3: calcn_l (0.08914507 0.03882136 -0.0007474759)
      PathPoint P4: calcn_l (0.1567556 0.005931041 -0.01214648)
      PathPoint P5: toes_l (0.0002910067 0.005068344 -0.01429548)
      PathPoint P6: toes_l (0.042972 -0.0004313484 -0.02335862)
      FiberForceLengthCurve: strain_at_zero_force=0.1317998 strain_at_one_norm_force=0.7072192
          stiffness_at_low_force=0.2 stiffness_at_one_norm_force=3.475726 curviness=0.75
    Millard2012EquilibriumMuscle ehl_l: max_isometric_force=285.8675 optimal_fiber_length=0.07428761
        tendon_slack_length=0.3245567 pennation_angle_at_optimal=0.1972681
      PathPoint P1: tibia_l (-0.01308083 -0.156466 -0.01765912)
      PathPoint P2: tibia_l (0.006633849 -0.2936513 -0.01532326)
      PathPoint P3: tibia_l (0.0186869 -0.3727928 0.002616166)
      PathPoint P4: calcn_l (0.09409218 0.04194863 0.01971468)
      PathPoint P5: calcn_l (0.1254239 0.03332166 0.02401266)
      PathPoint P6: calcn_l (0.1682019 0.01498936 0.02616166)
      PathPoint P7: toes_l (0.02890667 0.004421321 0.02289145)
      PathPoint P8: toes_l (0.05461227 0.003666461 0.01737882)
      FiberForceLengthCurve: strain_at_zero_force=0.1051406 strain_at_one_norm_force=0.7178208
          stiffness_at_low_force=0.2 stiffness_at_one_norm_force=3.264346 curviness=0.75
    Millard2012EquilibriumMuscle fdl_l: max_isometric_force=423.177 optimal_fiber_length=0.04406478
        tendon_slack_length=0.3742274 pennation_angle_at_optimal=0.2248391
      PathPoint P1: tibia_l (-0.002148993 -0.1849327 0.001681821)
      PathPoint P2: tibia_l (-0.01644447 -0.3679474 0.01158588)
      PathPoint P3: calcn_l (0.04229298 0.03396869 0.02616166)
      PathPoint P4: calcn_l (0.06867759 0.01897933 0.02457327)
      PathPoint P5: calcn_l (0.1608297 -0.008734805 -0.0108384)
      PathPoint P6: toes_l (-0.001843043 -0.008411294 -0.01373487)
      PathPoint P7: toes_l (0.02764564 -0.007656434 -0.02008842)
      PathPoint P8: toes_l (0.04277799 -0.006470226 -0.02261115)
      FiberForceLengthCurve: strain_at_zero_force=-0.01205975 strain_at_one_norm_force=0.6997089
          stiffness_at_low_force=0.2 stiffness_at_one_norm_force=2.809902 curviness=0.75
    Millard2012EquilibriumMuscle fhl_l: max_isometric_force=907.8393 optimal_fiber_length=0.05198469
        tendon_slack_length=0.3495301 pennation_angle_at_optimal=0.2580255
      PathPoint P1: tibia_l (-0.02896469 -0.2183457 -0.0186869)
      PathPoint P2: tibia_l (-0.02261115 -0.370572 0.007101021)
      PathPoint P3: calcn_l (0.03627884 0.02976304 0.02251771)
      PathPoint P4: calcn_l (0.1006883 0.007332923 0.02391923)
      PathPoint P5: calcn_l (0.1674259 -0.005715366 0.02513388)
      PathPoint P6: toes_l (0.01503535 -0.006901575 0.02476014)
      PathPoint P7: toes_l (0.05451526 -0.01099938 0.01691164)
      FiberForceLengthCurve: strain_at_zero_force=0.01130745 strain_at_one_norm_force=0.7002505
          stiffness_at_low_force=0.2 stiffness_at_one_norm_force=2.902997 curviness=0.75
    Millard2012EquilibriumMuscle gaslat_l: max_isometric_force=1575.059 optimal_fiber_length=0.0585926
        tendon_slack_length=0.3747437 pennation_angle_at_optimal=0.2102268
      PathPoint P1: femur_l (-0.003184923 -0.3487954 -0.02940746)
      PathPoint P2: calcn_l (0.004268099 0.0334295 0.004952028)
      PathWrap: wrap_object=GasLat_at_shank_l method=hybrid
      PathWrap pathwrap_0: wrap_object=Gastroc_at_condyles_l method=hybrid
      FiberForceLengthCurve: strain_at_zero_force=-0.05983233 strain_at_one_norm_force=0.7435102
          stiffness_at_low_force=0.2 stiffness_at_one_norm_force=2.489598 curviness=0.75
    Millard2012EquilibriumMuscle gasmed_l: max_isometric_force=3115.515 optimal_fiber_length=0.0508975
        tendon_slack_length=0.397915 pennation_angle_at_optimal=0.1656816
      PathPoint P1: femur_l (0.008493128 -0.3464177 0.02208213)
      PathPoint P2: calcn_l (0.004268099 0.0334295 0.004952028)
      PathWrap: wrap_object=GasMed_at_shank_l method=hybrid
      PathWrap pathwrap_0: wrap_object=Gastroc_at_condyles_l method=hybrid
      FiberForceLengthCurve: strain_at_zero_force=0.1998358 strain_at_one_norm_force=0.7902371
          stiffness_at_low_force=0.2 stiffness_at_one_norm_force=3.387526 curviness=0.75
    Millard2012EquilibriumMuscle glmax1_l: max_isometric_force=983.7836 optimal_fiber_length=0.1311252
        tendon_slack_length=0.04356646 pennation_angle_at_optimal=0.3540118
      PathPoint P1: pelvis (-0.1174883 0.0287312 -0.05852531)
      PathPoint P2: pelvis (-0.1199698 -0.02015348 -0.08097907)
      PathPoint P3: femur_l (-0.04713686 -0.02981314 -0.03206156)
      PathPoint P4: femur_l (-0.02940746 -0.05176146 -0.04989713)
      PathWrap: wrap_object=Gmax1_at_pelvis_l method=hybrid
      FiberForceLengthCurve: strain_at_zero_force=-0.07534176 strain_at_one_norm_force=0.8468075
          stiffness_at_low_force=0.2 stiffness_at_one_norm_force=2.168846 curviness=0.75
    Millard2012EquilibriumMuscle glmax2_l: max_isometric_force=1406.046 optimal_fiber_length=0.1426566
        tendon_slack_length=0.06168505 pennation_angle_at_optimal=0.3673821
      PathPoint P1: pelvis (-0.1256963 0.007245259 -0.0480261)
      PathPoint P2: pelvis (-0.1282732 -0.05071681 -0.08451346)
      PathPoint P3: femur_l (-0.04777385 -0.05340758 -0.02675335)
      PathPoint P4: femur_l (-0.0165616 -0.09291456 -0.04448276)
      PathWrap: wrap_object=Gmax2_at_pelvis_l method=hybrid
      FiberForceLengthCurve: strain_at_zero_force=0.199275 strain_at_one_norm_force=0.7164175
          stiffness_at_low_force=0.2 stiffness_at_one_norm_force=3.867406 curviness=0.75
    Millard2012EquilibriumMuscle glmax3_l: max_isometric_force=947.7541 optimal_fiber_length=0.1575965
        tendon_slack_length=0.06579098 pennation_angle_at_optimal=0.3824161
      PathPoint P1: pelvis (-0.1240738 -0.04372139 -0.009355733)
      PathPoint P2: pelvis (-0.1214968 -0.1051812 -0.04521938)
      PathPoint P3: femur_l (-0.02983211 -0.1028828 -0.009979425)
      PathPoint P4: femur_l (-0.006369846 -0.1297695 -0.04363345)
      PathWrap: wrap_object=Gmax3_at_pelvis_l method=hybrid
      FiberForceLengthCurve: strain_at_zero_force=0.1989714 strain_at_one_norm_force=0.7121937
          stiffness_at_low_force=0.2 stiffness_at_one_norm_force=3.896947 curviness=0.75
    Millard2012EquilibriumMuscle glmed1_l: max_isometric_force=1093.467 optimal_fiber_length=0.06560914
        tendon_slack_length=0.05016567 pennation_angle_at_optimal=0.3165559
      PathPoint P1: pelvis (-0.04676626 0.0216525 -0.1195455)
      PathPoint P2: femur_l (-0.01486297 -0.01646124 -0.06263682)
      FiberForceLengthCurve: strain_at_zero_force=-3.729382e-9 strain_at_one_norm_force=0.7 stiffness_at_low_force=0.2
          stiffness_at_one_norm_force=2.857143 curviness=0.75
    Millard2012EquilibriumMuscle glmed2_l: max_isometric_force=765.0917 optimal_fiber_length=0.07326175
        tendon_slack_length=0.06548277 pennation_angle_at_optimal=0.3165559
      PathPoint P1: pelvis (-0.08112514 0.04580336 -0.08524113)
      PathPoint P2: femur_l (-0.0233561 -0.009145134 -0.0594519)
      FiberForceLengthCurve: strain_at_zero_force=0.06397124 strain_at_one_norm_force=0.7014005
          stiffness_at_low_force=0.2 stiffness_at_one_norm_force=3.137603 curviness=0.75
    Millard2012EquilibriumMuscle glmed3_l: max_isometric_force=871.1993 optimal_fiber_length=0.07092702
        tendon_slack_length=0.04394837 pennation_angle_at_optimal=0.3165559
      PathPoint P1: pelvis (-0.09544135 0.01332461 -0.06652966)
      PathPoint P2: femur_l (-0.03280471 -0.004298213 -0.054993)
      FiberForceLengthCurve: strain_at_zero_force=0.1252157 strain_at_one_norm_force=0.7030514
          stiffness_at_low_force=0.2 stiffness_at_one_norm_force=3.461191 curviness=0.75
    Millard2012EquilibriumMuscle glmin1_l: max_isometric_force=374.0459 optimal_fiber_length=0.06966097
        tendon_slack_length=0.01653196 pennation_angle_at_optimal=0.1745329
      PathPoint P1: pelvis (-0.0286324 0 -0.1226641)
      PathPoint P2: femur_l (0.005308205 -0.0137177 -0.0594519)
      FiberForceLengthCurve: strain_at_zero_force=-3.729382e-9 strain_at_one_norm_force=0.7 stiffness_at_low_force=0.2
          stiffness_at_one_norm_force=2.857143 curviness=0.75
    Millard2012EquilibriumMuscle glmin2_l: max_isometric_force=394.8197 optimal_fiber_length=0.05925525
        tendon_slack_length=0.02761618 pennation_angle_at_optimal=0
      PathPoint P1: pelvis (-0.05879187 0.008327884 -0.1049921)
      PathPoint P2: femur_l (0.004246564 -0.008230621 -0.05520533)
      FiberForceLengthCurve: strain_at_zero_force=0.003039474 strain_at_one_norm_force=0.7000285
          stiffness_at_low_force=0.2 stiffness_at_one_norm_force=2.869486 curviness=0.75
    Millard2012EquilibriumMuscle glmin3_l: max_isometric_force=446.7738 optimal_fiber_length=0.03252953
        tendon_slack_length=0.04354891 pennation_angle_at_optimal=0.01745329
      PathPoint P1: pelvis (-0.07530322 -0.01290822 -0.08295417)
      PathPoint P2: femur_l (-0.004246564 -0.0009145134 -0.05414369)
      FiberForceLengthCurve: strain_at_zero_force=0.007461173 strain_at_one_norm_force=0.7002322
          stiffness_at_low_force=0.2 stiffness_at_one_norm_force=2.886957 curviness=0.75
    Millard2012EquilibriumMuscle grac_l: max_isometric_force=281.3115 optimal_fiber_length=0.2140986
        tendon_slack_length=0.1616678 pennation_angle_at_optimal=0.1720016
      PathPoint P1: pelvis (-0.04520102 -0.1076962 -0.02553076)
      PathPoint P2: tibia_l (-0.01721063 -0.04799972 0.02766595)
      PathPoint P3: tibia_l (0.001663134 -0.07027846 0.01469725)
      PathWrap: wrap_object=GR_at_condyles_l method=hybrid
      FiberForceLengthCurve: strain_at_zero_force=-0.1969779 strain_at_one_norm_force=0.8027483
          stiffness_at_low_force=0.2 stiffness_at_one_norm_force=2.000548 curviness=0.75
    Millard2012EquilibriumMuscle iliacus_l: max_isometric_force=1021.141 optimal_fiber_length=0.09504909
        tendon_slack_length=0.0857053 pennation_angle_at_optimal=0.279914
      PathPoint P1: pelvis (-0.05774201 0.02573316 -0.08763203)
      PathPoint P2: pelvis (-0.01288458 -0.04638631 -0.07858816)
      PathPoint P3: femur_l (-0.002441774 -0.05167001 -0.01475681)
      PathPoint P4: femur_l (-0.01295202 -0.05825451 -0.02080816)
      PathWrap: wrap_object=IL_at_brim_l method=hybrid range=(2 3)
      FiberForceLengthCurve: strain_at_zero_force=-0.1703103 strain_at_one_norm_force=0.5005449
          stiffness_at_low_force=0.2 stiffness_at_one_norm_force=2.98127 curviness=0.75
    Millard2012EquilibriumMuscle perbrev_l: max_isometric_force=521.2016 optimal_fiber_length=0.04533411
        tendon_slack_length=0.1473134 pennation_angle_at_optimal=0.2052361
      PathPoint P1: tibia_l (-0.02270458 -0.2555947 -0.02345206)
      PathPoint P2: tibia_l (-0.03167429 -0.392982 -0.02326519)
      PathPoint P3: tibia_l (-0.02662883 -0.4041869 -0.0238258)
      PathPoint P4: calcn_l (0.04568806 0.02911602 -0.02177024)
      PathPoint P5: calcn_l (0.06567052 0.02361633 -0.03204803)
      FiberForceLengthCurve: strain_at_zero_force=-0.04234068 strain_at_one_norm_force=0.6987541
          stiffness_at_low_force=0.2 stiffness_at_one_norm_force=2.69871 curviness=0.75
    Millard2012EquilibriumMuscle perlong_l: max_isometric_force=1115.371 optimal_fiber_length=0.05056016
        tendon_slack_length=0.3306523 pennation_angle_at_optimal=0.2479525
      PathPoint P1: tibia_l (-0.0186869 -0.1385986 -0.02634853)
      PathPoint P2: tibia_l (-0.02961873 -0.3936886 -0.02214397)
      PathPoint P3: tibia_l (-0.02541418 -0.4051964 -0.02242428)
      PathPoint P4: calcn_l (0.04248698 0.02480253 -0.02064902)
      PathPoint P5: calcn_l (0.06605853 0.01143073 -0.0265354)
      PathPoint P6: calcn_l (0.08264592 0.00744076 -0.01102527)
      PathPoint P7: calcn_l (0.1166937 0.009166154 0.01719195)
      FiberForceLengthCurve: strain_at_zero_force=-0.1323481 strain_at_one_norm_force=0.6924185
          stiffness_at_low_force=0.2 stiffness_at_one_norm_force=2.424929 curviness=0.75
    Millard2012EquilibriumMuscle piri_l: max_isometric_force=1029.787 optimal_fiber_length=0.02538326
        tendon_slack_length=0.1121806 pennation_angle_at_optimal=0.1745329
      PathPoint P1: pelvis (-0.09716884 -0.005438108 -0.014044)
      PathPoint P2: pelvis (-0.09736926 -0.02553329 -0.06332792)
      PathPoint P3: femur_l (-0.01571229 -0.003292248 -0.04639371)
      FiberForceLengthCurve: strain_at_zero_force=0.09922992 strain_at_one_norm_force=0.7028348
          stiffness_at_low_force=0.2 stiffness_at_one_norm_force=3.313426 curviness=0.75
    Millard2012EquilibriumMuscle psoas_l: max_isometric_force=1426.79 optimal_fiber_length=0.1040593
        tendon_slack_length=0.08860898 pennation_angle_at_optimal=0.2155251
      PathPoint P1: pelvis (-0.05783746 0.05163288 -0.04054151)
      PathPoint P2: pelvis (-0.01956548 -0.05446436 -0.0681929)
      PathPoint P3: femur_l (-0.01401366 -0.04270778 -0.004883549)
      PathPoint P4: femur_l (-0.02494856 -0.0479205 -0.009342441)
      PathWrap: wrap_object=PS_at_brim_l method=hybrid range=(2 3)
      FiberForceLengthCurve: strain_at_zero_force=-0.09543841 strain_at_one_norm_force=0.5010382
          stiffness_at_low_force=0.2 stiffness_at_one_norm_force=3.353023 curviness=0.75
    Millard2012EquilibriumMuscle recfem_l: max_isometric_force=2191.741 optimal_fiber_length=0.07013654
        tendon_slack_length=0.4144372 pennation_angle_at_optimal=0.2170149
      PathPoint P1: pelvis (-0.02290592 -0.03231219 -0.09698777)
      PathPoint P2: patella_l (0.009145134 0.04481116 -0.0006401594)
      PathPoint P3: patella_l (0.01106561 0.03996424 0.0009145134)
      PathPoint P4: patella_l (0.004572567 0.002258848 -2.74354e-5)
      PathPoint P5: tibia_l (0.03045964 -0.06371698 0.0004391421)
      PathWrap: wrap_object=KnExt_at_fem_l method=hybrid
      FiberForceLengthCurve: strain_at_zero_force=0.1999726 strain_at_one_norm_force=0.8999622
          stiffness_at_low_force=0.2 stiffness_at_one_norm_force=2.857186 curviness=0.75
    Millard2012EquilibriumMuscle sart_l: max_isometric_force=249.4131 optimal_fiber_length=0.3714849
        tendon_slack_length=0.1143029 pennation_angle_at_optimal=0.02613542
      PathPoint P1: pelvis (-0.01861106 -0.0129915 -0.1097739)
      PathPoint P2: femur_l (-0.003184923 -0.3262984 0.04469509)
      PathPoint P3: tibia_l (-0.02345206 -0.04047926 0.03410359)
      PathPoint P4: tibia_l (-0.01485608 -0.06046653 0.02466671)
      PathPoint P5: tibia_l (0.01270709 -0.08176609 0.002429297)
      FiberForceLengthCurve: strain_at_zero_force=-0.1984568 strain_at_one_norm_force=0.7212821
          stiffness_at_low_force=0.2 stiffness_at_one_norm_force=2.17453 curviness=0.75
    Millard2012EquilibriumMuscle semimem_l: max_isometric_force=2200.987 optimal_fiber_length=0.06425471
        tendon_slack_length=0.3236817 pennation_angle_at_optimal=0.2545615
      PathPoint P1: pelvis (-0.09420061 -0.09493788 -0.06382689)
      PathPoint P2: tibia_l (-0.027096 -0.04209439 0.01831316)
      PathWrap: wrap_object=SM_at_condyles_l method=hybrid
      FiberForceLengthCurve: strain_at_zero_force=0.1994426 strain_at_one_norm_force=0.7353994
          stiffness_at_low_force=0.2 stiffness_at_one_norm_force=3.731644 curviness=0.75
    Millard2012EquilibriumMuscle semiten_l: max_isometric_force=591.2951 optimal_fiber_length=0.1811393
        tendon_slack_length=0.2320075 pennation_angle_at_optimal=0.241295
      PathPoint P1: pelvis (-0.09906812 -0.1043484 -0.05353558)
      PathPoint P2: tibia_l (-0.02915156 -0.05128046 0.0213965)
      PathPoint P3: tibia_l (0.001775255 -0.07803109 0.01093184)
      PathWrap: wrap_object=ST_at_condyles_l method=hybrid
      FiberForceLengthCurve: strain_at_zero_force=0.007279189 strain_at_one_norm_force=0.7803276
          stiffness_at_low_force=0.2 stiffness_at_one_norm_force=2.58716 curviness=0.75
    Millard2012EquilibriumMuscle soleus_l: max_isometric_force=6194.843 optimal_fiber_length=0.04405641
        tendon_slack_length=0.2771107 pennation_angle_at_optimal=0.3814289
      PathPoint P1: tibia_l (-0.007101021 -0.09246634 -0.00915658)
      PathPoint P2: calcn_l (0.004268099 0.0334295 0.004952028)
      FiberForceLengthCurve: strain_at_zero_force=0.1569032 strain_at_one_norm_force=0.8506533
          stiffness_at_low_force=0.2 stiffness_at_one_norm_force=2.882882 curviness=0.75
    Millard2012EquilibriumMuscle tfl_l: max_isometric_force=411.2066 optimal_fiber_length=0.08469373
        tendon_slack_length=0.4007324 pennation_angle_at_optimal=0.05235988
      PathPoint P1: pelvis (-0.01908827 0.009160672 -0.1340988)
      PathPoint P2: femur_l (0.03121225 -0.09099409 -0.06337997)
      PathPoint P3: femur_l (0.01135956 -0.3703779 -0.03439717)
      PathPoint P4: tibia_l (0.01009093 -0.04138777 -0.03232833)
      FiberForceLengthCurve: strain_at_zero_force=0.07118385 strain_at_one_norm_force=0.7197196
          stiffness_at_low_force=0.2 stiffness_at_one_norm_force=3.08387 curviness=0.75
    Millard2012EquilibriumMuscle tibant_l: max_isometric_force=1227.452 optimal_fiber_length=0.06878443
        tendon_slack_length=0.2421666 pennation_angle_at_optimal=0.1951828
      PathPoint P1: tibia_l (0.01438891 -0.1324409 -0.01513639)
      PathPoint P2: tibia_l (0.02345206 -0.1924027 -0.01195961)
      PathPoint P3: tibia_l (0.02177024 -0.3693606 0.01233335)
      PathPoint P4: calcn_l (0.1131046 0.019195 0.02849752)
      FiberForceLengthCurve: strain_at_zero_force=0.1892237 strain_at_one_norm_force=0.7076768
          stiffness_at_low_force=0.2 stiffness_at_one_norm_force=3.85763 curviness=0.75
    Millard2012EquilibriumMuscle tibpost_l: max_isometric_force=1730.154 optimal_fiber_length=0.03777015
        tendon_slack_length=0.2805579 pennation_angle_at_optimal=0.2264891
      PathPoint P1: tibia_l (-0.003830814 -0.1316333 -0.009623753)
      PathPoint P2: tibia_l (-0.01532326 -0.3689569 0.01635104)
      PathPoint P3: calcn_l (0.04044994 0.03601759 0.02672226)
      PathPoint P4: calcn_l (0.07488574 0.0171461 0.02625509)
      FiberForceLengthCurve: strain_at_zero_force=-0.1916705 strain_at_one_norm_force=0.6862359
          stiffness_at_low_force=0.2 stiffness_at_one_norm_force=2.278147 curviness=0.75
    Millard2012EquilibriumMuscle vasint_l: max_isometric_force=1697.361 optimal_fiber_length=0.09395666
        tendon_slack_length=0.1913297 pennation_angle_at_optimal=0.06309973
      PathPoint P1: femur_l (0.03078759 -0.1759524 -0.03291087)
      PathPoint P2: femur_l (0.03556497 -0.1905846 -0.03025677)
      PathPoint P3: patella_l (0.005304178 0.04389664 0.0005487081)
      PathPoint P4: patella_l (0.004572567 0.002258848 0.0003566602)
      PathPoint P5: tibia_l (0.03043161 -0.06379774 -0.0004017683)
      PathWrap: wrap_object=KnExt_at_fem_l method=hybrid
      FiberForceLengthCurve: strain_at_zero_force=0.1999153 strain_at_one_norm_force=0.8514363
          stiffness_at_low_force=0.2 stiffness_at_one_norm_force=3.06974 curviness=0.75
    Millard2012EquilibriumMuscle vaslat_l: max_isometric_force=5148.767 optimal_fiber_length=0.09455425
        tendon_slack_length=0.209847 pennation_angle_at_optimal=0.2528673
      PathPoint P1: femur_l (0.005095877 -0.1695508 -0.03705127)
      PathPoint P2: femur_l (0.02855814 -0.2369504 -0.04342112)
      PathPoint P3: patella_l (0.009419488 0.03868392 -0.01289464)
      PathPoint P4: patella_l (0.004572567 0.002258848 -0.006703383)
      PathPoint P5: tibia_l (0.03040358 -0.06397944 -0.004774503)
      PathWrap: wrap_object=KnExt_at_fem_l method=hybrid
      FiberForceLengthCurve: strain_at_zero_force=0.1999632 strain_at_one_norm_force=0.8928189
          stiffness_at_low_force=0.2 stiffness_at_one_norm_force=2.886604 curviness=0.75
    Millard2012EquilibriumMuscle vasmed_l: max_isometric_force=2747.823 optimal_fiber_length=0.0920085
        tendon_slack_length=0.1900092 pennation_angle_at_optimal=0.4222225
      PathPoint P1: femur_l (0.01486297 -0.1919564 -0.01995885)
      PathPoint P2: femur_l (0.03779442 -0.2532288 -0.0009554769)
      PathPoint P3: patella_l (0.005761435 0.04069585 0.01554673)
      PathPoint P4: patella_l (0.004572567 0.002258848 0.007773364)
      PathPoint P5: tibia_l (0.0298056 -0.06417124 0.006334859)
      PathWrap: wrap_object=KnExt_at_fem_l method=hybrid
      FiberForceLengthCurve: strain_at_zero_force=0.1999354 strain_at_one_norm_force=0.8518332
          stiffness_at_low_force=0.2 stiffness_at_one_norm_force=3.067965 curviness=0.75
  MarkerSet:
    Marker R.ASIS: pelvis (0.009743034 -0.004440122 0.1177738) fixed=true
    Marker L.ASIS: pelvis (0.009743034 -0.00444012 -0.1177741) fixed=true
    Marker R.PSIS: pelvis (-0.1457599 0.02579395 0.04734354) fixed=true
    Marker L.PSIS: pelvis (-0.1457596 0.02579393 -0.0473435) fixed=true
    Marker R.Iliac.Crest: pelvis (-0.04782609 0.05386916 0.1433327)
    Marker L.Iliac.Crest: pelvis (-0.05739662 0.04341885 -0.1453235)
    Marker R.Thigh.Top.Lateral: femur_r (-0.01148992 -0.1692384 0.08967896)
    Marker R.Thigh.Bottom.Lateral: femur_r (-0.008547415 -0.2794606 0.0817238)
    Marker R.Thigh.Top.Medial: femur_r (-0.06769803 -0.1675249 0.05009537)
    Marker R.Thigh.Bottom.Medial: femur_r (-0.0672454 -0.2769456 0.03979938)
    Marker R.Shank.Top.Lateral: tibia_r (-0.03808546 -0.2211439 0.0687875)
    Marker R.Shank.Bottom.Lateral: tibia_r (-0.02098915 -0.2994811 0.05573128)
    Marker R.Shank.Top.Medial: tibia_r (-0.07249911 -0.2215259 0.0274376)
    Marker R.Shank.Bottom.Medial: tibia_r (-0.0584498 -0.2994674 0.0142482)
    Marker R.Heel.Top: calcn_r (-0.0152823 0.05399875 -0.007308873)
    Marker R.Heel.Bottom: calcn_r (-0.02922033 0.007377453 -0.006934761) fixed=true
    Marker R.Heel.Lateral: calcn_r (0.004821884 0.02748763 0.0344118)
    Marker L.Thigh.Top.Lateral: femur_l (0.003662064 -0.1594062 -0.09581715)
    Marker L.Thigh.Top.Medial: femur_l (-0.0559603 -0.1597884 -0.05970271)
    Marker L.Thigh.Bottom.Lateral: femur_l (0.008377837 -0.2693636 -0.08804512)
    Marker L.Thigh.Bottom.Medial: femur_l (-0.05658575 -0.2687979 -0.05506415)
    Marker L.Shank.Top.Lateral: tibia_l (-0.03403764 -0.22693 -0.07069746)
    Marker L.Shank.Bottom.Lateral: tibia_l (-0.01802758 -0.3045583 -0.05418166)
    Marker L.Shank.Top.Medial: tibia_l (-0.06986473 -0.2241407 -0.03155473)
    Marker L.Shank.Bottom.Medial: tibia_l (-0.05570672 -0.3071824 -0.01966423)
    Marker L.Heel.Top: calcn_l (-0.0170152 0.05411665 0.008254951)
    Marker L.Heel.Bottom: calcn_l (-0.02885998 0.007277203 0.006971971) fixed=true
    Marker L.Heel.Lateral: calcn_l (0.0006322014 0.02482056 -0.03479971)
    Marker R.GTR: femur_r (-0.02552207 -0.02934419 0.08197193) fixed=true
    Marker R.Knee: femur_r (0.010784 -0.3627873 0.05800749) fixed=true
    Marker R.Knee.Medial: femur_r (0.010784 -0.3761686 -0.05962442) fixed=true
    Marker R.HF: tibia_r (-0.011748 -0.05625232 0.05539109) fixed=true
    Marker R.TT: tibia_r (0.04798484 -0.06029245 0.006028502) fixed=true
    Marker R.Ankle: tibia_r (-0.004648418 -0.3781942 0.04502912) fixed=true
    Marker R.Ankle.Medial: tibia_r (0.00526223 -0.3802162 -0.03914109) fixed=true
    Marker R.MT1: toes_r (0.01810347 0.0404545 -0.04054673)
    Marker R.MT5: toes_r (-0.0180517 0.02262473 0.06749127)
    Marker R.MT2: toes_r (0.02067433 0.04715768 0.008544942)
    Marker L.GTR: femur_l (-0.02497495 -0.02905839 -0.08021485) fixed=true
    Marker L.Knee: femur_l (0.01055284 -0.3592538 -0.05676403) fixed=true
    Marker L.Knee.Medial: femur_l (0.01055284 -0.3725051 0.0583463) fixed=true
    Marker L.HF: tibia_l (-0.01181105 -0.05615301 -0.05568827) fixed=true
    Marker L.TT: tibia_l (0.04824219 -0.060186 0.006060853) fixed=true
    Marker L.Ankle: tibia_l (-0.00467336 -0.3775261 -0.04527069) fixed=true
    Marker L.Ankle.Medial: tibia_l (0.005290466 -0.3795451 0.03935115) fixed=true
    Marker L.MT1: toes_l (0.02018732 0.03998321 0.03950226)
    Marker L.MT5: toes_l (-0.01944164 0.02332935 -0.06767931)
    Marker L.MT2: toes_l (0.01845017 0.04885822 -0.008670697)
