# OpenSim document version 40500
Model Denton2023_LowerLimb_Camargo2021:
  gravity: 0 -9.80665 0
  length_units: meters
  force_units: N
  credits:
    A 2-D model 11 degrees of freedom and 18 muscles for simulating walking. This model was assembled by Vinh Nguyen and Russel Johnson and includes elements from Delp et al. (1990), Yamaguchi Zajac (1989), Anderson Pandy (1999), Sasaki et al. (2009) and Porsa et al. (2016). The CustomJoint and moving muscle insertion points for the knee joint are due to Ajay Seth. For use with Moco, Brian Umberger replaced the muscles with DeGrooteFregly2016Muscles and the ground contact elements with SmoothSphereHalfSpaceForces. License: Creative Commons (CCBY 3.0). You are free to distribute, remix, tweak, and build upon this work, even commercially, as long as you credit us for the original creation.
  publications:
    Nguyen, V.Q.,Johnson, R.T., Sup, F.C., Umberger, B.R. Bilevel Optimization for Cost Function Determination in Dynamic Simulation of Human Gait. IEEE Transactions on Neural Systems and Rehabilitation Engineering, vol 27 pp 1426-1435, 2019
  Ground
  BodySet:
    Body pelvis: mass=46.0136 [kg] mass_center=(-0.0714457 0 0) inertia=(0.133411 0.113036 0.0751413 0 0 0)
        meshes=(sacrum.vtp pelvis.vtp l_pelvis.vtp)
    Body femur_r: mass=9.3876 mass_center=(0 -0.187044 0) inertia=(0.205311 0.0538194 0.216504 0 0 0)
        meshes=r_femur.vtp
    Body tibia_r: mass=3.7075 mass_center=(0 -0.191928 0) inertia=(0.0671406 0.00679399 0.0680731 0 0 0)
        meshes=(r_tibia.vtp r_fibula.vtp)
    Body talus_r: mass=0.1 mass_center=(0 0 0) inertia=(0.00125583 0.00125583 0.00125583 0 0 0) meshes=talus.vtp
    Body calcn_r: mass=1.25 mass_center=(0.101933 0.0305799 0) inertia=(0.00175816 0.00489774 0.0051489 0 0 0)
        meshes=foot.vtp
    Body toes_r: mass=0.2166 mass_center=(0.0335112 0.00581119 -0.0169492)
        inertia=(9.7257e-5 0.000194514 9.7257e-5 0 0 0) meshes=bofoot.vtp
    Body femur_l: mass=9.3876 mass_center=(0 -0.187044 0) inertia=(0.205311 0.0538194 0.216504 0 0 0)
        meshes=l_femur.vtp
    Body tibia_l: mass=3.7075 mass_center=(0 -0.191928 0) inertia=(0.0671406 0.00679399 0.0680731 0 0 0)
        meshes=(l_tibia.vtp l_fibula.vtp)
    Body talus_l: mass=0.1 mass_center=(0 0 0) inertia=(0.00125583 0.00125583 0.00125583 0 0 0) meshes=l_talus.vtp
    Body calcn_l: mass=1.25 mass_center=(0.101933 0.0305799 0) inertia=(0.00175816 0.00489774 0.0051489 0 0 0)
        meshes=l_foot.vtp
    Body toes_l: mass=0.2166 mass_center=(0.0335112 0.00581119 0.0169492)
        inertia=(9.7257e-5 0.000194514 9.7257e-5 0 0 0) meshes=l_bofoot.vtp
  JointSet:
    CustomJoint ground_pelvis: socket_parent_frame=ground_offset socket_child_frame=pelvis_offset
      Coordinate pelvis_tilt: default_value=0 range=(-1.570796 1.570796) clamped=true
      Coordinate pelvis_list: default_value=0 range=(0 6.283185) clamped=true
      Coordinate pelvis_rotation: default_value=0 range=(-1.570796 1.570796) clamped=true
      Coordinate pelvis_tx: default_value=0 range=(-10 10) clamped=true
      Coordinate pelvis_ty: default_value=0.94 range=(-1 5) clamped=true
      Coordinate pelvis_tz: default_value=0 range=(-10 10) clamped=true
      PhysicalOffsetFrame ground_offset: socket_parent=/ground translation=(0 0 0) [meters]
      PhysicalOffsetFrame pelvis_offset: socket_parent=/bodyset/pelvis translation=(0 0 0)
      SpatialTransform:
        TransformAxis rotation1: coordinates=pelvis_tilt axis=(0 0 1) LinearFunction(coefficients=1 0)
        TransformAxis rotation2: coordinates=pelvis_list axis=(1 0 0) LinearFunction(coefficients=1 0)
        TransformAxis rotation3: coordinates=pelvis_rotation axis=(0 1 0) LinearFunction(coefficients=1 0)
        TransformAxis translation1: coordinates=pelvis_tx axis=(1 0 0) LinearFunction(coefficients=1 0)
        TransformAxis translation2: coordinates=pelvis_ty axis=(0 1 0) LinearFunction(coefficients=1 0)
        TransformAxis translation3: coordinates=pelvis_tz axis=(0 0 1) LinearFunction(coefficients=1 0)
    CustomJoint hip_r: socket_parent_frame=pelvis_offset socket_child_frame=femur_r_offset
      Coordinate hip_flexion_r: default_value=0 range=(-2.094395 2.094395) clamped=false
      Coordinate hip_adduction_r: default_value=0 range=(-0.8726646 0.5235988) clamped=true
      Coordinate hip_rotation_r: default_value=0 range=(-0.6981317 0.6981317) clamped=true
      PhysicalOffsetFrame pelvis_offset: socket_parent=/bodyset/pelvis translation=(-0.056276 -0.07849 0.07726)
      PhysicalOffsetFrame femur_r_offset: socket_parent=/bodyset/femur_r translation=(0 0 0)
      SpatialTransform: axes_held_at_zero=(translation1 translation2 translation3)
        TransformAxis rotation1: coordinates=hip_flexion_r axis=(0 0 1) LinearFunction(coefficients=1 0)
        TransformAxis rotation2: coordinates=hip_adduction_r axis=(1 0 0) LinearFunction(coefficients=1 0)
        TransformAxis rotation3: coordinates=hip_rotation_r axis=(0 1 0) LinearFunction(coefficients=1 0)
    PinJoint knee_r: socket_parent_frame=femur_r_offset socket_child_frame=tibia_r_offset
      Coordinate knee_angle_r: default_value=0 range=(-2.094395 0)
      PhysicalOffsetFrame femur_r_offset: socket_parent=/bodyset/femur_r translation=(0 -0.40796 -0.00275)
      PhysicalOffsetFrame tibia_r_offset: socket_parent=/bodyset/tibia_r translation=(0 0 0)
    PinJoint ankle_r: socket_parent_frame=tibia_r_offset socket_child_frame=talus_r_offset
      Coordinate ankle_angle_r: default_value=-0.3490659 range=(-1.570796 1.570796) clamped=false
      PhysicalOffsetFrame tibia_r_offset: socket_parent=/bodyset/tibia_r translation=(-0.01 -0.4 0)
      PhysicalOffsetFrame talus_r_offset: socket_parent=/bodyset/talus_r translation=(0 0 0)
    WeldJoint subtalar_r: socket_parent_frame=talus_r_offset socket_child_frame=calcn_r_offset
      PhysicalOffsetFrame talus_r_offset: socket_parent=/bodyset/talus_r translation=(-0.04877 -0.04195 0.00792)
      PhysicalOffsetFrame calcn_r_offset: socket_parent=/bodyset/calcn_r translation=(0 0 0)
    PinJoint mtp_r: socket_parent_frame=calcn_r_offset socket_child_frame=toes_r_offset
      Coordinate mtp_angle_r: default_value=0 range=(-1.570796 1.570796) clamped=false locked=true
      PhysicalOffsetFrame calcn_r_offset: socket_parent=/bodyset/calcn_r translation=(0.1788 -0.002 0.00108)
      PhysicalOffsetFrame toes_r_offset: socket_parent=/bodyset/toes_r translation=(0 0 0)
    CustomJoint hip_l: socket_parent_frame=pelvis_offset socket_child_frame=femur_l_offset
      Coordinate hip_flexion_l: default_value=0 range=(-2.094395 2.094395) clamped=false
      Coordinate hip_adduction_l: default_value=0 range=(-0.8726646 0.5235988) clamped=true
      Coordinate hip_rotation_l: default_value=0 range=(-0.6981317 0.6981317) clamped=true
      PhysicalOffsetFrame pelvis_offset: socket_parent=/bodyset/pelvis translation=(-0.056276 -0.07849 -0.07726)
      PhysicalOffsetFrame femur_l_offset: socket_parent=/bodyset/femur_l translation=(0 0 0)
      SpatialTransform: axes_held_at_zero=(translation1 translation2 translation3)
        TransformAxis rotation1: coordinates=hip_flexion_l axis=(0 0 1) LinearFunction(coefficients=1 0)
        TransformAxis rotation2: coordinates=hip_adduction_l axis=(1 0 0) LinearFunction(coefficients=-1 0)
        TransformAxis rotation3: coordinates=hip_rotation_l axis=(0 1 0) LinearFunction(coefficients=-1 0)
    PinJoint knee_l: socket_parent_frame=femur_l_offset socket_child_frame=tibia_l_offset
      Coordinate knee_angle_l: default_value=0 range=(-2.094395 0)
      PhysicalOffsetFrame femur_l_offset: socket_parent=/bodyset/femur_l translation=(0 -0.40796 0.00275)
      PhysicalOffsetFrame tibia_l_offset: socket_parent=/bodyset/tibia_l translation=(0 0 0)
    PinJoint ankle_l: socket_parent_frame=tibia_l_offset socket_child_frame=talus_l_offset
      Coordinate ankle_angle_l: default_value=-0.3490659 range=(-1.047198 1.047198) clamped=false
      PhysicalOffsetFrame tibia_l_offset: socket_parent=/bodyset/tibia_l translation=(-0.01 -0.4 0)
      PhysicalOffsetFrame talus_l_offset: socket_parent=/bodyset/talus_l translation=(0 0 0)
    WeldJoint subtalar_l: socket_parent_frame=talus_l_offset socket_child_frame=calcn_l_offset
      PhysicalOffsetFrame talus_l_offset: socket_parent=/bodyset/talus_l translation=(-0.04877 -0.04195 -0.00792)
      PhysicalOffsetFrame calcn_l_offset: socket_parent=/bodyset/calcn_l translation=(0 0 0)
    PinJoint mtp_l: socket_parent_frame=calcn_l_offset socket_child_frame=toes_l_offset
      Coordinate mtp_angle_l: default_value=0 range=(-1.570796 1.570796) clamped=false locked=true
      PhysicalOffsetFrame calcn_l_offset: socket_parent=/bodyset/calcn_l translation=(0.1788 -0.002 -0.00108)
      PhysicalOffsetFrame toes_l_offset: socket_parent=/bodyset/toes_l translation=(0 0 0)
  ForceSet:
    DeGrooteFregly2016Muscle [values shared by the 18 below unless stated]: min_control=0.01 max_control=1
        max_contraction_velocity=10 activation_time_constant=0.055 deactivation_time_constant=0.065
        default_activation=0.05 fiber_damping=0.1 passive_fiber_strain_at_one_norm_force=0.7
        tendon_strain_at_one_norm_force=0.049 tendon_compliance_dynamics_mode=implicit
    DeGrooteFregly2016Muscle hamstrings_r: max_isometric_force=3373.863 optimal_fiber_length=0.121137
        tendon_slack_length=0.346982 pennation_angle_at_optimal=0.2253 [radians]
      PathPoint bifemlh_r-P1: pelvis (-0.127289 -0.103652 0.0701723)
      PathPoint bifemlh_r-P2: tibia_r (-0.0309429 -0.0370081 0.0302542)
      PathPoint bifemlh_r-P3: tibia_r (-0.0240553 -0.0578766 0.0352605)
    DeGrooteFregly2016Muscle bifemsh_r: max_isometric_force=586.7953 optimal_fiber_length=0.1103
        tendon_slack_length=0.158 pennation_angle_at_optimal=0.2642232
      PathPoint P1: femur_r (0.00550129 -0.232265 0.025746)
      PathPoint P2: tibia_r (-0.0309429 -0.0370081 0.0302542)
      PathPoint P3: tibia_r (-0.0240553 -0.0578766 0.0352605)
    DeGrooteFregly2016Muscle glut_max_r: max_isometric_force=3491.829 optimal_fiber_length=0.1569
        tendon_slack_length=0.082776 pennation_angle_at_optimal=0.3673821
      PathPoint glut_max2_r-P1: pelvis (-0.136322 0.0177856 0.0568938)
      PathPoint glut_max2_r-P2: pelvis (-0.139052 -0.0525485 0.0923644)
      PathPoint glut_max2_r-P3: femur_r (-0.046871 -0.0583136 0.0322376)
      PathPoint glut_max2_r-P4: femur_r (-0.017164 -0.111786 0.0461008)
    DeGrooteFregly2016Muscle iliopsoas_r: max_isometric_force=2598.633 optimal_fiber_length=0.112927
        tendon_slack_length=0.15346 pennation_angle_at_optimal=0.2391189
      PathPoint psoas_r-P1: pelvis (-0.0653824 0.0896355 0.0292048)
      PathPoint psoas_r-P2: pelvis (-0.024051 -0.0576012 0.0767005)
      ConditionalPathPoint psoas_r-P3: pelvis (-0.0291037 -0.081349 0.0824606)
          socket_coordinate=/jointset/hip_r/hip_flexion_r range=(-1.5708 0.785398) [radians]
      PathPoint psoas_r-P4: femur_r (0.00176041 -0.0557831 0.00418098)
      PathPoint psoas_r-P5: femur_r (-0.0206849 -0.0656854 0.0114427)
    DeGrooteFregly2016Muscle rect_fem_r: max_isometric_force=2267.423 optimal_fiber_length=0.0759
        tendon_slack_length=0.3888 pennation_angle_at_optimal=0.2170149
      PathPoint P1: pelvis (-0.0298112 -0.031428 0.097821)
      ConditionalPathPoint P2: femur_r (0.0367486 -0.443404 0.00209049) socket_coordinate=/jointset/knee_r/knee_angle_r
          range=(-2.61799 -1.45997)
      MovingPathPoint P3: tibia_r socket_x_coordinate=/jointset/knee_r/knee_angle_r
          socket_y_coordinate=/jointset/knee_r/knee_angle_r socket_z_coordinate=/jointset/knee_r/knee_angle_r
        x_location: MultiplierFunction: scale=1.028004
          SimmSpline: x=(-2.0944 -1.99997 -1.5708 -1.45752 -1.39626 -1.0472 -0.698132 -0.526391 -0.349066 -0.174533 0 0.00017453 0.00034907 0.0279253 0.0872665 0.174533 2.0944)
              y=(0.0155805 0.0179938 0.0275081 0.0296564 0.0307615 0.0365695 0.0422074 0.0450902 0.048391 0.0534299 0.0617576 0.0617669 0.0617762 0.0633083 0.066994 0.0733035 0.0573481)
        y_location: MultiplierFunction: scale=1.028004
          SimmSpline: x=(-2.0944 -1.99997 -1.5708 -1.45752 -1.39626 -1.0472 -0.698132 -0.526391 -0.349066 -0.174533 0 0.00017453 0.00034907 0.0279253 0.0872665 0.174533 2.0944)
              y=(0.0234116 0.0237613 0.0251141 0.0252795 0.0253146 0.0249184 0.0242373 0.0238447 0.0234197 0.0227644 0.020984 0.0209814 0.0209788 0.0205225 0.0191754 0.0159554 -0.0673774)
        z_location: MultiplierFunction: scale=1.028004
          SimmSpline: x=(-2.0944 0.1745) y=(0.0014 0.0014)
    DeGrooteFregly2016Muscle vasti_r: max_isometric_force=8573.087 optimal_fiber_length=0.115019
        tendon_slack_length=0.13516 pennation_angle_at_optimal=0.267941
      PathPoint vas_int_r-P1: femur_r (0.0319075 -0.211689 0.034108)
      PathPoint vas_int_r-P2: femur_r (0.0368586 -0.229294 0.0313573)
      ConditionalPathPoint vas_int_r-P3: femur_r (0.0377389 -0.443404 0.00605142)
          socket_coordinate=/jointset/knee_r/knee_angle_r range=(-2.61799 -1.42)
      MovingPathPoint vas_int_r-P4: tibia_r socket_x_coordinate=/jointset/knee_r/knee_angle_r
          socket_y_coordinate=/jointset/knee_r/knee_angle_r socket_z_coordinate=/jointset/knee_r/knee_angle_r
        x_location: MultiplierFunction: scale=1.028004
          SimmSpline: x=(-2.0944 -1.99997 -1.5708 -1.45752 -1.39626 -1.0472 -0.698132 -0.526391 -0.349066 -0.174533 0 0.00017453 0.00034907 0.0279253 0.0872665 0.174533 2.0944)
              y=(0.0082733 0.0106866 0.0202042 0.022353 0.0234583 0.0292715 0.0349465 0.037871 0.0412569 0.0465287 0.0554632 0.0554735 0.0554837 0.0571717 0.061272 0.0684368 0.0648818)
        y_location: MultiplierFunction: scale=1.028004
          SimmSpline: x=(-2.0944 -1.99997 -1.5708 -1.45752 -1.39626 -1.0472 -0.698132 -0.526391 -0.349066 -0.174533 0 0.00017453 0.00034907 0.0279253 0.0872665 0.174533 2.0944)
              y=(0.025599 0.0259487 0.0273124 0.0274796 0.0275151 0.0271363 0.0265737 0.0263073 0.0261187 0.0260129 0.0252923 0.0252911 0.0252898 0.0250526 0.0242191 0.0218288 -0.0685706)
        z_location: MultiplierFunction: scale=1.028004
          SimmSpline: x=(-2.0944 2.0944) y=(0.0018 0.0018)
    DeGrooteFregly2016Muscle gastroc_r: max_isometric_force=4183.477 optimal_fiber_length=0.062682
        tendon_slack_length=0.403329 pennation_angle_at_optimal=0.1820829
      PathPoint med_gas_r-P1: femur_r (-0.0209049 -0.432291 -0.025856)
      ConditionalPathPoint med_gas_r-P2: femur_r (-0.0330078 -0.442523 -0.0283866)
          socket_coordinate=/jointset/knee_r/knee_angle_r range=(-0.785398 0.174533)
      PathPoint med_gas_r-P3: calcn_r (0 0.0315993 -0.00540246)
    DeGrooteFregly2016Muscle soleus_r: max_isometric_force=6348.626 optimal_fiber_length=0.044
        tendon_slack_length=0.27025 pennation_angle_at_optimal=0.3814289
      PathPoint P1: tibia_r (-0.00246721 -0.157593 0.00729883)
      PathPoint P2: calcn_r (0 0.0315993 -0.00540246)
    DeGrooteFregly2016Muscle dorsiflexors_r: max_isometric_force=2179.744 optimal_fiber_length=0.069521
        tendon_slack_length=0.256088 pennation_angle_at_optimal=0.2021615
      PathPoint P1: tibia_r (0.0184013 -0.166948 0.011822)
      PathPoint P2: tibia_r (0.0338214 -0.406164 -0.0181957)
      PathPoint P3: calcn_r (0.118854 0.0181441 -0.0310896)
    DeGrooteFregly2016Muscle hamstrings_l: max_isometric_force=3373.863 optimal_fiber_length=0.121137
        tendon_slack_length=0.346982 pennation_angle_at_optimal=0.2253
      PathPoint bifemlh_l-P1: pelvis (-0.127289 -0.103652 -0.0701723)
      PathPoint bifemlh_l-P2: tibia_l (-0.0309429 -0.0370081 -0.0302542)
      PathPoint bifemlh_l-P3: tibia_l (-0.0240553 -0.0578766 -0.0352605)
    DeGrooteFregly2016Muscle bifemsh_l: max_isometric_force=586.7953 optimal_fiber_length=0.1103
        tendon_slack_length=0.158 pennation_angle_at_optimal=0.2642232
      PathPoint P1: femur_l (0.00550129 -0.232265 -0.025746)
      PathPoint P2: tibia_l (-0.0309429 -0.0370081 -0.0302542)
      PathPoint P3: tibia_l (-0.0240553 -0.0578766 -0.0352605)
    DeGrooteFregly2016Muscle glut_max_l: max_isometric_force=3491.829 optimal_fiber_length=0.1569
        tendon_slack_length=0.082776 pennation_angle_at_optimal=0.3673821
      PathPoint glut_max2_l-P1: pelvis (-0.136322 0.0177856 -0.0568938)
      PathPoint glut_max2_l-P2: pelvis (-0.139052 -0.0525485 -0.0923644)
      PathPoint glut_max2_l-P3: femur_l (-0.046871 -0.0583136 -0.0322376)
      PathPoint glut_max2_l-P4: femur_l (-0.017164 -0.111786 -0.0461008)
    DeGrooteFregly2016Muscle iliopsoas_l: max_isometric_force=2598.633 optimal_fiber_length=0.112927
        tendon_slack_length=0.15346 pennation_angle_at_optimal=0.2391189
      PathPoint psoas_l-P1: pelvis (-0.0653824 0.0896355 -0.0292048)
      PathPoint psoas_l-P2: pelvis (-0.024051 -0.0576012 -0.0767005)
      ConditionalPathPoint psoas_l-P3: pelvis (-0.0291037 -0.081349 -0.0824606)
          socket_coordinate=/jointset/hip_l/hip_flexion_l range=(-1.5708 0.785398)
      PathPoint psoas_l-P4: femur_l (0.00176041 -0.0557831 -0.00418098)
      PathPoint psoas_l-P5: femur_l (-0.0206849 -0.0656854 -0.0114427)
    DeGrooteFregly2016Muscle rect_fem_l: max_isometric_force=2267.423 optimal_fiber_length=0.0759
        tendon_slack_length=0.3888 pennation_angle_at_optimal=0.2170149
      PathPoint P1: pelvis (-0.0298112 -0.031428 -0.097821)
      ConditionalPathPoint P2: femur_l (0.0367486 -0.443404 -0.00209049)
          socket_coordinate=/jointset/knee_l/knee_angle_l range=(-2.61799 -1.45997)
      MovingPathPoint P3: tibia_l socket_x_coordinate=/jointset/knee_l/knee_angle_l
          socket_y_coordinate=/jointset/knee_l/knee_angle_l socket_z_coordinate=/jointset/knee_l/knee_angle_l
        x_location: MultiplierFunction: scale=1.028004
          SimmSpline: x=(-2.0944 -1.99997 -1.5708 -1.45752 -1.39626 -1.0472 -0.698132 -0.526391 -0.349066 -0.174533 0 0.00017453 0.00034907 0.0279253 0.0872665 0.174533 2.0944)
              y=(0.0155805 0.0179938 0.0275081 0.0296564 0.0307615 0.0365695 0.0422074 0.0450902 0.048391 0.0534299 0.0617576 0.0617669 0.0617762 0.0633083 0.066994 0.0733035 0.0573481)
        y_location: MultiplierFunction: scale=1.028004
          SimmSpline: x=(-2.0944 -1.99997 -1.5708 -1.45752 -1.39626 -1.0472 -0.698132 -0.526391 -0.349066 -0.174533 0 0.00017453 0.00034907 0.0279253 0.0872665 0.174533 2.0944)
              y=(0.0234116 0.0237613 0.0251141 0.0252795 0.0253146 0.0249184 0.0242373 0.0238447 0.0234197 0.0227644 0.020984 0.0209814 0.0209788 0.0205225 0.0191754 0.0159554 -0.0673774)
        z_location: MultiplierFunction: scale=1.028004
          SimmSpline: x=(-2.0944 0.1745) y=(-0.0014 -0.0014)
    DeGrooteFregly2016Muscle vasti_l: max_isometric_force=8573.087 optimal_fiber_length=0.115019
        tendon_slack_length=0.13516 pennation_angle_at_optimal=0.267941
      PathPoint vas_int_l-P1: femur_l (0.0319075 -0.211689 -0.034108)
      PathPoint vas_int_l-P2: femur_l (0.0368586 -0.229294 -0.0313573)
      ConditionalPathPoint vas_int_l-P3: femur_l (0.0377389 -0.443404 -0.00605142)
          socket_coordinate=/jointset/knee_l/knee_angle_l range=(-2.61799 -1.42)
      MovingPathPoint vas_int_l-P4: tibia_l socket_x_coordinate=/jointset/knee_l/knee_angle_l
          socket_y_coordinate=/jointset/knee_l/knee_angle_l socket_z_coordinate=/jointset/knee_l/knee_angle_l
        x_location: MultiplierFunction: scale=1.028004
          SimmSpline: x=(-2.0944 -1.99997 -1.5708 -1.45752 -1.39626 -1.0472 -0.698132 -0.526391 -0.349066 -0.174533 0 0.00017453 0.00034907 0.0279253 0.0872665 0.174533 2.0944)
              y=(0.0082733 0.0106866 0.0202042 0.022353 0.0234583 0.0292715 0.0349465 0.037871 0.0412569 0.0465287 0.0554632 0.0554735 0.0554837 0.0571717 0.061272 0.0684368 0.0648818)
        y_location: MultiplierFunction: scale=1.028004
          SimmSpline: x=(-2.0944 -1.99997 -1.5708 -1.45752 -1.39626 -1.0472 -0.698132 -0.526391 -0.349066 -0.174533 0 0.00017453 0.00034907 0.0279253 0.0872665 0.174533 2.0944)
              y=(0.025599 0.0259487 0.0273124 0.0274796 0.0275151 0.0271363 0.0265737 0.0263073 0.0261187 0.0260129 0.0252923 0.0252911 0.0252898 0.0250526 0.0242191 0.0218288 -0.0685706)
        z_location: MultiplierFunction: scale=1.028004
          SimmSpline: x=(-2.0944 2.0944) y=(-0.0018 -0.0018)
    DeGrooteFregly2016Muscle gastroc_l: max_isometric_force=4183.477 optimal_fiber_length=0.062682
        tendon_slack_length=0.403329 pennation_angle_at_optimal=0.1820829
      PathPoint med_gas_l-P1: femur_l (-0.0209049 -0.432291 0.025856)
      ConditionalPathPoint med_gas_l-P2: femur_l (-0.0330078 -0.442523 0.0283866)
          socket_coordinate=/jointset/knee_l/knee_angle_l range=(-0.785398 0.174533)
      PathPoint med_gas_l-P3: calcn_l (0 0.0315993 0.00540246)
    DeGrooteFregly2016Muscle soleus_l: max_isometric_force=6348.626 optimal_fiber_length=0.044
        tendon_slack_length=0.27025 pennation_angle_at_optimal=0.3814289
      PathPoint P1: tibia_l (-0.00246721 -0.157593 -0.00729883)
      PathPoint P2: calcn_l (0 0.0315993 0.00540246)
    DeGrooteFregly2016Muscle dorsiflexors_l: max_isometric_force=2179.744 optimal_fiber_length=0.069521
        tendon_slack_length=0.256088 pennation_angle_at_optimal=0.2021615
      PathPoint P1: tibia_l (0.0184013 -0.166948 -0.011822)
      PathPoint P2: tibia_l (0.0338214 -0.406164 0.0181957)
      PathPoint P3: calcn_l (0.118854 0.0181441 0.0310896)
  MarkerSet:
    Marker R_ASIS: pelvis (0.0102084 -0.005331633 0.1132956) fixed=true
    Marker L_ASIS: pelvis (0.0102084 -0.00533163 -0.113296) fixed=true
    Marker R_PSIS: pelvis (-0.152722 0.030973 0.0455434) fixed=true
    Marker L_PSIS: pelvis (-0.1527216 0.03097297 -0.04554336) fixed=true
    Marker R_Thigh_Upper: femur_r (0.07499661 -0.178422 0.059516)
    Marker R_Thigh_Front: femur_r (0.07514412 -0.3054219 0.059516)
    Marker R_Thigh_Rear: femur_r (0.08426783 -0.265911 -0.0146468)
    Marker R_Shank_Upper: tibia_r (0.06214914 -0.2122253 -0.006841816)
    Marker R_Shank_Front: tibia_r (0.05369841 -0.2905337 0.04173516)
    Marker R_Heel: calcn_r (-0.0297519 0.01879116 -0.00746188) fixed=true
    Marker L_Thigh_Upper: femur_l (0.06593558 -0.1784225 -0.05951595)
    Marker L_Thigh_Front: femur_l (0.05658648 -0.3120399 -0.059516)
    Marker L_Thigh_Rear: femur_l (0.07672205 -0.265911 0.01464681)
    Marker L_Shank_Upper: tibia_l (0.05096951 -0.2206077 0.02122573)
    Marker L_Shank_Front: tibia_l (0.0590151 -0.3025747 -0.03875479)
    Marker L_Heel: calcn_l (-0.0297519 0.0187912 0.00746188) fixed=true
    Marker R_Knee_Lat: femur_r (0.00994012 -0.3928361 0.05346824) fixed=true
    Marker R_Shank_Rear: tibia_r (0.05163222 -0.1196796 0.006486735)
    Marker R_Ankle_Lat: tibia_r (-0.005001749 -0.3739894 0.04845184) fixed=true
    Marker R_Toe_Tip: toes_r (0.01393097 0.03019337 -0.0263344)
    Marker R_Toe_Lat: toes_r (-0.03861821 0.007897551 0.04938933)
    Marker L_Knee_Lat: femur_l (0.00994012 -0.392836 -0.0534682) fixed=true
    Marker L_Shank_Rear: tibia_l (0.0516321 -0.1238093 0.00648674)
    Marker L_Ankle_Lat: tibia_l (-0.00500175 -0.373989 -0.0484518) fixed=true
    Marker L_Toe_Tip: toes_l (0.013931 0.0301934 0.0263344)
    Marker L_Toe_Lat: toes_l (-0.0386182 0.00789755 -0.0493893)
    Marker R_Toe_Med: toes_r (-0.003885557 0.02476244 0.01560271)
    Marker L_Toe_Med: toes_l (-0.00388556 0.0247624 -0.0156027)
