# OpenSim document version 40600
AnalyzeTool RBDS028runT35:
  model_file: RBDS028runT35_static_optimisation_complex.osim
  replace_force_set: false
  results_directory: .
  output_precision: 8
  initial_time: 16.09999
  final_time: 16.81999
  solve_for_equilibrium_for_auxiliary_states: true
  maximum_number_of_integrator_steps: 20000
  maximum_integrator_step_size: 1
  minimum_integrator_step_size: 1e-8
  integrator_error_tolerance: 1e-5
  external_loads_file: RBDS028runT35_grf.xml
  states_file: RBDS028runT35_states.sto
  lowpass_cutoff_frequency_for_coordinates: -1
  AnalysisSet Analyses:
    StaticOptimization StaticOptimization_Complex: start_time=0 end_time=1 step_interval=1 in_degrees=true
        use_model_force_set=true activation_exponent=2 use_muscle_physiology=true
        optimizer_convergence_criterion=0.0001 optimizer_max_iterations=100
    MuscleAnalysis MuscleAnalysis_Complex: start_time=-Inf end_time=Inf step_interval=1 in_degrees=true
        muscle_list=(recfem_r vaslat_r vasint_r vasmed_r) moment_arm_coordinate_list=knee_angle_r compute_moments=true
    JointReaction default: start_time=-Inf end_time=Inf step_interval=1 in_degrees=true joint_names=patellofemoral_r
        apply_on_bodies=child express_in_frame=child
