# OpenSim document version 40500
Model RBDS002:
  gravity: 0 -9.80665 0
  length_units: meters
  force_units: N
  credits:
    Rajagopal, A, Dembia, C.L., DeMers, M.S., Delp, D.D., Hicks, J.L., and Delp, S.L.
  publications:
    Rajagopal, Apoorva, et al. "Full-Body Musculoskeletal Model for Muscle-Driven Simulation of Human Gait." IEEE Transactions on Biomedical Engineering 63.10 (2016): 2068-2079. (2016)
  Ground
  BodySet:
    Body pelvis: mass=48.86162 [kg] mass_center=(-0.07959672 0 0) inertia=(0.1085857 0.1085857 0.06932945 0 0 0)
        meshes=(r_pelvis.vtp l_pelvis.vtp sacrum.vtp)
      WrapCylinder Gmax1_at_pelvis_r: xyz_body_rotation=(-0.6 0.45 0) translation=(-0.0866895 -0.09915554 0.059224)
          quadrant=-x radius=0.04183503 length=0.1514727
      WrapCylinder Gmax2_at_pelvis_r: xyz_body_rotation=(-0.75 0.39 0) translation=(-0.09006701 -0.0831304 0.06602019)
          quadrant=all radius=0.0418811 length=0.1006795
      WrapCylinder Gmax3_at_pelvis_r: xyz_body_rotation=(-0.1 0 0) translation=(-0.09344452 -0.08813826 0.06602019)
          quadrant=all radius=0.04254215 length=0.09711958
      WrapCylinder Gmax1_at_pelvis_l: xyz_body_rotation=(0.6 -0.45 0) translation=(-0.0866895 -0.09915554 -0.059224)
          quadrant=-x radius=0.04183503 length=0.1514727
      WrapCylinder Gmax2_at_pelvis_l: xyz_body_rotation=(0.75 -0.39 0) translation=(-0.09006701 -0.0831304 -0.06602019)
          quadrant=all radius=0.0418811 length=0.1006795
      WrapCylinder Gmax3_at_pelvis_l: xyz_body_rotation=(0.1 0 0) translation=(-0.09344452 -0.08813826 -0.06602019)
          quadrant=all radius=0.04254215 length=0.09711958
      WrapCylinder PS_at_brim_r: xyz_body_rotation=(-0.25 -0.27 0.1) translation=(-0.08331198 -0.06009427 0.06369007)
          quadrant=-y radius=0.05288623 length=0.09844663
      WrapCylinder PS_at_brim_l: xyz_body_rotation=(0.25 0.27 0.1) translation=(-0.08331198 -0.06009427 -0.06369007)
          quadrant=-y radius=0.05288623 length=0.09844663
      WrapCylinder IL_at_brim_r: xyz_body_rotation=(-0.32 -0.24 0.9) translation=(-0.07993447 -0.06510212 0.07339892)
          quadrant=-y radius=0.05818338 length=0.09831715
      WrapCylinder IL_at_brim_l: xyz_body_rotation=(0.32 0.24 0.9) translation=(-0.07993447 -0.06510212 -0.07339892)
          quadrant=-y radius=0.05818338 length=0.09831715
    Body femur_r: mass=9.877112 mass_center=(0 -0.1907143 0) inertia=(0.1831726 0.05535481 0.1831726 0 0 0)
        meshes=r_femur.vtp
      WrapCylinder Gastroc_at_condyles_r: translation=(0.00609331 -0.4599581 0) quadrant=all radius=0.02925639
          length=0.1218662
      WrapCylinder KnExt_at_fem_r: xyz_body_rotation=(-0.0623366 0.0507601 0)
          translation=(0.004372901 -0.4518045 0.002548356) quadrant=all radius=0.02926128 length=0.1218302
      WrapCylinder AB_at_femshaft_r: xyz_body_rotation=(1.66157 0.186644 0)
          translation=(0.01784536 -0.1263146 0.02847404) quadrant=all radius=0.02007539 length=0.07882837
      WrapCylinder AL_at_femshaft_r: xyz_body_rotation=(1.77711 0.136489 0)
          translation=(0.03745278 -0.2601669 0.01841849) quadrant=all radius=0.02443925 length=0.1127862
      WrapCylinder AMprox_at_femshaft_r: xyz_body_rotation=(1.61126 0.18656 0)
          translation=(0.006316313 -0.08177696 0.03095767) quadrant=all radius=0.02567843 length=0.0787834
      WrapCylinder AMmid_at_femshaft_r: xyz_body_rotation=(1.61139 0.13656 0)
          translation=(0.02804446 -0.1802935 0.02508518) quadrant=all radius=0.02605931 length=0.1348659
      WrapCylinder AMdist_at_femshaft_r: xyz_body_rotation=(1.71188 0.186636 0)
          translation=(0.03851764 -0.2925064 0.01141228) quadrant=all radius=0.02651254 length=0.2254483
      WrapCylinder AMisch_at_condyles_r: xyz_body_rotation=(1.71115 -0.463363 0)
          translation=(-0.02760404 -0.4227475 -0.003844111) quadrant=all radius=0.04834313 length=0.2744157
      WrapCylinder PECT_at_femshaft_r: xyz_body_rotation=(1.81295 0.276344 0)
          translation=(0.007416448 -0.0947995 0.03709668) quadrant=all radius=0.0181907 length=0.05673342
    Body tibia_r: mass=3.936977 mass_center=(0 -0.2241631 0) inertia=(0.07580216 0.005105874 0.07580216 0 0 0)
        meshes=(r_tibia.vtp r_fibula.vtp)
      WrapCylinder GasLat_at_shank_r: xyz_body_rotation=(2.96723 -0.279725 -1.47812)
          translation=(-0.007185233 -0.08884877 -0.003204225) quadrant=-y radius=0.05958579 length=0.0978092
      WrapCylinder GasMed_at_shank_r: xyz_body_rotation=(2.96723 0.0279725 -1.47812)
          translation=(-0.007185233 -0.08884877 -0.003204225) quadrant=-y radius=0.05955754 length=0.09786708
      WrapCylinder GR_at_condyles_r: xyz_body_rotation=(0 -0.4 0) translation=(-0.002912932 -0.02401318 0) quadrant=all
          radius=0.03908946 length=0.09709774
      WrapCylinder SM_at_condyles_r: xyz_body_rotation=(0 -0.1 0) translation=(-0.0009709774 -0.02401318 0)
          quadrant=all radius=0.0382208 length=0.09709774
      WrapCylinder ST_at_condyles_r: xyz_body_rotation=(0 -0.2 0) translation=(-0.001941955 -0.02461351 0) quadrant=all
          radius=0.04614728 length=0.09709774
      WrapCylinder BF_at_gastroc_r: translation=(-0.05631669 -0.07203954 0) quadrant=y radius=0.03257455
          length=0.1456466
    Body patella_r: mass=0.09153537 mass_center=(0.002019328 0.02961681 0)
        inertia=(3.835592e-6 1.752077e-5 1.752077e-5 0 0 0) meshes=r_patella.vtp
    Body talus_r: mass=0.1061895 mass_center=(0 0 0) inertia=(0.001237971 0.001119561 0.001119561 0 0 0)
        meshes=r_talus.vtp
    Body calcn_r: mass=1.327369 mass_center=(0.1026836 0.03665963 0)
        inertia=(0.001763948 0.004464865 0.004464865 0 0 0) meshes=r_foot.vtp
    Body toes_r: mass=0.2300065 mass_center=(0.03552852 0.007331927 -0.0169921)
        inertia=(0.0001259963 0.0002309462 0.0002309462 0 0 0) meshes=r_bofoot.vtp
    Body femur_l: mass=9.877112 mass_center=(0 -0.189175 0) inertia=(0.180255 0.05451955 0.180255 0 0 0)
        meshes=l_femur.vtp
      WrapCylinder Gastroc_at_condyles_l: translation=(0.006047164 -0.4562457 0) quadrant=all radius=0.02902784
          length=0.1209433
      WrapCylinder KnExt_at_fem_l: xyz_body_rotation=(0.0623366 -0.0507601 0)
          translation=(0.004339784 -0.4481579 -0.002529057) quadrant=all radius=0.02903272 length=0.1209074
      WrapCylinder AB_at_femshaft_l: xyz_body_rotation=(-1.66157 -0.186644 0)
          translation=(0.01771021 -0.1252951 -0.0282584) quadrant=all radius=0.01992318 length=0.07819408
      WrapCylinder AL_at_femshaft_l: xyz_body_rotation=(-1.77711 -0.136489 0)
          translation=(0.03716914 -0.258067 -0.018279) quadrant=all radius=0.02425386 length=0.1118798
      WrapCylinder AMprox_at_femshaft_l: xyz_body_rotation=(-1.61126 -0.18656 0)
          translation=(0.006268478 -0.08111692 -0.03072322) quadrant=all radius=0.02548377 length=0.07814917
      WrapCylinder AMmid_at_femshaft_l: xyz_body_rotation=(-1.61139 -0.13656 0)
          translation=(0.02783207 -0.1788383 -0.02489521) quadrant=all radius=0.02586185 length=0.1337789
      WrapCylinder AMdist_at_femshaft_l: xyz_body_rotation=(-1.71188 -0.186636 0)
          translation=(0.03822594 -0.2901455 -0.01132585) quadrant=all radius=0.02631145 length=0.2236356
      WrapCylinder AMisch_at_condyles_l: xyz_body_rotation=(-1.71115 0.463363 0)
          translation=(-0.02739498 -0.4193354 0.003814999) quadrant=all radius=0.04797477 length=0.2722343
      WrapCylinder PECT_at_femshaft_l: xyz_body_rotation=(-1.81295 -0.276344 0)
          translation=(0.007360282 -0.09403434 -0.03681574) quadrant=all radius=0.01805244 length=0.05627967
    Body tibia_l: mass=3.936977 mass_center=(0 -0.2217576 0) inertia=(0.07406252 0.004753793 0.07406252 0 0 0)
        meshes=(l_tibia.vtp l_fibula.vtp)
      WrapCylinder GasLat_at_shank_l: xyz_body_rotation=(-2.96723 0.279725 -1.47812)
          translation=(-0.006933076 -0.08789536 0.003091777) quadrant=-y radius=0.05828718 length=0.09447775
      WrapCylinder GasMed_at_shank_l: xyz_body_rotation=(-2.96723 -0.0279725 -1.47812)
          translation=(-0.006933076 -0.08789536 0.003091777) quadrant=-y radius=0.05825448 length=0.09454177
      WrapCylinder GR_at_condyles_l: xyz_body_rotation=(0 0.4 0) translation=(-0.002810706 -0.0237555 0) quadrant=all
          radius=0.03824419 length=0.09369021
      WrapCylinder SM_at_condyles_l: xyz_body_rotation=(0 0.1 0) translation=(-0.0009369021 -0.0237555 0) quadrant=all
          radius=0.03739432 length=0.09369021
      WrapCylinder ST_at_condyles_l: xyz_body_rotation=(0 0.2 0) translation=(-0.001873804 -0.02434939 0) quadrant=all
          radius=0.04514939 length=0.09369021
      WrapCylinder BF_at_gastroc_l: translation=(-0.05434032 -0.07126651 0) quadrant=all radius=0.03187016
          length=0.1405353
    Body patella_l: mass=0.09153537 mass_center=(0.00200303 0.02937777 0)
        inertia=(3.773926e-6 1.723908e-5 1.723908e-5 0 0 0) meshes=l_patella.vtp
    Body talus_l: mass=0.1061895 mass_center=(0 0 0) inertia=(0.001181708 0.001056912 0.001056912 0 0 0)
        meshes=l_talus.vtp
    Body calcn_l: mass=1.327369 mass_center=(0.1035091 0.03628009 0)
        inertia=(0.001684423 0.004482941 0.004482941 0 0 0) meshes=l_foot.vtp
    Body toes_l: mass=0.2300065 mass_center=(0.03581414 0.007256019 0.01639579)
        inertia=(0.0001203159 0.0002308172 0.0002308172 0 0 0) meshes=l_bofoot.vtp
  JointSet:
    CustomJoint ground_pelvis: socket_parent_frame=ground_offset socket_child_frame=pelvis_offset
      Coordinate pelvis_tilt: default_value=0 range=(-1.570796 1.570796) clamped=true
      Coordinate pelvis_list: default_value=0 range=(-1.570796 1.570796) clamped=true
      Coordinate pelvis_rotation: default_value=0 range=(-1.570796 1.570796) clamped=true
      Coordinate pelvis_tx: default_value=0 range=(-5 5) clamped=true
      Coordinate pelvis_ty: default_value=0.94 range=(-1 2) clamped=true
      Coordinate pelvis_tz: default_value=0 range=(-3 3) clamped=true
      PhysicalOffsetFrame ground_offset: socket_parent=/ground translation=(0 0 0) [meters]
      PhysicalOffsetFrame pelvis_offset: socket_parent=/bodyset/pelvis translation=(0 0 0)
      SpatialTransform:
        TransformAxis rotation1: coordinates=pelvis_tilt axis=(0 0 1) LinearFunction(coefficients=1 0)
        TransformAxis rotation2: coordinates=pelvis_list axis=(1 0 0) LinearFunction(coefficients=1 0)
        TransformAxis rotation3: coordinates=pelvis_rotation axis=(0 1 0) LinearFunction(coefficients=1 0)
        TransformAxis translation1: coordinates=pelvis_tx axis=(1 0 0) LinearFunction(coefficients=1 0)
        TransformAxis translation2: coordinates=pelvis_ty axis=(0 1 0) LinearFunction(coefficients=1 0)
        TransformAxis translation3: coordinates=pelvis_tz axis=(0 0 1) LinearFunction(coefficients=1 0)
    CustomJoint hip_r: socket_parent_frame=pelvis_offset socket_child_frame=femur_r_offset
      Coordinate hip_flexion_r: default_value=0 range=(-0.5235988 2.094395) clamped=true
      Coordinate hip_adduction_r: default_value=0 range=(-0.8726646 0.5235988) clamped=true
      Coordinate hip_rotation_r: default_value=0 range=(-0.6981317 0.6981317) clamped=true
      PhysicalOffsetFrame pelvis_offset: socket_parent=/bodyset/pelvis translation=(-0.06335764 -0.07861332 0.07501059)
      PhysicalOffsetFrame femur_r_offset: socket_parent=/bodyset/femur_r translation=(0 0 0)
      SpatialTransform: axes_held_at_zero=(translation1 translation2 translation3)
        TransformAxis rotation1: coordinates=hip_flexion_r axis=(0 0 1) LinearFunction(coefficients=1 0)
        TransformAxis rotation2: coordinates=hip_adduction_r axis=(1 0 0) LinearFunction(coefficients=1 0)
        TransformAxis rotation3: coordinates=hip_rotation_r axis=(0 1 0) LinearFunction(coefficients=1 0)
    CustomJoint walker_knee_r: socket_parent_frame=femur_r_offset socket_child_frame=tibia_r_offset
      Coordinate knee_angle_r: default_value=0 range=(0 2.0944) clamped=true
      PhysicalOffsetFrame femur_r_offset: socket_parent=/bodyset/femur_r
          translation=(-0.009858976 -0.4576695 -0.003351321) orientation=(-1.64157 1.44618 1.5708) [radians]
      PhysicalOffsetFrame tibia_r_offset: socket_parent=/bodyset/tibia_r
          translation=(-0.00785476 -0.00424409 -0.001441649) orientation=(-1.64157 1.44618 1.5708)
      SpatialTransform: axes_held_at_zero=translation3
        TransformAxis rotation1: coordinates=knee_angle_r axis=(1 0 0) LinearFunction(coefficients=1 0)
        TransformAxis rotation2: coordinates=knee_angle_r axis=(0 0 1)
          SimmSpline: x=(0 0.174533 0.349066 0.523599 0.698132 0.872665 1.0472 1.22173 1.39626 1.5708 1.74533 1.91986 2.0944)
              y=(0 0.0126809 0.0226969 0.0296054 0.0332049 0.0335354 0.0308779 0.0257548 0.0189295 0.011407 0.00443314 -0.00050475 -0.0016782)
        TransformAxis rotation3: coordinates=knee_angle_r axis=(0 1 0)
          SimmSpline: x=(0 0.174533 0.349066 0.523599 0.698132 0.872665 1.0472 1.22173 1.39626 1.5708 1.74533 1.91986 2.0944)
              y=(0 0.059461 0.109399 0.150618 0.18392 0.210107 0.229983 0.24435 0.254012 0.25977 0.262428 0.262788 0.261654)
        TransformAxis translation1: coordinates=knee_angle_r axis=(0 1 0)
          MultiplierFunction: scale=1.121849
            SimmSpline: x=(0 0.174533 0.349066 0.523599 0.698132 0.872665 1.0472 1.22173 1.39626 1.5708 1.74533 1.91986 2.0944)
                y=(0 0.000479 0.000835 0.001086 0.001251 0.001346 0.001391 0.001403 0.0014 0.0014 0.001421 0.001481 0.001599)
        TransformAxis translation2: coordinates=knee_angle_r axis=(0 0 1)
          MultiplierFunction: scale=1.218662
            SimmSpline: x=(0 0.174533 0.349066 0.523599 0.698132 0.872665 1.0472 1.22173 1.39626 1.5708 1.74533 1.91986 2.0944)
                y=(0 0.000988 0.001899 0.002734 0.003492 0.004173 0.004777 0.005305 0.005756 0.00613 0.006427 0.006648 0.006792)
    CustomJoint patellofemoral_r: socket_parent_frame=femur_r_offset socket_child_frame=patella_r_offset
      Coordinate knee_angle_r_beta: default_value=0 range=(-99999.9 99999.9) clamped=false
      PhysicalOffsetFrame femur_r_offset: socket_parent=/bodyset/femur_r
          translation=(-0.009858976 -0.4576695 -0.003351321)
      PhysicalOffsetFrame patella_r_offset: socket_parent=/bodyset/patella_r translation=(0 0 0)
      SpatialTransform: axes_held_at_zero=(rotation2 rotation3)
        TransformAxis rotation1: coordinates=knee_angle_r_beta axis=(0 0 1)
          SimmSpline: x=(0 0.174533 0.349066 0.523599 0.698132 0.872665 1.0472 1.22173 1.39626 1.5708 1.74533 1.91986 2.0944)
              y=(0.00113686 -0.00629212 -0.105582 -0.253683 -0.414245 -0.579047 -0.747244 -0.91799 -1.09044 -1.26379 -1.43763 -1.61186 -1.78634)
        TransformAxis translation1: coordinates=knee_angle_r_beta axis=(1 0 0)
          MultiplierFunction: scale=1.218662
            SimmSpline: x=(0 0.174533 0.349066 0.523599 0.698132 0.872665 1.0472 1.22173 1.39626 1.5708 1.74533 1.91986 2.0944)
                y=(0.0524 0.0488 0.0437 0.0371 0.0296 0.0216 0.0136 0.0057 -0.0019 -0.0088 -0.0148 -0.0196 -0.0227)
        TransformAxis translation2: coordinates=knee_angle_r_beta axis=(0 1 0)
          MultiplierFunction: scale=1.121849
            SimmSpline: x=(0 0.174533 0.349066 0.523599 0.698132 0.872665 1.0472 1.22173 1.39626 1.5708 1.74533 1.91986 2.0944)
                y=(-0.0108 -0.019 -0.0263 -0.0322 -0.0367 -0.0395 -0.0408 -0.0404 -0.0384 -0.0349 -0.0301 -0.0245 -0.0187)
        TransformAxis translation3: axis=(0 0 1) MultiplierFunction(scale=1.218662, Constant(value=0.00275))
    PinJoint ankle_r: socket_parent_frame=tibia_r_offset socket_child_frame=talus_r_offset
      Coordinate ankle_angle_r: default_value=0 range=(-0.6981317 0.6981317) clamped=true
      PhysicalOffsetFrame tibia_r_offset: socket_parent=/bodyset/tibia_r translation=(-0.009709774 -0.4802636 0)
          orientation=(0.175895 -0.105208 0.0186622)
      PhysicalOffsetFrame talus_r_offset: socket_parent=/bodyset/talus_r translation=(0 0 0)
          orientation=(0.175895 -0.105208 0.0186622)
    PinJoint subtalar_r: socket_parent_frame=talus_r_offset socket_child_frame=calcn_r_offset
      Coordinate subtalar_angle_r: default_value=0 range=(-0.6981317 0.6981317) clamped=true
      PhysicalOffsetFrame talus_r_offset: socket_parent=/bodyset/talus_r
          translation=(-0.04735457 -0.05036765 0.007690141) orientation=(-1.76819 0.906223 1.8196)
      PhysicalOffsetFrame calcn_r_offset: socket_parent=/bodyset/calcn_r translation=(0 0 0)
          orientation=(-1.76819 0.906223 1.8196)
    CustomJoint hip_l: socket_parent_frame=pelvis_offset socket_child_frame=femur_l_offset
      Coordinate hip_flexion_l: default_value=0 range=(-0.5235988 2.094395) clamped=true
      Coordinate hip_adduction_l: default_value=0 range=(-0.8726646 0.5235988) clamped=true
      Coordinate hip_rotation_l: default_value=0 range=(-0.6981317 0.6981317) clamped=true
      PhysicalOffsetFrame pelvis_offset: socket_parent=/bodyset/pelvis
          translation=(-0.06335764 -0.07861332 -0.07501059)
      PhysicalOffsetFrame femur_l_offset: socket_parent=/bodyset/femur_l translation=(0 0 0)
      SpatialTransform: axes_held_at_zero=(translation1 translation2 translation3)
        TransformAxis rotation1: coordinates=hip_flexion_l axis=(0 0 1) LinearFunction(coefficients=1 0)
        TransformAxis rotation2: coordinates=hip_adduction_l axis=(1 0 0) LinearFunction(coefficients=-1 0)
        TransformAxis rotation3: coordinates=hip_rotation_l axis=(0 1 0) LinearFunction(coefficients=-1 0)
    CustomJoint walker_knee_l: socket_parent_frame=femur_l_offset socket_child_frame=tibia_l_offset
      Coordinate knee_angle_l: default_value=0 range=(0 2.0944) clamped=true
      PhysicalOffsetFrame femur_l_offset: socket_parent=/bodyset/femur_l
          translation=(-0.009784311 -0.4539756 0.00332594) orientation=(1.64157 -1.44618 1.5708)
      PhysicalOffsetFrame tibia_l_offset: socket_parent=/bodyset/tibia_l
          translation=(-0.007579107 -0.004198548 0.001391056) orientation=(1.64157 -1.44618 1.5708)
      SpatialTransform: axes_held_at_zero=translation3
        TransformAxis rotation1: coordinates=knee_angle_l axis=(-1 0 0) LinearFunction(coefficients=1 0)
        TransformAxis rotation2: coordinates=knee_angle_l axis=(0 0 1)
          SimmSpline: x=(0 0.174533 0.349066 0.523599 0.698132 0.872665 1.0472 1.22173 1.39626 1.5708 1.74533 1.91986 2.0944)
              y=(0 0.0126809 0.0226969 0.0296054 0.0332049 0.0335354 0.0308779 0.0257548 0.0189295 0.011407 0.00443314 -0.00050475 -0.0016782)
        TransformAxis rotation3: coordinates=knee_angle_l axis=(0 1 0)
          SimmSpline: x=(0 0.174533 0.349066 0.523599 0.698132 0.872665 1.0472 1.22173 1.39626 1.5708 1.74533 1.91986 2.0944)
              y=(0 -0.059461 -0.109399 -0.150618 -0.18392 -0.210107 -0.229983 -0.24435 -0.254012 -0.25977 -0.262428 -0.262788 -0.261654)
        TransformAxis translation1: coordinates=knee_angle_l axis=(0 1 0)
          MultiplierFunction: scale=1.112794
            SimmSpline: x=(0 0.174533 0.349066 0.523599 0.698132 0.872665 1.0472 1.22173 1.39626 1.5708 1.74533 1.91986 2.0944)
                y=(0 0.000479 0.000835 0.001086 0.001251 0.001346 0.001391 0.001403 0.0014 0.0014 0.001421 0.001481 0.001599)
        TransformAxis translation2: coordinates=knee_angle_l axis=(0 0 1)
          MultiplierFunction: scale=1.209433
            SimmSpline: x=(0 0.174533 0.349066 0.523599 0.698132 0.872665 1.0472 1.22173 1.39626 1.5708 1.74533 1.91986 2.0944)
                y=(0 -0.000988 -0.001899 -0.002734 -0.003492 -0.004173 -0.004777 -0.005305 -0.005756 -0.00613 -0.006427 -0.006648 -0.006792)
    CustomJoint patellofemoral_l: socket_parent_frame=femur_l_offset socket_child_frame=patella_l_offset
      Coordinate knee_angle_l_beta: default_value=0 range=(-99999.9 99999.9) clamped=false
      PhysicalOffsetFrame femur_l_offset: socket_parent=/bodyset/femur_l
          translation=(-0.009784311 -0.4539756 0.00332594)
      PhysicalOffsetFrame patella_l_offset: socket_parent=/bodyset/patella_l translation=(0 0 0)
      SpatialTransform: axes_held_at_zero=(rotation2 rotation3)
        TransformAxis rotation1: coordinates=knee_angle_l_beta axis=(0 0 1)
          SimmSpline: x=(0 0.174533 0.349066 0.523599 0.698132 0.872665 1.0472 1.22173 1.39626 1.5708 1.74533 1.91986 2.0944)
              y=(0.00113686 -0.00629212 -0.105582 -0.253683 -0.414245 -0.579047 -0.747244 -0.91799 -1.09044 -1.26379 -1.43763 -1.61186 -1.78634)
        TransformAxis translation1: coordinates=knee_angle_l_beta axis=(1 0 0)
          MultiplierFunction: scale=1.209433
            SimmSpline: x=(0 0.174533 0.349066 0.523599 0.698132 0.872665 1.0472 1.22173 1.39626 1.5708 1.74533 1.91986 2.0944)
                y=(0.0524 0.0488 0.0437 0.0371 0.0296 0.0216 0.0136 0.0057 -0.0019 -0.0088 -0.0148 -0.0196 -0.0227)
        TransformAxis translation2: coordinates=knee_angle_l_beta axis=(0 1 0)
          MultiplierFunction: scale=1.112794
            SimmSpline: x=(0 0.174533 0.349066 0.523599 0.698132 0.872665 1.0472 1.22173 1.39626 1.5708 1.74533 1.91986 2.0944)
                y=(-0.0108 -0.019 -0.0263 -0.0322 -0.0367 -0.0395 -0.0408 -0.0404 -0.0384 -0.0349 -0.0301 -0.0245 -0.0187)
        TransformAxis translation3: axis=(0 0 1) MultiplierFunction(scale=1.209433, Constant(value=-0.00275))
    PinJoint ankle_l: socket_parent_frame=tibia_l_offset socket_child_frame=talus_l_offset
      Coordinate ankle_angle_l: default_value=0 range=(-0.6981317 0.6981317) clamped=true
      PhysicalOffsetFrame tibia_l_offset: socket_parent=/bodyset/tibia_l translation=(-0.009369021 -0.4751101 0)
          orientation=(-0.175895 0.105208 0.0186622)
      PhysicalOffsetFrame talus_l_offset: socket_parent=/bodyset/talus_l translation=(0 0 0)
          orientation=(-0.175895 0.105208 0.0186622)
    PinJoint subtalar_l: socket_parent_frame=talus_l_offset socket_child_frame=calcn_l_offset
      Coordinate subtalar_angle_l: default_value=0 range=(-0.6981317 0.6981317) clamped=true
      PhysicalOffsetFrame talus_l_offset: socket_parent=/bodyset/talus_l
          translation=(-0.04569272 -0.04982717 -0.007420265) orientation=(1.76819 -0.906223 1.8196)
      PhysicalOffsetFrame calcn_l_offset: socket_parent=/bodyset/calcn_l translation=(0 0 0)
          orientation=(1.76819 -0.906223 1.8196)
    WeldJoint mtp_r: socket_parent_frame=calcn_r_offset socket_child_frame=toes_r_offset
      PhysicalOffsetFrame calcn_r_offset: socket_parent=/bodyset/calcn_r
          translation=(0.1835982 -0.002443976 0.001048656) orientation=(-3.14159 0.619901 0)
      PhysicalOffsetFrame toes_r_offset: socket_parent=/bodyset/toes_r translation=(0 0 0)
          orientation=(-3.14159 0.619901 0)
    WeldJoint mtp_l: socket_parent_frame=calcn_l_offset socket_child_frame=toes_l_offset
      PhysicalOffsetFrame calcn_l_offset: socket_parent=/bodyset/calcn_l
          translation=(0.1850742 -0.002418673 -0.001011854) orientation=(-3.14159 -0.619901 0)
      PhysicalOffsetFrame toes_l_offset: socket_parent=/bodyset/toes_l translation=(0 0 0)
          orientation=(-3.14159 -0.619901 0)
  ConstraintSet:
    CoordinateCouplerConstraint patellofemoral_knee_angle_r_con: independent_coordinate_names=knee_angle_r
        dependent_coordinate_name=knee_angle_r_beta scale_factor=1
        coupled_coordinates_function=LinearFunction(coefficients=1 0)
    CoordinateCouplerConstraint patellofemoral_knee_angle_l_con: independent_coordinate_names=knee_angle_l
        dependent_coordinate_name=knee_angle_l_beta scale_factor=1
        coupled_coordinates_function=LinearFunction(coefficients=1 0)
  ForceSet:
    DeGrooteFregly2016Muscle [values shared by the 80 below unless stated]: min_control=0.01 max_control=1
        max_contraction_velocity=30 ignore_tendon_compliance=true activation_time_constant=0.01
        deactivation_time_constant=0.04 default_activation=0.01 active_force_width_scale=1.5 fiber_damping=0.01
        tendon_strain_at_one_norm_force=0.049 ignore_passive_fiber_force=true
    DeGrooteFregly2016Muscle addbrev_r: max_isometric_force=950.7567 optimal_fiber_length=0.1137947
        tendon_slack_length=0.0391276 pennation_angle_at_optimal=0.1147809 [radians]
        passive_fiber_strain_at_one_norm_force=0.5015522
      PathPoint P1: pelvis (-0.0215035 -0.09414769 0.01495163)
      PathPoint P2: femur_r (-0.002437324 -0.1323782 0.03034469)
      PathWrap: wrap_object=AB_at_femshaft_r method=hybrid
    DeGrooteFregly2016Muscle addlong_r: max_isometric_force=1375.306 optimal_fiber_length=0.1209445
        tendon_slack_length=0.1473235 pennation_angle_at_optimal=0.1377704
        passive_fiber_strain_at_one_norm_force=0.5002995
      PathPoint P1: pelvis (-0.008533849 -0.08903967 0.01833031)
      PathPoint P2: femur_r (0.01372214 -0.268537 0.01929142)
      PathWrap: wrap_object=AL_at_femshaft_r method=hybrid
    DeGrooteFregly2016Muscle addmagDist_r: max_isometric_force=875.5356 optimal_fiber_length=0.2027041
        tendon_slack_length=0.09995724 pennation_angle_at_optimal=0.194705 passive_fiber_strain_at_one_norm_force=0.7
      PathPoint P1: pelvis (-0.08335702 -0.1278706 0.03866065)
      PathPoint P2: femur_r (0.01370995 -0.2944854 0.02352018)
      PathWrap: wrap_object=AMdist_at_femshaft_r method=hybrid
    DeGrooteFregly2016Muscle addmagIsch_r: max_isometric_force=878.0734 optimal_fiber_length=0.1781652
        tendon_slack_length=0.2467656 pennation_angle_at_optimal=0.1680443
        passive_fiber_strain_at_one_norm_force=0.7000392
      PathPoint P1: pelvis (-0.1008976 -0.1299639 0.04049562)
      PathPoint P2: femur_r (0.005861765 -0.4352438 -0.03988681)
      PathWrap: wrap_object=AMisch_at_condyles_r method=hybrid
    DeGrooteFregly2016Muscle addmagMid_r: max_isometric_force=881.8608 optimal_fiber_length=0.1563891
        tendon_slack_length=0.05295616 pennation_angle_at_optimal=0.2073076 passive_fiber_strain_at_one_norm_force=0.7
      PathPoint P1: pelvis (-0.05928661 -0.1209397 0.02770906)
      PathPoint P2: femur_r (0.002949162 -0.1821883 0.03560931)
      PathWrap: wrap_object=AMmid_at_femshaft_r method=hybrid
    DeGrooteFregly2016Muscle addmagProx_r: max_isometric_force=911.4518 optimal_fiber_length=0.1160387
        tendon_slack_length=0.04431018 pennation_angle_at_optimal=0.3114833 passive_fiber_strain_at_one_norm_force=0.7
      PathPoint P1: pelvis (-0.03487845 -0.107719 0.01325258)
      PathPoint P2: femur_r (-0.01860897 -0.08846901 0.03902156)
      PathWrap: wrap_object=AMprox_at_femshaft_r method=hybrid
    DeGrooteFregly2016Muscle bflh_r: max_isometric_force=1934.036 optimal_fiber_length=0.1111211
        tendon_slack_length=0.3702823 pennation_angle_at_optimal=0.1759182
        passive_fiber_strain_at_one_norm_force=0.7068715
      PathPoint P1: pelvis (-0.1170871 -0.1192871 0.05689387)
      PathPoint P2: tibia_r (-0.03272194 -0.04202307 0.02456573)
      PathPoint P3: tibia_r (-0.02786705 -0.05462999 0.02942061)
    DeGrooteFregly2016Muscle bfsh_r: max_isometric_force=824.7414 optimal_fiber_length=0.1249364
        tendon_slack_length=0.1198587 pennation_angle_at_optimal=0.2642232
        passive_fiber_strain_at_one_norm_force=0.6888986
      PathPoint P1: femur_r (0.00609331 -0.2368223 0.02851669)
      PathPoint P2: tibia_r (-0.02922642 -0.05030762 0.03087708)
      PathWrap: wrap_object=BF_at_gastroc_r method=hybrid
    DeGrooteFregly2016Muscle edl_r: max_isometric_force=881.1902 optimal_fiber_length=0.07958352
        tendon_slack_length=0.4236131 pennation_angle_at_optimal=0.2182582
        passive_fiber_strain_at_one_norm_force=0.7072192
      PathPoint P1: tibia_r (-0.01553564 -0.1389163 0.01990504)
      PathPoint P2: tibia_r (0.01592403 -0.4514478 0.01087495)
      PathPoint P3: calcn_r (0.09436621 0.04399156 0.0007767819)
      PathPoint P4: calcn_r (0.1659367 0.006720933 0.01262271)
      PathPoint P5: toes_r (0.0003080507 0.005743343 0.01485595)
      PathPoint P6: toes_r (0.04548883 -0.0004887951 0.02427443)
    DeGrooteFregly2016Muscle ehl_r: max_isometric_force=421.5228 optimal_fiber_length=0.08506071
        tendon_slack_length=0.3716235 pennation_angle_at_optimal=0.1972681
        passive_fiber_strain_at_one_norm_force=0.7178208
      PathPoint P1: tibia_r (-0.01359368 -0.1861022 0.01835147)
      PathPoint P2: tibia_r (0.006893939 -0.3492717 0.01592403)
      PathPoint P3: tibia_r (0.01941955 -0.4434034 -0.002718737)
      PathPoint P4: calcn_r (0.09960307 0.04753533 -0.02048762)
      PathPoint P5: calcn_r (0.1327699 0.03775942 -0.02495412)
      PathPoint P6: calcn_r (0.1780533 0.01698563 -0.02718737)
      PathPoint P7: toes_r (0.03059971 0.00501015 -0.02378895)
      PathPoint P8: toes_r (0.05781086 0.004154758 -0.01806018)
    DeGrooteFregly2016Muscle fdl_r: max_isometric_force=632.3643 optimal_fiber_length=0.05004645
        tendon_slack_length=0.4250277 pennation_angle_at_optimal=0.2248391
        passive_fiber_strain_at_one_norm_force=0.6997089
      PathPoint P1: tibia_r (-0.002233248 -0.2199607 -0.001747759)
      PathPoint P2: tibia_r (-0.0170892 -0.4376402 -0.01204012)
      PathPoint P3: calcn_r (0.04477004 0.03849262 -0.02718737)
      PathPoint P4: calcn_r (0.07269997 0.02150699 -0.02553671)
      PathPoint P5: calcn_r (0.1702494 -0.009898101 0.01126334)
      PathPoint P6: toes_r (-0.001950988 -0.009531505 0.01427337)
      PathPoint P7: toes_r (0.02926482 -0.008676113 0.02087601)
      PathPoint P8: toes_r (0.04528346 -0.007331927 0.02349765)
    DeGrooteFregly2016Muscle fhl_r: max_isometric_force=1367.418 optimal_fiber_length=0.05866808
        tendon_slack_length=0.3944673 pennation_angle_at_optimal=0.2580255
        passive_fiber_strain_at_one_norm_force=0.7002505
      PathPoint P1: tibia_r (-0.0301003 -0.2597026 0.01941955)
      PathPoint P2: tibia_r (-0.02349765 -0.4407619 -0.007379428)
      PathPoint P3: calcn_r (0.03840366 0.03372686 -0.02340056)
      PathPoint P4: calcn_r (0.1065856 0.008309517 -0.02485702)
      PathPoint P5: calcn_r (0.1772319 -0.006476535 -0.02611929)
      PathPoint P6: toes_r (0.01591595 -0.007820722 -0.0257309)
      PathPoint P7: toes_r (0.05770817 -0.01246428 -0.01757469)
    DeGrooteFregly2016Muscle gaslat_r: max_isometric_force=2226.975 optimal_fiber_length=0.06973378
        tendon_slack_length=0.4459999 pennation_angle_at_optimal=0.2102268
        passive_fiber_strain_at_one_norm_force=0.7435102
      PathPoint P1: femur_r (-0.003655986 -0.4278732 0.03375694)
      PathPoint P2: calcn_r (0.004518078 0.03788162 -0.00514618)
      PathWrap: wrap_object=GasLat_at_shank_r method=hybrid
      PathWrap pathwrap_0: wrap_object=Gastroc_at_condyles_r method=hybrid
    DeGrooteFregly2016Muscle gasmed_r: max_isometric_force=4401.421 optimal_fiber_length=0.06053279
        tendon_slack_length=0.4732434 pennation_angle_at_optimal=0.1656816
        passive_fiber_strain_at_one_norm_force=0.7902371
      PathPoint P1: femur_r (0.009749297 -0.4249564 -0.02534817)
      PathPoint P2: calcn_r (0.004518078 0.03788162 -0.00514618)
      PathWrap: wrap_object=GasMed_at_shank_r method=hybrid
      PathWrap pathwrap_0: wrap_object=Gastroc_at_condyles_r method=hybrid
    DeGrooteFregly2016Muscle glmax1_r: max_isometric_force=1557.663 optimal_fiber_length=0.155678
        tendon_slack_length=0.05172415 pennation_angle_at_optimal=0.3540118
        passive_fiber_strain_at_one_norm_force=0.8468075
      PathPoint P1: pelvis (-0.1385906 0.0345542 0.05466084)
      PathPoint P2: pelvis (-0.1415178 -0.02423802 0.07563196)
      PathPoint P3: femur_r (-0.0541086 -0.03657228 0.0368036)
      PathPoint P4: femur_r (-0.03375694 -0.06349666 0.05727712)
      PathWrap: wrap_object=Gmax1_at_pelvis_r method=hybrid
    DeGrooteFregly2016Muscle glmax2_r: max_isometric_force=2194.247 optimal_fiber_length=0.1686931
        tendon_slack_length=0.07294328 pennation_angle_at_optimal=0.3673821
        passive_fiber_strain_at_one_norm_force=0.7164175
      PathPoint P1: pelvis (-0.1482728 0.008713669 0.0448549)
      PathPoint P2: pelvis (-0.1513126 -0.06099568 0.07893297)
      PathPoint P3: femur_r (-0.05483979 -0.06551598 0.03071028)
      PathPoint P4: femur_r (-0.01901113 -0.1139799 0.05106194)
      PathWrap: wrap_object=Gmax2_at_pelvis_r method=hybrid
    DeGrooteFregly2016Muscle glmax3_r: max_isometric_force=1451.833 optimal_fiber_length=0.1828013
        tendon_slack_length=0.07631308 pennation_angle_at_optimal=0.3824161
        passive_fiber_strain_at_one_norm_force=0.7121937
      PathPoint P1: pelvis (-0.1463589 -0.05258249 0.008737967)
      PathPoint P2: pelvis (-0.1433191 -0.1264984 0.04223351)
      PathPoint P3: femur_r (-0.0342444 -0.126208 0.01145542)
      PathPoint P4: femur_r (-0.007311973 -0.1591904 0.05008701)
      PathWrap: wrap_object=Gmax3_at_pelvis_r method=hybrid
    DeGrooteFregly2016Muscle glmed1_r: max_isometric_force=1749.852 optimal_fiber_length=0.08029539
        tendon_slack_length=0.06139499 pennation_angle_at_optimal=0.3165559 passive_fiber_strain_at_one_norm_force=0.7
      PathPoint P1: pelvis (-0.05532074 0.02619435 0.1119318)
      PathPoint P2_0: femur_r (-0.01692935 -0.0205239 0.07213215)
    DeGrooteFregly2016Muscle glmed2_r: max_isometric_force=1235.171 optimal_fiber_length=0.08761887
        tendon_slack_length=0.07831544 pennation_angle_at_optimal=0.3165559
        passive_fiber_strain_at_one_norm_force=0.7014005
      PathPoint P1: pelvis (-0.09538921 0.05471975 0.07959659)
      PathPoint P2_0: femur_r (-0.02685446 -0.0111726 0.0683989)
    DeGrooteFregly2016Muscle glmed3_r: max_isometric_force=1382.182 optimal_fiber_length=0.082473
        tendon_slack_length=0.05110258 pennation_angle_at_optimal=0.3165559
        passive_fiber_strain_at_one_norm_force=0.7030514
      PathPoint P1: pelvis (-0.1124327 0.01558383 0.06204115)
      PathPoint P2_0: femur_r (-0.03765666 -0.00527269 0.0631267)
    DeGrooteFregly2016Muscle glmin1_r: max_isometric_force=594.8895 optimal_fiber_length=0.08586266
        tendon_slack_length=0.02037696 pennation_angle_at_optimal=0.1745329 passive_fiber_strain_at_one_norm_force=0.7
      PathPoint P1: pelvis (-0.03330175 -0.0001083867 0.1150057)
      PathPoint P2: femur_r (0.006689625 -0.01737587 0.06829115)
    DeGrooteFregly2016Muscle glmin2_r: max_isometric_force=629.2022 optimal_fiber_length=0.07232321
        tendon_slack_length=0.03370656 pennation_angle_at_optimal=0 passive_fiber_strain_at_one_norm_force=0.7000285
      PathPoint P1: pelvis (-0.06935159 0.01001598 0.09820051)
      PathPoint P2: femur_r (0.004318379 -0.01011041 0.06393629)
    DeGrooteFregly2016Muscle glmin3_r: max_isometric_force=685.1635 optimal_fiber_length=0.03869032
        tendon_slack_length=0.05179667 pennation_angle_at_optimal=0.01745329
        passive_fiber_strain_at_one_norm_force=0.7002322
      PathPoint P1: pelvis (-0.08882859 -0.01552435 0.07747664)
      PathPoint P2: femur_r (-0.004358103 -0.001421047 0.06247063)
    DeGrooteFregly2016Muscle grac_r: max_isometric_force=412.8116 optimal_fiber_length=0.2603002
        tendon_slack_length=0.196555 pennation_angle_at_optimal=0.1720016
        passive_fiber_strain_at_one_norm_force=0.8027483
      PathPoint P1: pelvis (-0.05331967 -0.1295232 0.02384494)
      PathPoint P2: tibia_r (-0.0178854 -0.05709134 -0.02875064)
      PathPoint P3: tibia_r (0.00172834 -0.08358989 -0.01527347)
      PathWrap: wrap_object=GR_at_condyles_r method=hybrid
    DeGrooteFregly2016Muscle iliacus_r: max_isometric_force=1607.049 optimal_fiber_length=0.1135788
        tendon_slack_length=0.1024135 pennation_angle_at_optimal=0.279914
        passive_fiber_strain_at_one_norm_force=0.5005449
      PathPoint P1: pelvis (-0.06811317 0.03094855 0.08184562)
      PathPoint P2: pelvis (-0.01519881 -0.05578751 0.07339892)
      PathPoint P3: femur_r (-0.002802923 -0.06338447 0.0169394)
      PathPoint P4: femur_r (-0.01486768 -0.07146178 0.02388578)
      PathWrap: wrap_object=IL_at_brim_r method=hybrid range=(2 3)
    DeGrooteFregly2016Muscle perbrev_r: max_isometric_force=748.3441 optimal_fiber_length=0.05302051
        tendon_slack_length=0.1722904 pennation_angle_at_optimal=0.2052361
        passive_fiber_strain_at_one_norm_force=0.6987541
      PathPoint P1: tibia_r (-0.02359475 -0.3040069 0.02437153)
      PathPoint P2: tibia_r (-0.03291613 -0.4674166 0.02417734)
      PathPoint P3: tibia_r (-0.02767286 -0.4807439 0.02475992)
      PathPoint P4: calcn_r (0.04836397 0.03299367 0.02262377)
      PathPoint P5: calcn_r (0.06951678 0.02676153 0.03330452)
    DeGrooteFregly2016Muscle perlong_r: max_isometric_force=1624.386 optimal_fiber_length=0.05848947
        tendon_slack_length=0.3825082 pennation_angle_at_optimal=0.2479525
        passive_fiber_strain_at_one_norm_force=0.6924185
      PathPoint P1: tibia_r (-0.01941955 -0.1648505 0.02738156)
      PathPoint P2: tibia_r (-0.03077998 -0.468257 0.02301216)
      PathPoint P3: tibia_r (-0.02641059 -0.4819446 0.02330346)
      PathPoint P4: calcn_r (0.04497541 0.02810572 0.0214586)
      PathPoint P5: calcn_r (0.06992752 0.01295307 0.02757576)
      PathPoint P6: calcn_r (0.08748641 0.008431716 0.01145753)
      PathPoint P7: calcn_r (0.1235283 0.0103869 -0.01786598)
    DeGrooteFregly2016Muscle piri_r: max_isometric_force=1647.91 optimal_fiber_length=0.027244
        tendon_slack_length=0.1204041 pennation_angle_at_optimal=0.1745329
        passive_fiber_strain_at_one_norm_force=0.7028348
      PathPoint P1: pelvis (-0.1146215 -0.00654026 0.01311666)
      PathPoint P2: pelvis (-0.114858 -0.03070817 0.05914633)
      PathPoint P3: femur_r (-0.0180362 -0.004038657 0.05325553)
    DeGrooteFregly2016Muscle psoas_r: max_isometric_force=2267.96 optimal_fiber_length=0.123317
        tendon_slack_length=0.1050074 pennation_angle_at_optimal=0.2155251
        passive_fiber_strain_at_one_norm_force=0.5010382
      PathPoint P1: pelvis (-0.06822576 0.06209741 0.03786452)
      PathPoint P2: pelvis (-0.02307967 -0.06550275 0.06369007)
      PathPoint P3: femur_r (-0.01608634 -0.05239035 0.005605846)
      PathPoint P4: femur_r (-0.02863856 -0.05878489 0.01072423)
      PathWrap: wrap_object=PS_at_brim_r method=hybrid range=(2 3)
    DeGrooteFregly2016Muscle recfem_r: max_isometric_force=3253.528 optimal_fiber_length=0.0857348
        tendon_slack_length=0.5066074 pennation_angle_at_optimal=0.2170149
        passive_fiber_strain_at_one_norm_force=0.8999622
      PathPoint P1: pelvis (-0.0270201 -0.03886096 0.09058359)
      PathPoint P2: patella_r (0.01121849 0.0549706 0.0007852943)
      PathPoint P3: patella_r (0.01357437 0.0490248 -0.001121849)
      PathPoint P4: patella_r (0.005609245 0.002770967 3.365547e-5)
      PathPoint P5: tibia_r (0.03165386 -0.0757856 -0.0004563594)
      PathWrap: wrap_object=KnExt_at_fem_r method=hybrid
    DeGrooteFregly2016Muscle sart_r: max_isometric_force=377.4065 optimal_fiber_length=0.4465799
        tendon_slack_length=0.137409 pennation_angle_at_optimal=0.02613542
        passive_fiber_strain_at_one_norm_force=0.7212821
      PathPoint P1: pelvis (-0.02195383 -0.01562451 0.1025255)
      PathPoint P2: femur_r (-0.003655986 -0.4002757 -0.05130567)
      PathPoint P3: tibia_r (-0.02437153 -0.04814643 -0.03544067)
      PathPoint P4: tibia_r (-0.01543854 -0.07191948 -0.0256338)
      PathPoint P5: tibia_r (0.01320529 -0.09725339 -0.002524541)
    DeGrooteFregly2016Muscle semimem_r: max_isometric_force=3230.747 optimal_fiber_length=0.0788224
        tendon_slack_length=0.3970661 pennation_angle_at_optimal=0.2545615
        passive_fiber_strain_at_one_norm_force=0.7353994
      PathPoint P1: pelvis (-0.1111202 -0.1141791 0.05961235)
      PathPoint P2: tibia_r (-0.02815834 -0.05006748 -0.01903116)
      PathWrap: wrap_object=SM_at_condyles_r method=hybrid
    DeGrooteFregly2016Muscle semiten_r: max_isometric_force=870.2164 optimal_fiber_length=0.2198977
        tendon_slack_length=0.2816501 pennation_angle_at_optimal=0.241295
        passive_fiber_strain_at_one_norm_force=0.7803276
      PathPoint P1: pelvis (-0.1168619 -0.1254969 0.05000059)
      PathPoint P2: tibia_r (-0.03029449 -0.06099348 -0.02223538)
      PathPoint P3: tibia_r (0.001844857 -0.09281095 -0.01136044)
      PathWrap: wrap_object=ST_at_condyles_r method=hybrid
    DeGrooteFregly2016Muscle soleus_r: max_isometric_force=8699.328 optimal_fiber_length=0.05253889
        tendon_slack_length=0.3304647 pennation_angle_at_optimal=0.3814289
        passive_fiber_strain_at_one_norm_force=0.8506533
      PathPoint P1: tibia_r (-0.007379428 -0.1099804 0.009515578)
      PathPoint P2: calcn_r (0.004518078 0.03788162 -0.00514618)
    DeGrooteFregly2016Muscle tfl_r: max_isometric_force=620.4251 optimal_fiber_length=0.1035082
        tendon_slack_length=0.489754 pennation_angle_at_optimal=0.05235988
        passive_fiber_strain_at_one_norm_force=0.7197196
      PathPoint P1: pelvis (-0.0228993 0.0108684 0.1255331)
      PathPoint P2: femur_r (0.03582867 -0.111624 0.07275413)
      PathPoint P3: femur_r (0.01303968 -0.4543489 0.03948465)
      PathPoint P4: tibia_r (0.01048656 -0.04922702 0.03359582)
    DeGrooteFregly2016Muscle tibant_r: max_isometric_force=1725.82 optimal_fiber_length=0.0814542
        tendon_slack_length=0.2867725 pennation_angle_at_optimal=0.1951828
        passive_fiber_strain_at_one_norm_force=0.7076768
      PathPoint P1: tibia_r (0.01495305 -0.1575265 0.01572983)
      PathPoint P2: tibia_r (0.02437153 -0.2288456 0.01242851)
      PathPoint P3: tibia_r (0.02262377 -0.4393212 -0.0128169)
      PathPoint P4: calcn_r (0.1197291 0.02175138 -0.02961481)
    DeGrooteFregly2016Muscle tibpost_r: max_isometric_force=2459.908 optimal_fiber_length=0.04458014
        tendon_slack_length=0.3311427 pennation_angle_at_optimal=0.2264891
        passive_fiber_strain_at_one_norm_force=0.6862359
      PathPoint P1: tibia_r (-0.003981007 -0.1565659 0.01000107)
      PathPoint P2: tibia_r (-0.01592403 -0.4388409 -0.0169921)
      PathPoint P3: calcn_r (0.04281905 0.04081439 -0.02776995)
      PathPoint P4: calcn_r (0.07927172 0.01942961 -0.02728446)
    DeGrooteFregly2016Muscle vasint_r: max_isometric_force=2464.332 optimal_fiber_length=0.1146839
        tendon_slack_length=0.2335379 pennation_angle_at_optimal=0.06309973
        passive_fiber_strain_at_one_norm_force=0.8514363
      PathPoint P1: femur_r (0.0353412 -0.2158438 0.03777852)
      PathPoint P2: femur_r (0.04082518 -0.2337933 0.03473187)
      PathPoint P3: patella_r (0.006506724 0.05384875 -0.0006731094)
      PathPoint P4: patella_r (0.005609245 0.002770967 -0.0004375211)
      PathPoint P5: tibia_r (0.03162473 -0.07588165 0.0004175203)
      PathWrap: wrap_object=KnExt_at_fem_r method=hybrid
    DeGrooteFregly2016Muscle vaslat_r: max_isometric_force=7457.243 optimal_fiber_length=0.1150776
        tendon_slack_length=0.2553949 pennation_angle_at_optimal=0.2528673
        passive_fiber_strain_at_one_norm_force=0.8928189
      PathPoint P1: femur_r (0.005849578 -0.2079908 0.04253131)
      PathPoint P2: femur_r (0.03278201 -0.2906711 0.04984328)
      PathPoint P3: patella_r (0.01155505 0.04745421 0.01581807)
      PathPoint P4: patella_r (0.005609245 0.002770967 0.008223153)
      PathPoint P5: tibia_r (0.0315956 -0.07609777 0.004961694)
      PathWrap: wrap_object=KnExt_at_fem_r method=hybrid
    DeGrooteFregly2016Muscle vasmed_r: max_isometric_force=3977.877 optimal_fiber_length=0.1121221
        tendon_slack_length=0.2315463 pennation_angle_at_optimal=0.4222225
        passive_fiber_strain_at_one_norm_force=0.8518332
      PathPoint P1: femur_r (0.01706127 -0.2354761 0.02291085)
      PathPoint P2: femur_r (0.04338437 -0.31064 0.001096796)
      PathPoint P3: patella_r (0.007067649 0.04992228 -0.01907143)
      PathPoint P4: patella_r (0.005609245 0.002770967 -0.009535717)
      PathPoint P5: tibia_r (0.03097418 -0.0763259 -0.006583227)
      PathWrap: wrap_object=KnExt_at_fem_r method=hybrid
    DeGrooteFregly2016Muscle addbrev_l: max_isometric_force=956.6395 optimal_fiber_length=0.1130949
        tendon_slack_length=0.03888699 pennation_angle_at_optimal=0.1147809
        passive_fiber_strain_at_one_norm_force=0.5015522
      PathPoint P1: pelvis (-0.0215035 -0.09414769 -0.01495163)
      PathPoint P2: femur_l (-0.002418866 -0.1313097 -0.03011488)
      PathWrap: wrap_object=AB_at_femshaft_l method=hybrid
    DeGrooteFregly2016Muscle addlong_l: max_isometric_force=1385.872 optimal_fiber_length=0.1200224
        tendon_slack_length=0.1462004 pennation_angle_at_optimal=0.1377704
        passive_fiber_strain_at_one_norm_force=0.5002995
      PathPoint P1: pelvis (-0.008533849 -0.08903967 -0.01833031)
      PathPoint P2: femur_l (0.01361821 -0.2663696 -0.01914532)
      PathWrap: wrap_object=AL_at_femshaft_l method=hybrid
    DeGrooteFregly2016Muscle addmagDist_l: max_isometric_force=883.6834 optimal_fiber_length=0.2008351
        tendon_slack_length=0.09903561 pennation_angle_at_optimal=0.194705 passive_fiber_strain_at_one_norm_force=0.7
      PathPoint P1: pelvis (-0.08335702 -0.1278706 -0.03866065)
      PathPoint P2: femur_l (0.01360612 -0.2921085 -0.02334205)
      PathWrap: wrap_object=AMdist_at_femshaft_l method=hybrid
    DeGrooteFregly2016Muscle addmagIsch_l: max_isometric_force=886.105 optimal_fiber_length=0.1765503
        tendon_slack_length=0.2445289 pennation_angle_at_optimal=0.1680443
        passive_fiber_strain_at_one_norm_force=0.7000392
      PathPoint P1: pelvis (-0.1008976 -0.1299639 -0.04049562)
      PathPoint P2: femur_l (0.005817372 -0.4317308 0.03958474)
      PathWrap: wrap_object=AMisch_at_condyles_l method=hybrid
    DeGrooteFregly2016Muscle addmagMid_l: max_isometric_force=889.5348 optimal_fiber_length=0.1550399
        tendon_slack_length=0.05249932 pennation_angle_at_optimal=0.2073076 passive_fiber_strain_at_one_norm_force=0.7
      PathPoint P1: pelvis (-0.05928661 -0.1209397 -0.02770906)
      PathPoint P2: femur_l (0.002926827 -0.1807178 -0.03533963)
      PathWrap: wrap_object=AMmid_at_femshaft_l method=hybrid
    DeGrooteFregly2016Muscle addmagProx_l: max_isometric_force=916.0545 optimal_fiber_length=0.1154557
        tendon_slack_length=0.04408755 pennation_angle_at_optimal=0.3114833 passive_fiber_strain_at_one_norm_force=0.7
      PathPoint P1: pelvis (-0.03487845 -0.107719 -0.01325258)
      PathPoint P2: femur_l (-0.01846804 -0.08775496 -0.03872604)
      PathWrap: wrap_object=AMprox_at_femshaft_l method=hybrid
    DeGrooteFregly2016Muscle bflh_l: max_isometric_force=1952.054 optimal_fiber_length=0.1100952
        tendon_slack_length=0.3668638 pennation_angle_at_optimal=0.1759182
        passive_fiber_strain_at_one_norm_force=0.7068715
      PathPoint P1: pelvis (-0.1170871 -0.1192871 -0.05689387)
      PathPoint P2: tibia_l (-0.0315736 -0.04157213 -0.02370362)
      PathPoint P3: tibia_l (-0.02688909 -0.05404377 -0.02838813)
    DeGrooteFregly2016Muscle bfsh_l: max_isometric_force=832.0737 optimal_fiber_length=0.1238352
        tendon_slack_length=0.1188023 pennation_angle_at_optimal=0.2642232
        passive_fiber_strain_at_one_norm_force=0.6888986
      PathPoint P1: femur_l (0.006047164 -0.2349109 -0.02830073)
      PathPoint P2: tibia_l (-0.02820075 -0.04976778 -0.02979349)
      PathWrap: wrap_object=BF_at_gastroc_l method=hybrid
    DeGrooteFregly2016Muscle edl_l: max_isometric_force=883.4807 optimal_fiber_length=0.07937719
        tendon_slack_length=0.4225149 pennation_angle_at_optimal=0.2182582
        passive_fiber_strain_at_one_norm_force=0.7072192
      PathPoint P1: tibia_l (-0.01499043 -0.1374256 -0.01920649)
      PathPoint P2: tibia_l (0.0153652 -0.4466035 -0.0104933)
      PathPoint P3: calcn_l (0.09512484 0.04353611 -0.0007495217)
      PathPoint P4: calcn_l (0.1672707 0.006651351 -0.01217973)
      PathPoint P5: toes_l (0.0003105272 0.005683881 -0.0143346)
      PathPoint P6: toes_l (0.04585452 -0.0004837346 -0.02342255)
    DeGrooteFregly2016Muscle ehl_l: max_isometric_force=422.2582 optimal_fiber_length=0.08491257
        tendon_slack_length=0.3709763 pennation_angle_at_optimal=0.1972681
        passive_fiber_strain_at_one_norm_force=0.7178208
      PathPoint P1: tibia_l (-0.01311663 -0.1841051 -0.01770745)
      PathPoint P2: tibia_l (0.006652005 -0.3455238 -0.0153652)
      PathPoint P3: tibia_l (0.01873804 -0.4386454 0.002623326)
      PathPoint P4: calcn_l (0.1004038 0.04704319 0.01976864)
      PathPoint P5: calcn_l (0.1338372 0.0373685 0.02407839)
      PathPoint P6: calcn_l (0.1794847 0.01680978 0.02623326)
      PathPoint P7: toes_l (0.0308457 0.004958279 0.0229541)
      PathPoint P8: toes_l (0.05827561 0.004111744 0.01742638)
    DeGrooteFregly2016Muscle fdl_l: max_isometric_force=635.2978 optimal_fiber_length=0.04981536
        tendon_slack_length=0.4230651 pennation_angle_at_optimal=0.2248391
        passive_fiber_strain_at_one_norm_force=0.6997089
      PathPoint P1: tibia_l (-0.002154875 -0.2176004 0.001686424)
      PathPoint P2: tibia_l (-0.01648948 -0.432944 0.01161759)
      PathPoint P3: calcn_l (0.04512996 0.0380941 0.02623326)
      PathPoint P4: calcn_l (0.07328442 0.02128432 0.02464053)
      PathPoint P5: calcn_l (0.171618 -0.009795625 -0.01086806)
      PathPoint P6: toes_l (-0.001966672 -0.009432824 -0.01377246)
      PathPoint P7: toes_l (0.02950009 -0.008586289 -0.0201434)
      PathPoint P8: toes_l (0.0456475 -0.007256019 -0.02267303)
    DeGrooteFregly2016Muscle fhl_l: max_isometric_force=1371.023 optimal_fiber_length=0.05851382
        tendon_slack_length=0.3934301 pennation_angle_at_optimal=0.2580255
        passive_fiber_strain_at_one_norm_force=0.7002505
      PathPoint P1: tibia_l (-0.02904397 -0.2569158 -0.01873804)
      PathPoint P2: tibia_l (-0.02267303 -0.4360323 0.007120456)
      PathPoint P3: calcn_l (0.03871239 0.03337769 0.02257934)
      PathPoint P4: calcn_l (0.1074424 0.008223488 0.02398469)
      PathPoint P5: calcn_l (0.1786567 -0.006409483 0.02520267)
      PathPoint P6: toes_l (0.01604391 -0.007739753 0.02482791)
      PathPoint P7: toes_l (0.0581721 -0.01233523 0.01695793)
    DeGrooteFregly2016Muscle gaslat_l: max_isometric_force=2252.531 optimal_fiber_length=0.0689426
        tendon_slack_length=0.4409397 pennation_angle_at_optimal=0.2102268
        passive_fiber_strain_at_one_norm_force=0.7435102
      PathPoint P1: femur_l (-0.003628298 -0.4244197 -0.03350129)
      PathPoint P2: calcn_l (0.004554399 0.03748943 0.004965581)
      PathWrap: wrap_object=GasLat_at_shank_l method=hybrid
      PathWrap pathwrap_0: wrap_object=Gastroc_at_condyles_l method=hybrid
    DeGrooteFregly2016Muscle gasmed_l: max_isometric_force=4451.427 optimal_fiber_length=0.05985279
        tendon_slack_length=0.4679271 pennation_angle_at_optimal=0.1656816
        passive_fiber_strain_at_one_norm_force=0.7902371
      PathPoint P1: femur_l (0.009675463 -0.4215265 0.0251562)
      PathPoint P2: calcn_l (0.004554399 0.03748943 0.004965581)
      PathWrap: wrap_object=GasMed_at_shank_l method=hybrid
      PathWrap pathwrap_0: wrap_object=Gastroc_at_condyles_l method=hybrid
    DeGrooteFregly2016Muscle glmax1_l: max_isometric_force=1562.096 optimal_fiber_length=0.1552361
        tendon_slack_length=0.05157736 pennation_angle_at_optimal=0.3540118
        passive_fiber_strain_at_one_norm_force=0.8468075
      PathPoint P1: pelvis (-0.1385906 0.0345542 -0.05466084)
      PathPoint P2: pelvis (-0.1415178 -0.02423802 -0.07563196)
      PathPoint P3: femur_l (-0.05369882 -0.03627709 -0.03652487)
      PathPoint P4: femur_l (-0.03350129 -0.06298416 -0.05684334)
      PathWrap: wrap_object=Gmax1_at_pelvis_l method=hybrid
    DeGrooteFregly2016Muscle glmax2_l: max_isometric_force=2202.584 optimal_fiber_length=0.1680545
        tendon_slack_length=0.07266716 pennation_angle_at_optimal=0.3673821
        passive_fiber_strain_at_one_norm_force=0.7164175
      PathPoint P1: pelvis (-0.1482728 0.008713669 -0.0448549)
      PathPoint P2: pelvis (-0.1513126 -0.06099568 -0.07893297)
      PathPoint P3: femur_l (-0.05442448 -0.06498719 -0.03047771)
      PathPoint P4: femur_l (-0.01886715 -0.1130599 -0.05067523)
      PathWrap: wrap_object=Gmax2_at_pelvis_l method=hybrid
    DeGrooteFregly2016Muscle glmax3_l: max_isometric_force=1458.853 optimal_fiber_length=0.1819216
        tendon_slack_length=0.07594583 pennation_angle_at_optimal=0.3824161
        passive_fiber_strain_at_one_norm_force=0.7121937
      PathPoint P1: pelvis (-0.1463589 -0.05258249 -0.008737967)
      PathPoint P2: pelvis (-0.1433191 -0.1264984 -0.04223351)
      PathPoint P3: femur_l (-0.03398506 -0.1251894 -0.01136867)
      PathPoint P4: femur_l (-0.007256597 -0.1579055 -0.04970769)
      PathWrap: wrap_object=Gmax3_at_pelvis_l method=hybrid
    DeGrooteFregly2016Muscle glmed1_l: max_isometric_force=1754.067 optimal_fiber_length=0.0798634
        tendon_slack_length=0.06106469 pennation_angle_at_optimal=0.3165559 passive_fiber_strain_at_one_norm_force=0.7
      PathPoint P1: pelvis (-0.05516604 0.02604085 -0.1116518)
      PathPoint P2: femur_l (-0.01693206 -0.0200303 -0.07135654)
    DeGrooteFregly2016Muscle glmed2_l: max_isometric_force=1237.698 optimal_fiber_length=0.08763998
        tendon_slack_length=0.07833431 pennation_angle_at_optimal=0.3165559
        passive_fiber_strain_at_one_norm_force=0.7014005
      PathPoint P1: pelvis (-0.0956962 0.05508641 -0.07961259)
      PathPoint P2: femur_l (-0.02660752 -0.01112794 -0.06772824)
    DeGrooteFregly2016Muscle glmed3_l: max_isometric_force=1385.859 optimal_fiber_length=0.08247997
        tendon_slack_length=0.0511069 pennation_angle_at_optimal=0.3165559
        passive_fiber_strain_at_one_norm_force=0.7030514
      PathPoint P1: pelvis (-0.1125838 0.01602514 -0.06213665)
      PathPoint P2: femur_l (-0.03737147 -0.005230133 -0.06264862)
    DeGrooteFregly2016Muscle glmin1_l: max_isometric_force=596.227 optimal_fiber_length=0.08541761
        tendon_slack_length=0.02027133 pennation_angle_at_optimal=0.1745329 passive_fiber_strain_at_one_norm_force=0.7
      PathPoint P1: pelvis (-0.03377513 0 -0.1145645)
      PathPoint P2: femur_l (0.006047164 -0.01669191 -0.06772824)
    DeGrooteFregly2016Muscle glmin2_l: max_isometric_force=631.0481 optimal_fiber_length=0.07206911
        tendon_slack_length=0.03358813 pennation_angle_at_optimal=0 passive_fiber_strain_at_one_norm_force=0.7000285
      PathPoint P1: pelvis (-0.0693516 0.01001571 -0.09805941)
      PathPoint P2: femur_l (0.004837731 -0.01001515 -0.06289051)
    DeGrooteFregly2016Muscle glmin3_l: max_isometric_force=687.8571 optimal_fiber_length=0.03832605
        tendon_slack_length=0.051309 pennation_angle_at_optimal=0.01745329
        passive_fiber_strain_at_one_norm_force=0.7002322
      PathPoint P1: pelvis (-0.08882859 -0.01552435 -0.07747664)
      PathPoint P2: femur_l (-0.004837731 -0.001112794 -0.06168107)
    DeGrooteFregly2016Muscle grac_l: max_isometric_force=416.9436 optimal_fiber_length=0.2577203
        tendon_slack_length=0.1946069 pennation_angle_at_optimal=0.1720016
        passive_fiber_strain_at_one_norm_force=0.8027483
      PathPoint P1: pelvis (-0.05331967 -0.1295232 -0.02384494)
      PathPoint P2: tibia_l (-0.01725774 -0.05647871 0.02774167)
      PathPoint P3: tibia_l (0.001667686 -0.08269291 0.01473747)
      PathWrap: wrap_object=GR_at_condyles_l method=hybrid
    DeGrooteFregly2016Muscle iliacus_l: max_isometric_force=1611.075 optimal_fiber_length=0.113295
        tendon_slack_length=0.1021576 pennation_angle_at_optimal=0.279914
        passive_fiber_strain_at_one_norm_force=0.5005449
      PathPoint P1: pelvis (-0.06811317 0.03094855 -0.08184562)
      PathPoint P2: pelvis (-0.01519881 -0.05578751 -0.07339892)
      PathPoint P3: femur_l (-0.002781695 -0.06287288 -0.01681112)
      PathPoint P4: femur_l (-0.01475508 -0.070885 -0.02370488)
      PathWrap: wrap_object=IL_at_brim_l method=hybrid range=(2 3)
    DeGrooteFregly2016Muscle perbrev_l: max_isometric_force=751.9823 optimal_fiber_length=0.05276398
        tendon_slack_length=0.1714568 pennation_angle_at_optimal=0.2052361
        passive_fiber_strain_at_one_norm_force=0.6987541
      PathPoint P1: tibia_l (-0.02276672 -0.3007447 -0.02351624)
      PathPoint P2: tibia_l (-0.03176098 -0.4624009 -0.02332886)
      PathPoint P3: tibia_l (-0.02670171 -0.4755852 -0.023891)
      PathPoint P4: calcn_l (0.04875277 0.03265208 -0.02182982)
      PathPoint P5: calcn_l (0.07007564 0.02648447 -0.03213574)
    DeGrooteFregly2016Muscle perlong_l: max_isometric_force=1637.279 optimal_fiber_length=0.05802886
        tendon_slack_length=0.3794959 pennation_angle_at_optimal=0.2479525
        passive_fiber_strain_at_one_norm_force=0.6924185
      PathPoint P1: tibia_l (-0.01873804 -0.1630815 -0.02642064)
      PathPoint P2: tibia_l (-0.0296998 -0.4632323 -0.02220458)
      PathPoint P3: tibia_l (-0.02548374 -0.4767729 -0.02248565)
      PathPoint P4: calcn_l (0.04533697 0.02781474 -0.02070554)
      PathPoint P5: calcn_l (0.07048968 0.01281897 -0.02660802)
      PathPoint P6: calcn_l (0.08818973 0.008344422 -0.01105545)
      PathPoint P7: calcn_l (0.1245214 0.01027936 0.017239)
    DeGrooteFregly2016Muscle piri_l: max_isometric_force=1650.98 optimal_fiber_length=0.02719334
        tendon_slack_length=0.1201802 pennation_angle_at_optimal=0.1745329
        passive_fiber_strain_at_one_norm_force=0.7028348
      PathPoint P1: pelvis (-0.1146215 -0.00654026 -0.01311666)
      PathPoint P2: pelvis (-0.114858 -0.03070817 -0.05914633)
      PathPoint P3: femur_l (-0.01789961 -0.004006059 -0.05285221)
    DeGrooteFregly2016Muscle psoas_l: max_isometric_force=2272.668 optimal_fiber_length=0.1230615
        tendon_slack_length=0.1047898 pennation_angle_at_optimal=0.2155251
        passive_fiber_strain_at_one_norm_force=0.5010382
      PathPoint P1: pelvis (-0.06822576 0.06209741 -0.03786452)
      PathPoint P2: pelvis (-0.02307967 -0.06550275 -0.06369007)
      PathPoint P3: femur_l (-0.01596451 -0.05196749 -0.005563391)
      PathPoint P4: femur_l (-0.02842167 -0.05831042 -0.01064301)
      PathWrap: wrap_object=PS_at_brim_l method=hybrid range=(2 3)
    DeGrooteFregly2016Muscle recfem_l: max_isometric_force=3276.449 optimal_fiber_length=0.08513521
        tendon_slack_length=0.5030645 pennation_angle_at_optimal=0.2170149
        passive_fiber_strain_at_one_norm_force=0.8999622
      PathPoint P1: pelvis (-0.0270201 -0.03886096 -0.09058359)
      PathPoint P2: patella_l (0.01112794 0.05452692 -0.000778956)
      PathPoint P3: patella_l (0.01346481 0.04862911 0.001112794)
      PathPoint P4: patella_l (0.005563971 0.002748602 -3.338383e-5)
      PathPoint P5: tibia_l (0.03054301 -0.07497237 0.000440344)
      PathWrap: wrap_object=KnExt_at_fem_l method=hybrid
    DeGrooteFregly2016Muscle sart_l: max_isometric_force=380.8258 optimal_fiber_length=0.4425701
        tendon_slack_length=0.1361752 pennation_angle_at_optimal=0.02613542
        passive_fiber_strain_at_one_norm_force=0.7212821
      PathPoint P1: pelvis (-0.02195383 -0.01562451 -0.1025255)
      PathPoint P2: femur_l (-0.003628298 -0.397045 0.05091712)
      PathPoint P3: tibia_l (-0.02351624 -0.04762978 0.03419693)
      PathPoint P4: tibia_l (-0.01489674 -0.07114773 0.02473422)
      PathPoint P5: tibia_l (0.01274187 -0.09620979 0.002435946)
    DeGrooteFregly2016Muscle semimem_l: max_isometric_force=3258.913 optimal_fiber_length=0.07814102
        tendon_slack_length=0.3936337 pennation_angle_at_optimal=0.2545615
        passive_fiber_strain_at_one_norm_force=0.7353994
      PathPoint P1: pelvis (-0.1111202 -0.1141791 -0.05961235)
      PathPoint P2: tibia_l (-0.02717016 -0.04953022 0.01836328)
      PathWrap: wrap_object=SM_at_condyles_l method=hybrid
    DeGrooteFregly2016Muscle semiten_l: max_isometric_force=879.2124 optimal_fiber_length=0.2176473
        tendon_slack_length=0.2787678 pennation_angle_at_optimal=0.241295
        passive_fiber_strain_at_one_norm_force=0.7803276
      PathPoint P1: pelvis (-0.1168619 -0.1254969 -0.05000059)
      PathPoint P2: tibia_l (-0.02923135 -0.06033898 0.02145506)
      PathPoint P3: tibia_l (0.001780114 -0.09181502 0.01096176)
      PathWrap: wrap_object=ST_at_condyles_l method=hybrid
    DeGrooteFregly2016Muscle soleus_l: max_isometric_force=8797.54 optimal_fiber_length=0.05195237
        tendon_slack_length=0.3267755 pennation_angle_at_optimal=0.3814289
        passive_fiber_strain_at_one_norm_force=0.8506533
      PathPoint P1: tibia_l (-0.007120456 -0.1088002 -0.009181641)
      PathPoint P2: calcn_l (0.004554399 0.03748943 0.004965581)
    DeGrooteFregly2016Muscle tfl_l: max_isometric_force=624.6496 optimal_fiber_length=0.1028413
        tendon_slack_length=0.4865987 pennation_angle_at_optimal=0.05235988
        passive_fiber_strain_at_one_norm_force=0.7197196
      PathPoint P1: pelvis (-0.02251675 0.01101728 -0.1252442)
      PathPoint P2: femur_l (0.03555732 -0.110723 -0.07220314)
      PathPoint P3: femur_l (0.01294093 -0.4506817 -0.03918562)
      PathPoint P4: tibia_l (0.01011854 -0.04869878 -0.03241681)
    DeGrooteFregly2016Muscle tibant_l: max_isometric_force=1734.829 optimal_fiber_length=0.08103122
        tendon_slack_length=0.2852833 pennation_angle_at_optimal=0.1951828
        passive_fiber_strain_at_one_norm_force=0.7076768
      PathPoint P1: tibia_l (0.01442829 -0.1558361 -0.01517781)
      PathPoint P2: tibia_l (0.02351624 -0.2263899 -0.01199235)
      PathPoint P3: tibia_l (0.02182982 -0.4346069 0.01236711)
      PathPoint P4: calcn_l (0.1206916 0.02152619 0.02857552)
    DeGrooteFregly2016Muscle tibpost_l: max_isometric_force=2482.643 optimal_fiber_length=0.04417188
        tendon_slack_length=0.3281101 pennation_angle_at_optimal=0.2264891
        passive_fiber_strain_at_one_norm_force=0.6862359
      PathPoint P1: tibia_l (-0.003841299 -0.1548859 -0.009650092)
      PathPoint P2: tibia_l (-0.0153652 -0.4341318 0.01639579)
      PathPoint P3: calcn_l (0.04316328 0.04039184 0.0267954)
      PathPoint P4: calcn_l (0.079909 0.01922845 0.02632695)
    DeGrooteFregly2016Muscle vasint_l: max_isometric_force=2481.936 optimal_fiber_length=0.113871
        tendon_slack_length=0.2318824 pennation_angle_at_optimal=0.06309973
        passive_fiber_strain_at_one_norm_force=0.8514363
      PathPoint P1: femur_l (0.03507355 -0.2141016 -0.03749242)
      PathPoint P2: femur_l (0.040516 -0.2319063 -0.03446884)
      PathPoint P3: patella_l (0.006454207 0.05341413 0.0006676766)
      PathPoint P4: patella_l (0.005563971 0.002748602 0.0004339898)
      PathPoint P5: tibia_l (0.0305149 -0.07506739 -0.0004028679)
      PathWrap: wrap_object=KnExt_at_fem_l method=hybrid
    DeGrooteFregly2016Muscle vaslat_l: max_isometric_force=7510.481 optimal_fiber_length=0.1142622
        tendon_slack_length=0.2535854 pennation_angle_at_optimal=0.2528673
        passive_fiber_strain_at_one_norm_force=0.8928189
      PathPoint P1: femur_l (0.005805278 -0.2063121 -0.04220921)
      PathPoint P2: femur_l (0.03253374 -0.288325 -0.0494658)
      PathPoint P3: patella_l (0.01146178 0.0470712 -0.0156904)
      PathPoint P4: patella_l (0.005563971 0.002748602 -0.008156782)
      PathPoint P5: tibia_l (0.0304868 -0.07528119 -0.00478757)
      PathWrap: wrap_object=KnExt_at_fem_l method=hybrid
    DeGrooteFregly2016Muscle vasmed_l: max_isometric_force=4006.113 optimal_fiber_length=0.1113322
        tendon_slack_length=0.2299152 pennation_angle_at_optimal=0.4222225
        passive_fiber_strain_at_one_norm_force=0.8518332
      PathPoint P1: femur_l (0.01693206 -0.2335755 -0.02273734)
      PathPoint P2: femur_l (0.04305581 -0.3081327 -0.00108849)
      PathPoint P3: patella_l (0.007010604 0.04951935 0.0189175)
      PathPoint P4: patella_l (0.005563971 0.002748602 0.009458751)
      PathPoint P5: tibia_l (0.02988718 -0.07550687 0.006352197)
      PathWrap: wrap_object=KnExt_at_fem_l method=hybrid
    CoordinateActuator pelvis_tx_residual: coordinate=pelvis_tx optimal_force=5
    CoordinateActuator pelvis_ty_residual: coordinate=pelvis_ty optimal_force=5
    CoordinateActuator pelvis_tz_residual: coordinate=pelvis_tz optimal_force=5
    CoordinateActuator pelvis_tilt_residual: coordinate=pelvis_tilt optimal_force=2.5
    CoordinateActuator pelvis_list_residual: coordinate=pelvis_list optimal_force=2.5
    CoordinateActuator pelvis_rotation_residual: coordinate=pelvis_rotation optimal_force=2.5
    CoordinateActuator hip_flexion_r_reserve: coordinate=hip_flexion_r optimal_force=2.5
    CoordinateActuator hip_adduction_r_reserve: coordinate=hip_adduction_r optimal_force=1
    CoordinateActuator hip_rotation_r_reserve: coordinate=hip_rotation_r optimal_force=1
    CoordinateActuator knee_angle_r_reserve: coordinate=knee_angle_r optimal_force=2.5
    CoordinateActuator ankle_angle_r_reserve: coordinate=ankle_angle_r optimal_force=2.5
    CoordinateActuator subtalar_angle_r_reserve: coordinate=subtalar_angle_r optimal_force=1
    CoordinateActuator hip_flexion_l_reserve: coordinate=hip_flexion_l optimal_force=2.5
    CoordinateActuator hip_adduction_l_reserve: coordinate=hip_adduction_l optimal_force=1
    CoordinateActuator hip_rotation_l_reserve: coordinate=hip_rotation_l optimal_force=1
    CoordinateActuator knee_angle_l_reserve: coordinate=knee_angle_l optimal_force=2.5
    CoordinateActuator ankle_angle_l_reserve: coordinate=ankle_angle_l optimal_force=2.5
    CoordinateActuator subtalar_angle_l_reserve: coordinate=subtalar_angle_l optimal_force=1
  MarkerSet:
    Marker R.ASIS: pelvis (0.011493 -0.005340009 0.1099971) fixed=true
    Marker L.ASIS: pelvis (0.011493 -0.005340007 -0.1099974) fixed=true
    Marker R.PSIS: pelvis (-0.1719402 0.03102166 0.04421741) fixed=true
    Marker L.PSIS: pelvis (-0.1719397 0.03102163 -0.04421738) fixed=true
    Marker R.Iliac.Crest: pelvis (-0.07324165 0.05307998 0.1631148)
    Marker L.Iliac.Crest: pelvis (-0.07137692 0.05912881 -0.1593946)
    Marker R.Thigh.Top.Lateral: femur_r (-0.05338135 -0.2406084 0.1035246)
    Marker R.Thigh.Bottom.Lateral: femur_r (-0.03986056 -0.3503182 0.0948453)
    Marker R.Thigh.Top.Medial: femur_r (-0.1000026 -0.2410315 0.05085928)
    Marker R.Thigh.Bottom.Medial: femur_r (-0.09009905 -0.350346 0.04013852)
    Marker R.Shank.Top.Lateral: tibia_r (-0.04550819 -0.2896915 0.0782137)
    Marker R.Shank.Bottom.Lateral: tibia_r (-0.03098936 -0.3673813 0.05973995)
    Marker R.Shank.Top.Medial: tibia_r (-0.08100164 -0.2869289 0.0370819)
    Marker R.Shank.Bottom.Medial: tibia_r (-0.0690063 -0.3642933 0.02069278)
    Marker R.Heel.Top: calcn_r (-0.01708431 0.07234964 -0.01028626)
    Marker R.Heel.Bottom: calcn_r (-0.03055032 0.008246377 -0.007245317) fixed=true
    Marker R.Heel.Lateral: calcn_r (-0.00488201 0.03469604 0.02688907)
    Marker L.Thigh.Top.Lateral: femur_l (-0.0488966 -0.2462602 -0.09863868)
    Marker L.Thigh.Top.Medial: femur_l (-0.09257328 -0.2509561 -0.04563139)
    Marker L.Thigh.Bottom.Lateral: femur_l (-0.03307332 -0.3558716 -0.09975735)
    Marker L.Thigh.Bottom.Medial: femur_l (-0.08255921 -0.3612228 -0.04575911)
    Marker L.Shank.Top.Lateral: tibia_l (-0.04288354 -0.3007826 -0.07551305)
    Marker L.Shank.Bottom.Lateral: tibia_l (-0.02688155 -0.3773411 -0.0543742)
    Marker L.Shank.Top.Medial: tibia_l (-0.07954811 -0.296056 -0.03715939)
    Marker L.Shank.Bottom.Medial: tibia_l (-0.06364866 -0.3776809 -0.01828493)
    Marker L.Heel.Top: calcn_l (-0.01641075 0.06797559 0.01415236)
    Marker L.Heel.Bottom: calcn_l (-0.03079588 0.008161001 0.006991053) fixed=true
    Marker L.Heel.Lateral: calcn_l (0.00410679 0.02697578 -0.02868285)
    Marker R.GTR: femur_r (-0.0286689 -0.03564642 0.09207894) fixed=true
    Marker R.Knee: femur_r (0.01211365 -0.4407028 0.06515972) fixed=true
    Marker R.Knee.Medial: femur_r (0.01211365 -0.4569579 -0.06697601) fixed=true
    Marker R.HF: tibia_r (-0.0122741 -0.06678895 0.05787164) fixed=true
    Marker R.TT: tibia_r (0.05013372 -0.07158583 0.006298473) fixed=true
    Marker R.Ankle: tibia_r (-0.004856585 -0.4490338 0.04704564) fixed=true
    Marker R.Ankle.Medial: tibia_r (0.005497886 -0.4514346 -0.04089393) fixed=true
    Marker R.MT1: toes_r (0.02052495 0.05736028 -0.04906014)
    Marker R.MT5: toes_r (-0.00993697 0.03891467 0.06040287)
    Marker R.MT2: toes_r (0.02099505 0.06269509 -0.005164173)
    Marker L.GTR: femur_l (-0.02845173 -0.0353587 -0.09138162) fixed=true
    Marker L.Knee: femur_l (0.01202191 -0.4371457 -0.0646662) fixed=true
    Marker L.Knee.Medial: femur_l (0.01202191 -0.45327 0.06646873) fixed=true
    Marker L.HF: tibia_l (-0.01184338 -0.06607225 -0.05584068) fixed=true
    Marker L.TT: tibia_l (0.04837423 -0.07081765 0.006077441) fixed=true
    Marker L.Ankle: tibia_l (-0.00468615 -0.4442148 -0.0453946) fixed=true
    Marker L.Ankle.Medial: tibia_l (0.005304946 -0.4465904 0.03945885) fixed=true
    Marker L.MT1: toes_l (0.01840875 0.05154767 0.05353032)
    Marker L.MT5: toes_l (-0.01416958 0.02666209 -0.05985666)
    Marker L.MT2: toes_l (0.02170665 0.05618539 0.004904436)
  ComponentSet:
    ExternalLoads: datafile=RBDS002runT25_grf.mot
      ExternalForce RightGRF: applied_to_body=calcn_r force_expressed_in_body=ground point_expressed_in_body=ground
          force_identifier=ground_force_r_v point_identifier=ground_force_r_p torque_identifier=ground_force_r_m
          data_source_name=RBDS002runT25_grf
      ExternalForce LeftGRF: applied_to_body=calcn_l force_expressed_in_body=ground point_expressed_in_body=ground
          force_identifier=ground_force_l_v point_identifier=ground_force_l_p torque_identifier=ground_force_l_m
          data_source_name=RBDS002runT25_grf
