# OpenSim document version 40500
InverseKinematicsTool:
  model_file: ..\..\..\scaling\RBDS002_scaledModelAdjusted.osim
  time_range: 14.641 15.448
  output_motion_file: RBDS002runT25_ik.mot
  marker_file: RBDS002runT25.trc
  report_marker_locations: true
  IKTaskSet:
    IKMarkerTask R.ASIS: weight=2.5
    IKMarkerTask L.ASIS: weight=2.5
    IKMarkerTask R.PSIS: weight=2.5
    IKMarkerTask L.PSIS: weight=2.5
    IKMarkerTask R.Iliac.Crest: weight=1
    IKMarkerTask L.Iliac.Crest: weight=1
    IKMarkerTask R.Thigh.Top.Lateral: weight=5
    IKMarkerTask R.Thigh.Bottom.Lateral: weight=5
    IKMarkerTask R.Thigh.Top.Medial: weight=5
    IKMarkerTask R.Thigh.Bottom.Medial: weight=5
    IKMarkerTask R.Shank.Top.Lateral: weight=5
    IKMarkerTask R.Shank.Bottom.Lateral: weight=5
    IKMarkerTask R.Shank.Top.Medial: weight=5
    IKMarkerTask R.Shank.Bottom.Medial: weight=5
    IKMarkerTask R.Heel.Top: weight=5
    IKMarkerTask R.Heel.Bottom: weight=5
    IKMarkerTask R.Heel.Lateral: weight=5
    IKMarkerTask R.MT1: weight=10
    IKMarkerTask R.MT5: weight=10
    IKMarkerTask L.Thigh.Top.Lateral: weight=5
    IKMarkerTask L.Thigh.Bottom.Lateral: weight=5
    IKMarkerTask L.Thigh.Top.Medial: weight=5
    IKMarkerTask L.Thigh.Bottom.Medial: weight=5
    IKMarkerTask L.Shank.Top.Lateral: weight=5
    IKMarkerTask L.Shank.Bottom.Lateral: weight=5
    IKMarkerTask L.Shank.Top.Medial: weight=5
    IKMarkerTask L.Shank.Bottom.Medial: weight=5
    IKMarkerTask L.Heel.Top: weight=5
    IKMarkerTask L.Heel.Bottom: weight=5
    IKMarkerTask L.Heel.Lateral: weight=5
    IKMarkerTask L.MT1: weight=10
    IKMarkerTask L.MT5: weight=10
