# OpenSim document version 40500
ScaleTool:
  mass: 80 [kg]
  height: -1
  age: -1
  GenericModelMaker:
    model_file: ..\model\Uhlrich2022_LowerLimb_Fukuchi2017.osim
  ModelScaler:
    apply: true
    scaling_order: measurements
    marker_file: ..\simulations\RBDS002\scaling\RBDS002static.trc
    time_range: 0 0.9933333
    preserve_mass_distribution: true
    output_model_file: ..\simulations\RBDS002\scaling\RBDS002_scaledModel.osim
    output_scale_file: ..\simulations\RBDS002\scaling\RBDS002_scaleSet.xml
    MeasurementSet:
      Measurement pelvis_d: apply=true
        MarkerPair: markers=(R.ASIS R.PSIS)
        MarkerPair: markers=(L.ASIS L.PSIS)
        BodyScale pelvis: axes=X
      Measurement pelvis_h: apply=true
        MarkerPair: markers=(R.ASIS R.GTR)
        MarkerPair: markers=(L.ASIS L.GTR)
        MarkerPair: markers=(R.PSIS R.GTR)
        MarkerPair: markers=(L.PSIS L.GTR)
        MarkerPair: markers=(R.Iliac.Crest R.GTR)
        MarkerPair: markers=(L.Iliac.Crest L.GTR)
        BodyScale pelvis: axes=Y
      Measurement pelvis_w: apply=true
        MarkerPair: markers=(R.ASIS L.ASIS)
        MarkerPair: markers=(R.PSIS L.PSIS)
        BodyScale pelvis: axes=Z
      Measurement r_thigh_length: apply=true
        MarkerPair: markers=(R.GTR R.Knee)
        BodyScale femur_r: axes=Y
      Measurement r_thigh_breadth: apply=true
        MarkerPair: markers=(R.Knee R.Knee.Medial)
        BodyScale femur_r: axes=(X Z)
      Measurement r_patella: apply=true
        MarkerPair: markers=(R.GTR R.Knee)
        BodyScale patella_r: axes=(X Y Z)
      Measurement r_tibia_length: apply=true
        MarkerPair: markers=(R.HF R.Ankle)
        BodyScale tibia_r: axes=Y
        BodyScale talus_r: axes=Y
      Measurement r_tibia_breadth: apply=true
        MarkerPair: markers=(R.Ankle R.Ankle.Medial)
        BodyScale tibia_r: axes=(X Z)
        BodyScale talus_r: axes=(X Z)
      Measurement r_heel: apply=true
        MarkerPair: markers=(R.Ankle R.Ankle.Medial)
        BodyScale calcn_r: axes=Z
        BodyScale toes_r: axes=Z
      Measurement r_foot_length: apply=true
        MarkerPair: markers=(R.Heel.Top R.MT2)
        BodyScale calcn_r: axes=X
        BodyScale toes_r: axes=X
      Measurement r_foot_height: apply=true
        MarkerPair: markers=(R.Heel.Top R.Heel.Bottom)
        BodyScale calcn_r: axes=Y
        BodyScale toes_r: axes=Y
      Measurement l_thigh_length: apply=true
        MarkerPair: markers=(L.GTR L.Knee)
        BodyScale femur_l: axes=Y
      Measurement l_thigh_breadth: apply=true
        MarkerPair: markers=(L.Knee L.Knee.Medial)
        BodyScale femur_l: axes=(X Z)
      Measurement l_patella: apply=true
        MarkerPair: markers=(L.GTR L.Knee)
        BodyScale patella_l: axes=(X Y Z)
      Measurement l_tibia_length: apply=true
        MarkerPair: markers=(L.HF L.Ankle)
        BodyScale tibia_l: axes=Y
        BodyScale talus_l: axes=Y
      Measurement l_tibia_breadth: apply=true
        MarkerPair: markers=(L.Ankle L.Ankle.Medial)
        BodyScale tibia_l: axes=(X Z)
        BodyScale talus_l: axes=(X Z)
      Measurement l_heel: apply=true
        MarkerPair: markers=(L.Ankle L.Ankle.Medial)
        BodyScale calcn_l: axes=Z
        BodyScale toes_l: axes=Z
      Measurement l_foot_length: apply=true
        MarkerPair: markers=(L.Heel.Top L.MT2)
        BodyScale calcn_l: axes=X
        BodyScale toes_l: axes=X
      Measurement l_foot_height: apply=true
        MarkerPair: markers=(L.Heel.Top L.Heel.Bottom)
        BodyScale calcn_l: axes=Y
        BodyScale toes_l: axes=Y
  MarkerPlacer:
    apply: true
    marker_file: ..\simulations\RBDS002\scaling\RBDS002static.trc
    time_range: 0 0.9933333
    output_motion_file: ..\simulations\RBDS002\scaling\RBDS002_staticMotion.mot
    output_model_file: ..\simulations\RBDS002\scaling\RBDS002_scaledModelAdjusted.osim
    max_marker_movement: -1
    IKTaskSet:
      IKMarkerTask R.ASIS: weight=10
      IKMarkerTask L.ASIS: weight=10
      IKMarkerTask R.PSIS: weight=10
      IKMarkerTask L.PSIS: weight=10
      IKMarkerTask R.Iliac.Crest: apply=false weight=0
      IKMarkerTask L.Iliac.Crest: apply=false weight=0
      IKMarkerTask R.GTR: weight=5
      IKMarkerTask R.Thigh.Top.Lateral: apply=false weight=0
      IKMarkerTask R.Thigh.Bottom.Lateral: apply=false weight=0
      IKMarkerTask R.Thigh.Top.Medial: apply=false weight=0
      IKMarkerTask R.Thigh.Bottom.Medial: apply=false weight=0
      IKMarkerTask R.Knee: weight=5
      IKMarkerTask R.Knee.Medial: weight=5
      IKMarkerTask R.HF: weight=2.5
      IKMarkerTask R.TT: weight=2.5
      IKMarkerTask R.Shank.Top.Lateral: apply=false weight=0
      IKMarkerTask R.Shank.Bottom.Lateral: apply=false weight=0
      IKMarkerTask R.Shank.Top.Medial: apply=false weight=0
      IKMarkerTask R.Shank.Bottom.Medial: apply=false weight=0
      IKMarkerTask R.Ankle: weight=10
      IKMarkerTask R.Ankle.Medial: weight=10
      IKMarkerTask R.Heel.Top: weight=5
      IKMarkerTask R.Heel.Bottom: weight=5
      IKMarkerTask R.Heel.Lateral: apply=false weight=0
      IKMarkerTask R.MT1: weight=2.5
      IKMarkerTask R.MT2: weight=2.5
      IKMarkerTask R.MT5: weight=2.5
      IKMarkerTask L.GTR: weight=5
      IKMarkerTask L.Thigh.Top.Lateral: apply=false weight=0
      IKMarkerTask L.Thigh.Bottom.Lateral: apply=false weight=0
      IKMarkerTask L.Thigh.Top.Medial: apply=false weight=0
      IKMarkerTask L.Thigh.Bottom.Medial: apply=false weight=0
      IKMarkerTask L.Knee: weight=5
      IKMarkerTask L.Knee.Medial: weight=5
      IKMarkerTask L.HF: weight=2.5
      IKMarkerTask L.TT: weight=2.5
      IKMarkerTask L.Shank.Top.Lateral: apply=false weight=0
      IKMarkerTask L.Shank.Bottom.Lateral: apply=false weight=0
      IKMarkerTask L.Shank.Top.Medial: apply=false weight=0
      IKMarkerTask L.Shank.Bottom.Medial: apply=false weight=0
      IKMarkerTask L.Ankle: weight=10
      IKMarkerTask L.Ankle.Medial: weight=10
      IKMarkerTask L.Heel.Top: weight=5
      IKMarkerTask L.Heel.Bottom: weight=5
      IKMarkerTask L.Heel.Lateral: apply=false weight=0
      IKMarkerTask L.MT1: weight=2.5
      IKMarkerTask L.MT2: weight=2.5
      IKMarkerTask L.MT5: weight=2.5
      IKCoordinateTask [values shared by the 15 below unless stated]: weight=0.001 value_type=default_value value=0
      IKCoordinateTask pelvis_tilt
      IKCoordinateTask pelvis_list
      IKCoordinateTask pelvis_rotation
      IKCoordinateTask hip_flexion_r
      IKCoordinateTask hip_adduction_r
      IKCoordinateTask hip_rotation_r
      IKCoordinateTask knee_angle_r
      IKCoordinateTask ankle_angle_r
      IKCoordinateTask subtalar_angle_r
      IKCoordinateTask hip_flexion_l
      IKCoordinateTask hip_adduction_l
      IKCoordinateTask hip_rotation_l
      IKCoordinateTask knee_angle_l
      IKCoordinateTask ankle_angle_l
      IKCoordinateTask subtalar_angle_l
