# OpenSim document version 40600
Model AB06_complex:
  gravity: 0 -9.80665 0
  length_units: meters
  force_units: N
  credits:
    Rajagopal2016 LaiArnold2017 Model w/ updated wrapping surfaces, modified for movements involving high hip flexion
  publications:
    Catelli, DS; Wesseling, M; Jonkers, I; Lamontagne, M. A Musculoskeletal Model Customized for Squatting Task. Computer Methods in Biomechanics and Biomedical Engineering, in press (2018)
  Ground
  BodySet:
    Body pelvis: mass=12.36525 [kg] mass_center=(-0.07713712 0 0) inertia=(0.1242243 0.1242243 0.05639475 0 0 0)
        meshes=(r_pelvis.vtp l_pelvis.vtp sacrum.vtp)
      WrapCylinder Gmax1_at_pelvis_r: xyz_body_rotation=(-0.6 0.45 0.5) translation=(-0.06655395 -0.06589457 0.1001566)
          quadrant=-x radius=0.03941239 length=0.125633
      WrapEllipsoid Gmax2_at_pelvis_r: xyz_body_rotation=(-0.5 0.39 0) translation=(-0.0632808 -0.03656086 0.1001566)
          quadrant=all dimensions=(0.07278695 0.06145834 0.1063076)
      WrapCylinder Gmax3_at_pelvis_r: xyz_body_rotation=(-0.1 0 0) translation=(-0.09055701 -0.07482223 0.07567388)
          quadrant=all radius=0.03888634 length=0.111054
      WrapCylinder Post_at_pelvis_r: xyz_body_rotation=(-0.1 0 0) translation=(-0.0654629 -0.05951768 0.07567388)
          quadrant=all radius=0.03888634 length=0.1332648
      WrapCylinder Gmed_at_pelvis_r: xyz_body_rotation=(-1 0.6 0.7) translation=(-0.03273145 -0.04676389 0.1112851)
          quadrant=-x radius=0.04165981 length=0.1480733
      WrapCylinder Gmax1_at_pelvis_l: xyz_body_rotation=(0.6 -0.45 0.5)
          translation=(-0.06655395 -0.06589457 -0.1001566) quadrant=-x radius=0.03941239 length=0.125633
      WrapEllipsoid Gmax2_at_pelvis_l: xyz_body_rotation=(0.5 -0.39 0) translation=(-0.0632808 -0.03656086 -0.1001566)
          quadrant=all dimensions=(0.07278695 0.06145834 0.1063076)
      WrapCylinder Gmax3_at_pelvis_l: xyz_body_rotation=(0.1 0 0) translation=(-0.09055701 -0.07482223 -0.07567388)
          quadrant=all radius=0.03888634 length=0.111054
      WrapCylinder Post_at_pelvis_l: xyz_body_rotation=(0.1 0 0) translation=(-0.0654629 -0.05951768 -0.07567388)
          quadrant=all radius=0.03888634 length=0.1332648
      WrapCylinder Gmed_at_pelvis_l: xyz_body_rotation=(1 -0.6 0.7) translation=(-0.03273145 -0.04676389 -0.1112851)
          quadrant=-x radius=0.04165981 length=0.1480733
      WrapCylinder PS_at_brim_r: xyz_body_rotation=(-0.25 -0.27 0.1) translation=(-0.08073757 -0.05101515 0.07300304)
          quadrant=-y radius=0.0490361 length=0.1098048
      WrapCylinder PS_at_brim_l: xyz_body_rotation=(0.25 0.27 0.1) translation=(-0.08073757 -0.05101515 -0.07300304)
          quadrant=-y radius=0.0490361 length=0.1098048
      WrapCylinder IL_at_brim_r: xyz_body_rotation=(-0.32 -0.24 0.9) translation=(-0.07746443 -0.05526642 0.08413155)
          quadrant=-y radius=0.05435727 length=0.1089768
      WrapCylinder IL_at_brim_l: xyz_body_rotation=(0.32 0.24 0.9) translation=(-0.07746443 -0.05526642 -0.08413155)
          quadrant=-y radius=0.05435727 length=0.1089768
    Body femur_r: mass=9.765995 mass_center=(0 -0.2411699 0) inertia=(0.2607712 0.02982824 0.2607712 0 0 0)
        meshes=r_femur.vtp
      WrapCylinder GasLat_at_condyles_r: translation=(0.004498277 -0.581645 0) quadrant=all radius=0.03013792
          length=0.08996554
      WrapCylinder GasMed_at_condyles_r: translation=(0.004498277 -0.581645 0) quadrant=all radius=0.02897877
          length=0.08996554
      WrapCylinder KnExt_at_fem_r: xyz_body_rotation=(-0.0623366 0.0507601 0)
          translation=(-0.001709345 -0.5713342 0.001881278) quadrant=all radius=0.03474992 length=0.090224
      WrapCylinder KnExtVL_at_fem_r: xyz_body_rotation=(-0.0623366 0.0507601 0)
          translation=(-0.003598621 -0.5713342 0.001881278) quadrant=all radius=0.03474992 length=0.090224
      WrapCylinder AB_at_femshaft_r: xyz_body_rotation=(1.66157 0.186644 0)
          translation=(0.01317401 -0.1597325 0.02102045) quadrant=all radius=0.01507557 length=0.09803953
      WrapCylinder AL_at_femshaft_r: xyz_body_rotation=(1.77711 0.136489 0)
          translation=(0.02764884 -0.3289968 0.01359712) quadrant=all radius=0.01847925 length=0.1393099
      WrapCylinder AMprox_at_femshaft_r: xyz_body_rotation=(1.61126 0.18656 0)
          translation=(0.004662905 -0.1034119 0.02285395) quadrant=all radius=0.01923355 length=0.09823131
      WrapCylinder AMmid_at_femshaft_r: xyz_body_rotation=(1.61139 0.13656 0)
          translation=(0.02070332 -0.2279921 0.01851869) quadrant=all radius=0.01939589 length=0.1692091
      WrapCylinder AMdist_at_femshaft_r: xyz_body_rotation=(1.71188 0.186636 0)
          translation=(0.02843496 -0.3698921 0.008424913) quadrant=all radius=0.01999854 length=0.279153
      WrapCylinder AMisch_at_condyles_r: xyz_body_rotation=(1.71115 -0.463363 0)
          translation=(-0.02037818 -0.5345899 -0.002837846) quadrant=all radius=0.03869837 length=0.3177942
      WrapCylinder PECT_at_femshaft_r: xyz_body_rotation=(1.81295 0.276344 0)
          translation=(0.00547506 -0.1198797 0.02738596) quadrant=all radius=0.01412044 length=0.06817178
      WrapCylinder Flex_at_femhead_r: translation=(-0.004498277 0 0.008996554) quadrant=all radius=0.02781962
          length=0.05397932
    Body tibia_r: mass=3.892686 mass_center=(0 -0.2127131 0) inertia=(0.06775957 0.005088428 0.06775957 0 0 0)
        meshes=(r_tibia.vtp r_fibula.vtp)
      WrapCylinder GasLat_at_shank_r: xyz_body_rotation=(2.96723 -0.279725 -1.47812)
          translation=(-0.007213638 -0.08431049 -0.003216893) quadrant=-y radius=0.0580352 length=0.09797631
      WrapCylinder GasMed_at_shank_r: xyz_body_rotation=(2.96723 0.0279725 -1.47812)
          translation=(-0.007213638 -0.08431049 -0.003216893) quadrant=-y radius=0.06223713 length=0.09801661
      WrapCylinder GR_at_condyles_r: xyz_body_rotation=(0 -0.4 0) translation=(-0.002924448 -0.02278662 0) quadrant=all
          radius=0.03805464 length=0.0974816
      WrapCylinder SM_at_condyles_r: xyz_body_rotation=(0 -0.1 0) translation=(-0.000974816 -0.02278662 0) quadrant=all
          radius=0.03646903 length=0.0974816
      WrapCylinder ST_at_condyles_r: xyz_body_rotation=(0 -0.2 0) translation=(-0.001949632 -0.02335628 0) quadrant=all
          radius=0.04492562 length=0.0974816
      WrapCylinder BF140_at_gastroc_r: translation=(-0.03801782 -0.06835986 0) quadrant=y radius=0.03065513
          length=0.1462224
    Body patella_r: mass=0.09050559 mass_center=(0.002553563 0.03745226 0)
        inertia=(6.064546e-6 2.770251e-5 2.770251e-5 0 0 0) meshes=r_patella.vtp
    Body talus_r: mass=0.1049949 mass_center=(0 0 0) inertia=(0.001166113 0.001081922 0.001081922 0 0 0)
        meshes=r_talus.vtp
    Body calcn_r: mass=1.312436 mass_center=(0.1044198 0.0237562 0) inertia=(0.001134683 0.004230735 0.004230735 0 0 0)
        meshes=r_foot.vtp
    Body toes_r: mass=0.2274189 mass_center=(0.03612924 0.00475124 -0.01705928)
        inertia=(8.104879e-5 0.0002122459 0.0002122459 0 0 0) meshes=r_bofoot.vtp
    Body femur_l: mass=9.765995 mass_center=(0 -0.222263 0) inertia=(0.2236889 0.02973866 0.2236889 0 0 0)
        meshes=l_femur.vtp
      WrapCylinder GasLat_at_condyles_l: translation=(0.004491517 -0.5360461 0) quadrant=all radius=0.02867453
          length=0.08983035
      WrapCylinder Flex_at_femhead_r: translation=(-0.004491517 0 0.008983035) quadrant=all radius=0.0264688
          length=0.05389821
      WrapCylinder GasMed_at_condyles_l: translation=(0.004491517 -0.5360461 0) quadrant=all radius=0.02757166
          length=0.08983035
      WrapCylinder KnExt_at_fem_l: xyz_body_rotation=(0.0623366 -0.0507601 0)
          translation=(-0.001706777 -0.5265437 -0.001878451) quadrant=all radius=0.03306597 length=0.09002457
      WrapCylinder KnExtVL_at_fem_l: xyz_body_rotation=(0.0623366 -0.0507601 0)
          translation=(-0.003593214 -0.5265437 -0.001878451) quadrant=all radius=0.03306597 length=0.09002457
      WrapCylinder AB_at_femshaft_l: xyz_body_rotation=(-1.66157 -0.186644 0)
          translation=(0.01315422 -0.14721 -0.02098886) quadrant=all radius=0.01499617 length=0.09049077
      WrapCylinder AL_at_femshaft_l: xyz_body_rotation=(-1.77711 -0.136489 0)
          translation=(0.02760729 -0.3032047 -0.01357669) quadrant=all radius=0.01835441 length=0.1286661
      WrapCylinder AMprox_at_femshaft_l: xyz_body_rotation=(-1.61126 -0.18656 0)
          translation=(0.004655898 -0.09530482 -0.0228196) quadrant=all radius=0.01914316 length=0.09064663
      WrapCylinder AMmid_at_femshaft_l: xyz_body_rotation=(-1.61139 -0.13656 0)
          translation=(0.02067221 -0.2101183 -0.01849086) quadrant=all radius=0.01933148 length=0.1560549
      WrapCylinder AMdist_at_femshaft_l: xyz_body_rotation=(-1.71188 -0.186636 0)
          translation=(0.02839223 -0.340894 -0.008412253) quadrant=all radius=0.01987375 length=0.2577652
      WrapCylinder AMisch_at_condyles_l: xyz_body_rotation=(-1.71115 0.463363 0)
          translation=(-0.02034756 -0.49268 0.002833582) quadrant=all radius=0.03799794 length=0.295401
      WrapCylinder PECT_at_femshaft_l: xyz_body_rotation=(-1.81295 -0.276344 0)
          translation=(0.005466832 -0.1104816 -0.02734481) quadrant=all radius=0.01394712 length=0.06313015
      WrapCylinder Flex_at_femhead_l: translation=(-0.004491517 0 -0.008983035) quadrant=all radius=0.0264688
          length=0.05389821
    Body tibia_l: mass=3.892686 mass_center=(0 -0.2201916 0) inertia=(0.07240109 0.005038948 0.07240109 0 0 0)
        meshes=(l_tibia.vtp l_fibula.vtp)
      WrapCylinder GasLat_at_shank_l: xyz_body_rotation=(-2.96723 0.279725 -1.47812)
          translation=(-0.00717848 -0.08727465 0.003201214) quadrant=-y radius=0.05898469 length=0.09764909
      WrapCylinder GasMed_at_shank_l: xyz_body_rotation=(-2.96723 -0.0279725 -1.47812)
          translation=(-0.00717848 -0.08727465 0.003201214) quadrant=-y radius=0.06324798 length=0.09770139
      WrapCylinder GR_at_condyles_l: xyz_body_rotation=(0 0.4 0) translation=(-0.002910195 -0.02358774 0) quadrant=all
          radius=0.03869014 length=0.09700649
      WrapCylinder SM_at_condyles_l: xyz_body_rotation=(0 0.1 0) translation=(-0.0009700649 -0.02358774 0) quadrant=all
          radius=0.03707805 length=0.09700649
      WrapCylinder ST_at_condyles_l: xyz_body_rotation=(0 0.2 0) translation=(-0.00194013 -0.02417744 0) quadrant=all
          radius=0.04567586 length=0.09700649
      WrapCylinder BF140_at_gastroc_l: translation=(-0.03783253 -0.07076323 0) quadrant=all radius=0.03116706
          length=0.1455097
    Body patella_l: mass=0.09050559 mass_center=(0.002353373 0.03451614 0)
        inertia=(5.150942e-6 2.352922e-5 2.352922e-5 0 0 0) meshes=l_patella.vtp
    Body talus_l: mass=0.1049949 mass_center=(0 0 0) inertia=(0.001201228 0.001094628 0.001094628 0 0 0)
        meshes=l_talus.vtp
    Body calcn_l: mass=1.312436 mass_center=(0.1067083 0.02461215 0)
        inertia=(0.001169837 0.004410652 0.004410652 0 0 0) meshes=l_foot.vtp
    Body toes_l: mass=0.2274189 mass_center=(0.03692108 0.00492243 0.01697614)
        inertia=(8.355976e-5 0.0002211112 0.0002211112 0 0 0) meshes=l_bofoot.vtp
    Body torso: mass=35.94668 mass_center=(-0.04376673 0.4415131 0) inertia=(2.836035 1.287842 2.836035 0 0 0)
        meshes=(hat_spine.vtp hat_jaw.vtp hat_skull.vtp hat_ribs_scap.vtp)
  JointSet:
    CustomJoint ground_pelvis: socket_parent_frame=ground_offset socket_child_frame=pelvis_offset
      Coordinate pelvis_tilt: default_value=0 range=(-1.570796 1.570796) clamped=true
      Coordinate pelvis_list: default_value=0 range=(-1.570796 1.570796) clamped=true
      Coordinate pelvis_rotation: default_value=0 range=(-3.141593 3.141593) clamped=true
      Coordinate pelvis_tx: default_value=0 range=(-5 5) clamped=true
      Coordinate pelvis_ty: default_value=0.93 range=(-1 2) clamped=true
      Coordinate pelvis_tz: default_value=0 range=(-10 10) clamped=true
      PhysicalOffsetFrame ground_offset: socket_parent=/ground translation=(0 0 0) [meters]
      PhysicalOffsetFrame pelvis_offset: socket_parent=/bodyset/pelvis translation=(0 0 0)
      SpatialTransform:
        TransformAxis rotation1: coordinates=pelvis_tilt axis=(0 0 1) LinearFunction(coefficients=1 0)
        TransformAxis rotation2: coordinates=pelvis_list axis=(1 0 0) LinearFunction(coefficients=1 0)
        TransformAxis rotation3: coordinates=pelvis_rotation axis=(0 1 0) LinearFunction(coefficients=1 0)
        TransformAxis translation1: coordinates=pelvis_tx axis=(1 0 0) LinearFunction(coefficients=1 0)
        TransformAxis translation2: coordinates=pelvis_ty axis=(0 1 0) LinearFunction(coefficients=1 0)
        TransformAxis translation3: coordinates=pelvis_tz axis=(0 0 1) LinearFunction(coefficients=1 0)
    CustomJoint hip_r: socket_parent_frame=pelvis_offset socket_child_frame=femur_r_offset
      Coordinate hip_flexion_r: default_value=2.332052e-9 range=(-0.5235988 2.40855) clamped=true
      Coordinate hip_adduction_r: default_value=-1.199293e-9 range=(-0.8726646 0.5235988) clamped=true
      Coordinate hip_rotation_r: default_value=0 range=(-0.6981317 0.6981317) clamped=true
      PhysicalOffsetFrame pelvis_offset: socket_parent=/bodyset/pelvis translation=(-0.06139983 -0.06673632 0.08597888)
      PhysicalOffsetFrame femur_r_offset: socket_parent=/bodyset/femur_r translation=(0 0 0)
      SpatialTransform: axes_held_at_zero=(translation1 translation2 translation3)
        TransformAxis rotation1: coordinates=hip_flexion_r axis=(0 0 1) LinearFunction(coefficients=1 0)
        TransformAxis rotation2: coordinates=hip_adduction_r axis=(1 0 0) LinearFunction(coefficients=1 0)
        TransformAxis rotation3: coordinates=hip_rotation_r axis=(0 1 0) LinearFunction(coefficients=1 0)
    CustomJoint walker_knee_r: socket_parent_frame=femur_r_offset socket_child_frame=tibia_r_offset
      Coordinate knee_angle_r: default_value=4.877666e-5 range=(0 2.53073) clamped=true
      PhysicalOffsetFrame femur_r_offset: socket_parent=/bodyset/femur_r
          translation=(-0.004048449 -0.5810775 -0.001574397) orientation=(-1.64157 1.44618 1.5708) [radians]
      PhysicalOffsetFrame tibia_r_offset: socket_parent=/bodyset/tibia_r
          translation=(-0.007885813 -0.004027307 -0.001447348) orientation=(-1.64157 1.44618 1.5708)
      SpatialTransform:
        TransformAxis rotation1: coordinates=knee_angle_r axis=(1 0 0) LinearFunction(coefficients=1 0)
        TransformAxis rotation2: coordinates=knee_angle_r axis=(0 0 1)
          SimmSpline: x=(0 0.174533 0.349066 0.523599 0.698132 0.872665 1.0472 1.22173 1.39626 1.5708 1.74533 1.91986 2.0944)
              y=(0 0.0126809 0.0226969 0.0296054 0.0332049 0.0335354 0.0308779 0.0257548 0.0189295 0.011407 0.00443314 -0.00050475 -0.0016782)
        TransformAxis rotation3: coordinates=knee_angle_r axis=(0 1 0)
          SimmSpline: x=(0 0.174533 0.349066 0.523599 0.698132 0.872665 1.0472 1.22173 1.39626 1.5708 1.74533 1.91986 2.0944)
              y=(0 0.059461 0.109399 0.150618 0.18392 0.210107 0.229983 0.24435 0.254012 0.25977 0.262428 0.262788 0.261654)
        TransformAxis translation1: coordinates=knee_angle_r axis=(1 0 0)
          MultiplierFunction: scale=0.8996554
            SimmSpline: x=(0 0.174533 0.349066 0.523599 0.698132 0.872665 1.0472 1.22173 1.39626 1.5708 1.74533 1.91986 2.0944)
                y=(0 5.3e-5 0.000188 0.000378 0.000597 0.000825 0.001045 0.001247 0.00142 0.001558 0.001661 0.001728 0.00176)
        TransformAxis translation2: coordinates=knee_angle_r axis=(0 1 0)
          MultiplierFunction: scale=1.418646
            SimmSpline: x=(0 0.174533 0.349066 0.523599 0.698132 0.872665 1.0472 1.22173 1.39626 1.5708 1.74533 1.91986 2.0944)
                y=(0 0.000301 0.000143 -0.000401 -0.001233 -0.002243 -0.003316 -0.004346 -0.005239 -0.005924 -0.006361 -0.006539 -0.00648)
        TransformAxis translation3: coordinates=knee_angle_r axis=(0 0 1)
          MultiplierFunction: scale=0.8996554
            SimmSpline: x=(0 0.174533 0.349066 0.523599 0.698132 0.872665 1.0472 1.22173 1.39626 1.5708 1.74533 1.91986 2.0944)
                y=(0 0.001055 0.002061 0.00289 0.003447 0.003676 0.003559 0.00311 0.002373 0.001418 0.000329 -0.000805 -0.001898)
    CustomJoint patellofemoral_r: socket_parent_frame=femur_r_offset socket_child_frame=patella_r_offset
      Coordinate knee_angle_r_beta: default_value=4.877666e-5 range=(-99999.9 99999.9) clamped=false
      PhysicalOffsetFrame femur_r_offset: socket_parent=/bodyset/femur_r
          translation=(-0.007278212 -0.5787509 -0.002474052)
      PhysicalOffsetFrame patella_r_offset: socket_parent=/bodyset/patella_r translation=(0 0 0)
      SpatialTransform: axes_held_at_zero=(rotation2 rotation3)
        TransformAxis rotation1: coordinates=knee_angle_r_beta axis=(0 0 1)
          SimmSpline: x=(0 0.174533 0.349066 0.523599 0.698132 0.872665 1.0472 1.22173 1.39626 1.5708 1.74533 1.91986 2.0944)
              y=(0.00113686 -0.00629212 -0.105582 -0.253683 -0.414245 -0.579047 -0.747244 -0.91799 -1.09044 -1.26379 -1.43763 -1.61186 -1.78634)
        TransformAxis translation1: coordinates=knee_angle_r_beta axis=(1 0 0)
          MultiplierFunction: scale=0.8996554
            SimmSpline: x=(0 0.174533 0.349066 0.523599 0.698132 0.872665 1.0472 1.22173 1.39626 1.5708 1.74533 1.91986 2.0944)
                y=(0.0524 0.0488 0.0437 0.0371 0.0296 0.0216 0.0136 0.0057 -0.0019 -0.0088 -0.0148 -0.0196 -0.0227)
        TransformAxis translation2: coordinates=knee_angle_r_beta axis=(0 1 0)
          MultiplierFunction: scale=1.418646
            SimmSpline: x=(0 0.174533 0.349066 0.523599 0.698132 0.872665 1.0472 1.22173 1.39626 1.5708 1.74533 1.91986 2.0944)
                y=(-0.0108 -0.019 -0.0263 -0.0322 -0.0367 -0.0395 -0.0408 -0.0404 -0.0384 -0.0349 -0.0301 -0.0245 -0.0187)
        TransformAxis translation3: axis=(0 0 1) MultiplierFunction(scale=0.8996554, Constant(value=0.00275))
    PinJoint ankle_r: socket_parent_frame=tibia_r_offset socket_child_frame=talus_r_offset
      Coordinate ankle_angle_r: default_value=-1.182866e-9 range=(-0.6981317 0.6981317) clamped=true
      PhysicalOffsetFrame tibia_r_offset: socket_parent=/bodyset/tibia_r translation=(-0.00974816 -0.4557324 0)
          orientation=(0.175895 -0.105208 0.0186622)
      PhysicalOffsetFrame talus_r_offset: socket_parent=/bodyset/talus_r translation=(0 0 0)
          orientation=(0.175895 -0.105208 0.0186622)
    CustomJoint hip_l: socket_parent_frame=pelvis_offset socket_child_frame=femur_l_offset
      Coordinate hip_flexion_l: default_value=2.332052e-9 range=(-0.5235988 2.40855) clamped=true
      Coordinate hip_adduction_l: default_value=-1.199293e-9 range=(-0.8726646 0.5235988) clamped=true
      Coordinate hip_rotation_l: default_value=0 range=(-0.6981317 0.6981317) clamped=true
      PhysicalOffsetFrame pelvis_offset: socket_parent=/bodyset/pelvis
          translation=(-0.06139983 -0.06673632 -0.08597888)
      PhysicalOffsetFrame femur_l_offset: socket_parent=/bodyset/femur_l translation=(0 0 0)
      SpatialTransform: axes_held_at_zero=(translation1 translation2 translation3)
        TransformAxis rotation1: coordinates=hip_flexion_l axis=(0 0 1) LinearFunction(coefficients=1 0)
        TransformAxis rotation2: coordinates=hip_adduction_l axis=(1 0 0) LinearFunction(coefficients=-1 0)
        TransformAxis rotation3: coordinates=hip_rotation_l axis=(0 1 0) LinearFunction(coefficients=-1 0)
    CustomJoint walker_knee_l: socket_parent_frame=femur_l_offset socket_child_frame=tibia_l_offset
      Coordinate knee_angle_l: default_value=4.877992e-5 range=(0 2.53073) clamped=true
      PhysicalOffsetFrame femur_l_offset: socket_parent=/bodyset/femur_l
          translation=(-0.004042366 -0.5355232 0.001572031) orientation=(1.64157 -1.44618 1.5708)
      PhysicalOffsetFrame tibia_l_offset: socket_parent=/bodyset/tibia_l
          translation=(-0.007847379 -0.004168898 0.001440294) orientation=(1.64157 -1.44618 1.5708)
      SpatialTransform:
        TransformAxis rotation1: coordinates=knee_angle_l axis=(-1 0 0) LinearFunction(coefficients=1 0)
        TransformAxis rotation2: coordinates=knee_angle_l axis=(0 0 1)
          SimmSpline: x=(0 0.174533 0.349066 0.523599 0.698132 0.872665 1.0472 1.22173 1.39626 1.5708 1.74533 1.91986 2.0944)
              y=(0 0.0126809 0.0226969 0.0296054 0.0332049 0.0335354 0.0308779 0.0257548 0.0189295 0.011407 0.00443314 -0.00050475 -0.0016782)
        TransformAxis rotation3: coordinates=knee_angle_l axis=(0 1 0)
          SimmSpline: x=(0 0.174533 0.349066 0.523599 0.698132 0.872665 1.0472 1.22173 1.39626 1.5708 1.74533 1.91986 2.0944)
              y=(0 -0.059461 -0.109399 -0.150618 -0.18392 -0.210107 -0.229983 -0.24435 -0.254012 -0.25977 -0.262428 -0.262788 -0.261654)
        TransformAxis translation1: coordinates=knee_angle_l axis=(1 0 0)
          MultiplierFunction: scale=0.8983035
            SimmSpline: x=(0 0.174533 0.349066 0.523599 0.698132 0.872665 1.0472 1.22173 1.39626 1.5708 1.74533 1.91986 2.0944)
                y=(0 5.3e-5 0.000188 0.000378 0.000597 0.000825 0.001045 0.001247 0.00142 0.001558 0.001661 0.001728 0.00176)
        TransformAxis translation2: coordinates=knee_angle_l axis=(0 1 0)
          MultiplierFunction: scale=1.30743
            SimmSpline: x=(0 0.174533 0.349066 0.523599 0.698132 0.872665 1.0472 1.22173 1.39626 1.5708 1.74533 1.91986 2.0944)
                y=(0 0.000301 0.000143 -0.000401 -0.001233 -0.002243 -0.003316 -0.004346 -0.005239 -0.005924 -0.006361 -0.006539 -0.00648)
        TransformAxis translation3: coordinates=knee_angle_l axis=(0 0 1)
          MultiplierFunction: scale=0.8983035
            SimmSpline: x=(0 0.174533 0.349066 0.523599 0.698132 0.872665 1.0472 1.22173 1.39626 1.5708 1.74533 1.91986 2.0944)
                y=(0 -0.001055 -0.002061 -0.00289 -0.003447 -0.003676 -0.003559 -0.00311 -0.002373 -0.001418 -0.000329 0.000805 0.001898)
    CustomJoint patellofemoral_l: socket_parent_frame=femur_l_offset socket_child_frame=patella_l_offset
      Coordinate knee_angle_l_beta: default_value=4.877992e-5 range=(-99999.9 99999.9) clamped=false
      PhysicalOffsetFrame femur_l_offset: socket_parent=/bodyset/femur_l
          translation=(-0.007267275 -0.533379 0.002470335)
      PhysicalOffsetFrame patella_l_offset: socket_parent=/bodyset/patella_l translation=(0 0 0)
      SpatialTransform: axes_held_at_zero=(rotation2 rotation3)
        TransformAxis rotation1: coordinates=knee_angle_l_beta axis=(0 0 1)
          SimmSpline: x=(0 0.174533 0.349066 0.523599 0.698132 0.872665 1.0472 1.22173 1.39626 1.5708 1.74533 1.91986 2.0944)
              y=(0.00113686 -0.00629212 -0.105582 -0.253683 -0.414245 -0.579047 -0.747244 -0.91799 -1.09044 -1.26379 -1.43763 -1.61186 -1.78634)
        TransformAxis translation1: coordinates=knee_angle_l_beta axis=(1 0 0)
          MultiplierFunction: scale=0.8983035
            SimmSpline: x=(0 0.174533 0.349066 0.523599 0.698132 0.872665 1.0472 1.22173 1.39626 1.5708 1.74533 1.91986 2.0944)
                y=(0.0524 0.0488 0.0437 0.0371 0.0296 0.0216 0.0136 0.0057 -0.0019 -0.0088 -0.0148 -0.0196 -0.0227)
        TransformAxis translation2: coordinates=knee_angle_l_beta axis=(0 1 0)
          MultiplierFunction: scale=1.30743
            SimmSpline: x=(0 0.174533 0.349066 0.523599 0.698132 0.872665 1.0472 1.22173 1.39626 1.5708 1.74533 1.91986 2.0944)
                y=(-0.0108 -0.019 -0.0263 -0.0322 -0.0367 -0.0395 -0.0408 -0.0404 -0.0384 -0.0349 -0.0301 -0.0245 -0.0187)
        TransformAxis translation3: axis=(0 0 1) MultiplierFunction(scale=0.8983035, Constant(value=-0.00275))
    PinJoint ankle_l: socket_parent_frame=tibia_l_offset socket_child_frame=talus_l_offset
      Coordinate ankle_angle_l: default_value=8.352658e-11 range=(-0.6981317 0.6981317) clamped=true
      PhysicalOffsetFrame tibia_l_offset: socket_parent=/bodyset/tibia_l translation=(-0.009700649 -0.4717549 0)
          orientation=(-0.175895 0.105208 0.0186622)
      PhysicalOffsetFrame talus_l_offset: socket_parent=/bodyset/talus_l translation=(0 0 0)
          orientation=(-0.175895 0.105208 0.0186622)
    CustomJoint back: socket_parent_frame=pelvis_offset socket_child_frame=torso_offset
      Coordinate lumbar_extension: default_value=0 range=(-1.570796 1.570796) clamped=true
      Coordinate lumbar_bending: default_value=0 range=(-1.570796 1.570796) clamped=true
      Coordinate lumbar_rotation: default_value=0 range=(-1.570796 1.570796) clamped=true
      PhysicalOffsetFrame pelvis_offset: socket_parent=/bodyset/pelvis translation=(-0.1098686 0.06929558 0)
      PhysicalOffsetFrame torso_offset: socket_parent=/bodyset/torso translation=(0 0 0)
      SpatialTransform: axes_held_at_zero=(translation1 translation2 translation3)
        TransformAxis rotation1: coordinates=lumbar_extension axis=(0 0 1) LinearFunction(coefficients=1 0)
        TransformAxis rotation2: coordinates=lumbar_bending axis=(1 0 0) LinearFunction(coefficients=1 0)
        TransformAxis rotation3: coordinates=lumbar_rotation axis=(0 1 0) LinearFunction(coefficients=1 0)
    WeldJoint mtp_r: socket_parent_frame=calcn_r_offset socket_child_frame=toes_r_offset
      PhysicalOffsetFrame calcn_r_offset: socket_parent=/bodyset/calcn_r
          translation=(0.1867025 -0.001583747 0.001052801) orientation=(-3.14159 0.619901 0)
      PhysicalOffsetFrame toes_r_offset: socket_parent=/bodyset/toes_r translation=(0 0 0)
          orientation=(-3.14159 0.619901 0)
    WeldJoint mtp_l: socket_parent_frame=calcn_l_offset socket_child_frame=toes_l_offset
      PhysicalOffsetFrame calcn_l_offset: socket_parent=/bodyset/calcn_l
          translation=(0.1907945 -0.00164081 -0.00104767) orientation=(-3.14159 -0.619901 0)
      PhysicalOffsetFrame toes_l_offset: socket_parent=/bodyset/toes_l translation=(0 0 0)
          orientation=(-3.14159 -0.619901 0)
    WeldJoint subtalar_r: socket_parent_frame=talus_r_offset socket_child_frame=calcn_r_offset
      PhysicalOffsetFrame talus_r_offset: socket_parent=/bodyset/talus_r
          translation=(-0.04754178 -0.04779493 0.007720543) orientation=(-1.76819 0.906223 1.8196)
      PhysicalOffsetFrame calcn_r_offset: socket_parent=/bodyset/calcn_r translation=(0 0 0)
          orientation=(-1.76819 0.906223 1.8196)
    WeldJoint subtalar_l: socket_parent_frame=talus_l_offset socket_child_frame=calcn_l_offset
      PhysicalOffsetFrame talus_l_offset: socket_parent=/bodyset/talus_l
          translation=(-0.04731006 -0.04947529 -0.007682914) orientation=(1.76819 -0.906223 1.8196)
      PhysicalOffsetFrame calcn_l_offset: socket_parent=/bodyset/calcn_l translation=(0 0 0)
          orientation=(1.76819 -0.906223 1.8196)
  ConstraintSet:
    CoordinateCouplerConstraint patellofemoral_knee_angle_r_con: independent_coordinate_names=knee_angle_r
        dependent_coordinate_name=knee_angle_r_beta scale_factor=1
        coupled_coordinates_function=LinearFunction(coefficients=1 0)
    CoordinateCouplerConstraint patellofemoral_knee_angle_l_con: independent_coordinate_names=knee_angle_l
        dependent_coordinate_name=knee_angle_l_beta scale_factor=1
        coupled_coordinates_function=LinearFunction(coefficients=1 0)
  ForceSet:
    DeGrooteFregly2016Muscle [values shared by the 40 below unless stated]: min_control=0.01 max_control=1
        max_contraction_velocity=30 ignore_tendon_compliance=true activation_time_constant=0.01
        deactivation_time_constant=0.04 default_activation=0.01 active_force_width_scale=1.5 fiber_damping=0.01
        passive_fiber_strain_at_one_norm_force=0.7 tendon_strain_at_one_norm_force=0.049
    DeGrooteFregly2016Muscle addbrev_r: max_isometric_force=1251.639 optimal_fiber_length=0.1356265
        tendon_slack_length=0.04663432 pennation_angle_at_optimal=0.1147809 [radians]
      PathPoint P1: pelvis (-0.02083902 -0.07992374 0.01713791)
      PathPoint P2: femur_r (-0.001799311 -0.1674003 0.02240142)
      PathWrap: wrap_object=AB_at_femshaft_r method=hybrid
    DeGrooteFregly2016Muscle addlong_r: max_isometric_force=1833.6 optimal_fiber_length=0.1521875
        tendon_slack_length=0.1853809 pennation_angle_at_optimal=0.1377704
      PathPoint P1: pelvis (-0.008270146 -0.07558745 0.02101063)
      PathPoint P2: femur_r (0.01013012 -0.3395814 0.01424154)
      PathWrap: wrap_object=AL_at_femshaft_r method=hybrid
    DeGrooteFregly2016Muscle addmagDist_r: max_isometric_force=1194.59 optimal_fiber_length=0.2684087
        tendon_slack_length=0.1323574 pennation_angle_at_optimal=0.194705
      PathPoint P1: pelvis (-0.08078122 -0.1085517 0.04431373)
      PathPoint P2: femur_r (0.01012112 -0.3723946 0.01736335)
      PathWrap: wrap_object=AMdist_at_femshaft_r method=hybrid
      PathWrap pathwrap_0: wrap_object=Post_at_pelvis_r method=hybrid
    DeGrooteFregly2016Muscle addmagIsch_r: max_isometric_force=1194.59 optimal_fiber_length=0.2344511
        tendon_slack_length=0.3247238 pennation_angle_at_optimal=0.1680443
      PathPoint P1: pelvis (-0.09777975 -0.1103288 0.04641702)
      PathPoint P2: femur_r (0.004327342 -0.5503922 -0.02944572)
      PathWrap: wrap_object=AMisch_at_condyles_r method=hybrid
      PathWrap pathwrap_0: wrap_object=Post_at_pelvis_r method=hybrid
    DeGrooteFregly2016Muscle addmagMid_r: max_isometric_force=1194.59 optimal_fiber_length=0.2023164
        tendon_slack_length=0.06850796 pennation_angle_at_optimal=0.2073076
      PathPoint P1: pelvis (-0.0574546 -0.102668 0.03176077)
      PathPoint P2: femur_r (0.002177166 -0.2303882 0.02628793)
      PathWrap: wrap_object=AMmid_at_femshaft_r method=hybrid
      PathWrap pathwrap_0: wrap_object=Post_at_pelvis_r method=hybrid
    DeGrooteFregly2016Muscle addmagProx_r: max_isometric_force=1194.59 optimal_fiber_length=0.1267742
        tendon_slack_length=0.04840961 pennation_angle_at_optimal=0.3114833
      PathPoint P1: pelvis (-0.03380068 -0.09144466 0.01519042)
      PathPoint P2: femur_r (-0.01373774 -0.1118744 0.02880696)
      PathWrap: wrap_object=AMprox_at_femshaft_r method=hybrid
    DeGrooteFregly2016Muscle bflh_r: max_isometric_force=2626.367 optimal_fiber_length=0.1399316
        tendon_slack_length=0.4767137 pennation_angle_at_optimal=0.1759182
      PathPoint P1: pelvis (-0.113469 -0.1012651 0.06521308)
      PathPoint P2: tibia_r (-0.03349468 -0.04156279 0.03526884)
      PathPoint P3: tibia_r (-0.02635902 -0.05705769 0.0338846)
      PathWrap: wrap_object=Post_at_pelvis_r method=hybrid
    DeGrooteFregly2016Muscle bfsh_r: max_isometric_force=1114.23 optimal_fiber_length=0.1517998
        tendon_slack_length=0.1456304 pennation_angle_at_optimal=0.2642232
      PathPoint P1: femur_r (0.004498277 -0.2994762 0.02105194)
      PathPoint P2: tibia_r (-0.02793823 -0.03741563 0.0312331)
      PathWrap: wrap_object=BF140_at_gastroc_r method=hybrid
    DeGrooteFregly2016Muscle edl_r: max_isometric_force=1206.996 optimal_fiber_length=0.07823268
        tendon_slack_length=0.4164228 pennation_angle_at_optimal=0.2182582
      PathPoint P1: tibia_r (-0.01559706 -0.1318206 0.01998373)
      PathPoint P2: tibia_r (0.01598698 -0.4283884 0.01091794)
      PathPoint P3: calcn_r (0.09596176 0.02850744 0.0007798528)
      PathPoint P4: calcn_r (0.1687423 0.004355304 0.01267261)
      PathPoint P5: toes_r (0.0003132593 0.003721805 0.01491468)
      PathPoint P6: toes_r (0.04625795 -0.0003167493 0.0243704)
    DeGrooteFregly2016Muscle ehl_r: max_isometric_force=571.7351 optimal_fiber_length=0.08427974
        tendon_slack_length=0.3682115 pennation_angle_at_optimal=0.1972681
      PathPoint P1: tibia_r (-0.01364742 -0.1765963 0.01842402)
      PathPoint P2: tibia_r (0.006921193 -0.3314314 0.01598698)
      PathPoint P3: tibia_r (0.01949632 -0.4207549 -0.002729485)
      PathPoint P4: calcn_r (0.1012872 0.03080387 -0.02056862)
      PathPoint P5: calcn_r (0.1350147 0.02446889 -0.02505277)
      PathPoint P6: calcn_r (0.1810639 0.01100704 -0.02729485)
      PathPoint P7: toes_r (0.03111709 0.003246681 -0.02388299)
      PathPoint P8: toes_r (0.05878832 0.002692369 -0.01813158)
    DeGrooteFregly2016Muscle fdl_r: max_isometric_force=846.3541 optimal_fiber_length=0.04954102
        tendon_slack_length=0.4207353 pennation_angle_at_optimal=0.2248391
      PathPoint P1: tibia_r (-0.002242077 -0.2087254 -0.001754669)
      PathPoint P2: tibia_r (-0.01715676 -0.4152861 -0.01208772)
      PathPoint P3: calcn_r (0.04552702 0.02494401 -0.02729485)
      PathPoint P4: calcn_r (0.07392919 0.01393697 -0.02563766)
      PathPoint P5: calcn_r (0.173128 -0.006414174 0.01130787)
      PathPoint P6: toes_r (-0.001983975 -0.006176612 0.01432979)
      PathPoint P7: toes_r (0.02975963 -0.005622301 0.02095854)
      PathPoint P8: toes_r (0.04604911 -0.00475124 0.02359055)
    DeGrooteFregly2016Muscle fhl_r: max_isometric_force=1815.679 optimal_fiber_length=0.05836259
        tendon_slack_length=0.3924133 pennation_angle_at_optimal=0.2580255
      PathPoint P1: tibia_r (-0.0302193 -0.2464373 0.01949632)
      PathPoint P2: tibia_r (-0.02359055 -0.4182484 -0.007408601)
      PathPoint P3: calcn_r (0.03905299 0.0218557 -0.02349307)
      PathPoint P4: calcn_r (0.1083877 0.005384739 -0.02495529)
      PathPoint P5: calcn_r (0.1802285 -0.004196929 -0.02622255)
      PathPoint P6: toes_r (0.01618506 -0.00506799 -0.02583262)
      PathPoint P7: toes_r (0.0586839 -0.008077108 -0.01764417)
    DeGrooteFregly2016Muscle gaslat_r: max_isometric_force=3150.118 optimal_fiber_length=0.08097984
        tendon_slack_length=0.4389342 pennation_angle_at_optimal=0.2102268
      PathPoint P1: femur_r (0.001799311 -0.5405042 0.0185239)
      PathPoint P2: calcn_r (0.004594469 0.02454807 -0.005166525)
      PathWrap: wrap_object=GasLat_at_shank_r method=hybrid
      PathWrap pathwrap_0: wrap_object=GasLat_at_condyles_r method=hybrid
    DeGrooteFregly2016Muscle gasmed_r: max_isometric_force=6231.03 optimal_fiber_length=0.06873665
        tendon_slack_length=0.4508658 pennation_angle_at_optimal=0.1656816
      PathPoint P1: femur_r (0.005397932 -0.5461788 -0.01979242)
      PathPoint P2: calcn_r (0.004594469 0.02454807 -0.005166525)
      PathWrap: wrap_object=GasMed_at_shank_r method=hybrid
      PathWrap pathwrap_0: wrap_object=GasMed_at_condyles_r method=hybrid
    DeGrooteFregly2016Muscle glmax1_r: max_isometric_force=1967.567 optimal_fiber_length=0.1521856
        tendon_slack_length=0.09037961 pennation_angle_at_optimal=0.3540118
      PathPoint P1: pelvis (-0.134308 0.02933371 0.06265352)
      PathPoint P2: pelvis (-0.1371448 -0.02057611 0.08669111)
      PathPoint P3: femur_r (-0.0399447 -0.04624787 0.02716959)
      PathPoint P4: femur_r (-0.02492045 -0.08029538 0.0422838)
      PathWrap: wrap_object=Gmax1_at_pelvis_r method=hybrid
    DeGrooteFregly2016Muscle glmax2_r: max_isometric_force=2812.092 optimal_fiber_length=0.1786086
        tendon_slack_length=0.1240022 pennation_angle_at_optimal=0.3673821
      PathPoint P1: pelvis (-0.1436911 0.007397197 0.05141372)
      PathPoint P2: pelvis (-0.1466369 -0.05178038 0.0904748)
      PathPoint P3: femur_r (-0.04048449 -0.08284894 0.02267131)
      PathPoint P4: femur_r (-0.01403462 -0.1441345 0.03769556)
      PathWrap: wrap_object=Gmax2_at_pelvis_r method=hybrid
    DeGrooteFregly2016Muscle glmax3_r: max_isometric_force=1895.508 optimal_fiber_length=0.2027365
        tendon_slack_length=0.1250411 pennation_angle_at_optimal=0.3824161
      PathPoint P1: pelvis (-0.1418363 -0.04463826 0.01001566)
      PathPoint P2: pelvis (-0.1388904 -0.1073869 0.04840903)
      PathPoint P3: femur_r (-0.02528032 -0.1595977 0.00845676)
      PathPoint P4: femur_r (-0.005397932 -0.2013059 0.03697584)
      PathWrap: wrap_object=Gmax3_at_pelvis_r method=hybrid
    DeGrooteFregly2016Muscle glmed1_r: max_isometric_force=2186.934 optimal_fiber_length=0.06617429
        tendon_slack_length=0.05059779 pennation_angle_at_optimal=0.3165559
      PathPoint P1: pelvis (-0.04855165 0.02083119 0.1304262)
      PathPoint P2: femur_r (-0.01961249 -0.01659816 0.04993087)
      PathWrap: wrap_object=Gmed_at_pelvis_r method=hybrid
    DeGrooteFregly2016Muscle glmed2_r: max_isometric_force=1530.183 optimal_fiber_length=0.0651977
        tendon_slack_length=0.05827496 pennation_angle_at_optimal=0.3165559
      PathPoint P1: pelvis (-0.09273911 0.02686798 0.07511745)
      PathPoint P2: femur_r (-0.02321111 -0.008228148 0.04741184)
      PathWrap: wrap_object=Gmed_at_pelvis_r method=hybrid
    DeGrooteFregly2016Muscle glmed3_r: max_isometric_force=1742.399 optimal_fiber_length=0.06980415
        tendon_slack_length=0.04325261 pennation_angle_at_optimal=0.3165559
      PathPoint P1: pelvis (-0.1256888 -0.006206844 0.05853597)
      PathPoint P2: femur_r (-0.02779935 -0.006667637 0.04660215)
      PathWrap: wrap_object=Gmed_at_pelvis_r method=hybrid
    DeGrooteFregly2016Muscle glmin1_r: max_isometric_force=748.0918 optimal_fiber_length=0.0617442
        tendon_slack_length=0.01465315 pennation_angle_at_optimal=0.1745329
      PathPoint P1: pelvis (-0.05062464 -0.01266876 0.1159591)
      PathPoint P2: femur_r (-0.006477519 -0.01475392 0.0503807)
    DeGrooteFregly2016Muscle glmin2_r: max_isometric_force=789.6393 optimal_fiber_length=0.05055779
        tendon_slack_length=0.02356269 pennation_angle_at_optimal=0
      PathPoint P1: pelvis (-0.06720858 -0.01207359 0.1080578)
      PathPoint P2: femur_r (-0.008636691 -0.01475392 0.0503807)
    DeGrooteFregly2016Muscle glmin3_r: max_isometric_force=893.5475 optimal_fiber_length=0.03470006
        tendon_slack_length=0.04645471 pennation_angle_at_optimal=0.01745329
      PathPoint P1: pelvis (-0.08608371 -0.01317891 0.08880552)
      PathPoint P2: femur_r (-0.01214535 -0.01177476 0.04948104)
    DeGrooteFregly2016Muscle grac_r: max_isometric_force=562.623 optimal_fiber_length=0.3249449
        tendon_slack_length=0.2453688 pennation_angle_at_optimal=0.1720016
      PathPoint P1: pelvis (-0.05167205 -0.1099547 0.02733162)
      PathPoint P2: tibia_r (-0.01795611 -0.05417519 -0.0288643)
      PathPoint P3: tibia_r (0.001735172 -0.07932022 -0.01533386)
      PathWrap: wrap_object=GR_at_condyles_r method=hybrid
    DeGrooteFregly2016Muscle iliacus_r: max_isometric_force=2042.282 optimal_fiber_length=0.1112259
        tendon_slack_length=0.1002919 pennation_angle_at_optimal=0.279914
      PathPoint P1: pelvis (-0.06600842 0.0262728 0.09381335)
      PathPoint P2: pelvis (-0.01472915 -0.04735907 0.08413155)
      PathPoint P3: femur_r (-0.002069207 -0.08015351 0.01250521)
      PathPoint P4: femur_r (-0.0109758 -0.09036777 0.01763324)
      PathWrap: wrap_object=IL_at_brim_r method=hybrid range=(2 3)
    DeGrooteFregly2016Muscle perbrev_r: max_isometric_force=1042.403 optimal_fiber_length=0.05254685
        tendon_slack_length=0.1707513 pennation_angle_at_optimal=0.2052361
      PathPoint P1: tibia_r (-0.02368803 -0.2884786 0.02446788)
      PathPoint P2: tibia_r (-0.03304626 -0.4435415 0.02427292)
      PathPoint P3: tibia_r (-0.02778226 -0.4561881 0.02485781)
      PathPoint P4: calcn_r (0.04918171 0.02138058 0.02271321)
      PathPoint P5: calcn_r (0.07069218 0.01734203 0.03343619)
    DeGrooteFregly2016Muscle perlong_r: max_isometric_force=2230.743 optimal_fiber_length=0.05704007
        tendon_slack_length=0.3730294 pennation_angle_at_optimal=0.2479525
      PathPoint P1: tibia_r (-0.01949632 -0.1564301 0.02748981)
      PathPoint P2: tibia_r (-0.03090167 -0.4443391 0.02310314)
      PathPoint P3: tibia_r (-0.02651499 -0.4573274 0.02339558)
      PathPoint P4: calcn_r (0.04573585 0.01821309 0.02154343)
      PathPoint P5: calcn_r (0.07110986 0.008393858 0.02768477)
      PathPoint P6: calcn_r (0.08896563 0.005463926 0.01150283)
      PathPoint P7: calcn_r (0.125617 0.006730924 -0.01793661)
    DeGrooteFregly2016Muscle piri_r: max_isometric_force=2059.574 optimal_fiber_length=0.02611604
        tendon_slack_length=0.1154191 pennation_angle_at_optimal=0.1745329
      PathPoint P1: pelvis (-0.1110796 -0.005552149 0.01503462)
      PathPoint P2: pelvis (-0.1113087 -0.02606874 0.06779489)
      PathPoint P3: femur_r (-0.0133149 -0.005107127 0.03931494)
    DeGrooteFregly2016Muscle psoas_r: max_isometric_force=2853.58 optimal_fiber_length=0.11626
        tendon_slack_length=0.09899816 pennation_angle_at_optimal=0.2155251
      PathPoint P1: pelvis (-0.06611753 0.05271566 0.0434012)
      PathPoint P2: pelvis (-0.02236649 -0.05560652 0.07300304)
      PathPoint P3: femur_r (-0.01187545 -0.06625078 0.004138415)
      PathPoint P4: femur_r (-0.0211419 -0.07433706 0.007916967)
      PathWrap: wrap_object=PS_at_brim_r method=hybrid range=(2 3)
    DeGrooteFregly2016Muscle recfem_r: max_isometric_force=4383.482 optimal_fiber_length=0.1015952
        tendon_slack_length=0.6028783 pennation_angle_at_optimal=0.2170149
      PathPoint P1: pelvis (-0.02618516 -0.0329898 0.103829)
      PathPoint P2: patella_r (0.01418646 0.06951367 0.0009930524)
      PathPoint P3: patella_r (0.01716562 0.06199484 -0.001418646)
      PathPoint P4: patella_r (0.007093231 0.003504056 4.255939e-5)
      PathPoint P5: tibia_r (0.031779 -0.07191457 -0.0004581635)
      PathWrap: wrap_object=KnExt_at_fem_r method=hybrid
      PathWrap pathwrap_0: wrap_object=Flex_at_femhead_r method=hybrid
    DeGrooteFregly2016Muscle sart_r: max_isometric_force=498.8262 optimal_fiber_length=0.5181533
        tendon_slack_length=0.1594316 pennation_angle_at_optimal=0.02613542
      PathPoint P1: pelvis (-0.02127544 -0.01326394 0.1175171)
      PathPoint P2: femur_r (-0.002698966 -0.506173 -0.03787549)
      PathPoint P3: tibia_r (-0.02446788 -0.04568717 -0.03558078)
      PathPoint P4: tibia_r (-0.01549957 -0.06824592 -0.02573514)
      PathPoint P5: tibia_r (0.0132575 -0.09228581 -0.002534522)
      PathWrap: wrap_object=Flex_at_femhead_r method=hybrid
    DeGrooteFregly2016Muscle semimem_r: max_isometric_force=4401.974 optimal_fiber_length=0.1236662
        tendon_slack_length=0.4817229 pennation_angle_at_optimal=0.2545615
      PathPoint P1: pelvis (-0.1076865 -0.09692879 0.06832906)
      PathPoint P2: tibia_r (-0.02632003 -0.04671257 -0.01910639)
      PathWrap: wrap_object=SM_at_condyles_r method=hybrid
      PathWrap pathwrap_0: wrap_object=Post_at_pelvis_r method=hybrid
    DeGrooteFregly2016Muscle semiten_r: max_isometric_force=1182.59 optimal_fiber_length=0.2725226
        tendon_slack_length=0.3490533 pennation_angle_at_optimal=0.241295
      PathPoint P1: pelvis (-0.1132508 -0.1065366 0.05731183)
      PathPoint P2: tibia_r (-0.03041426 -0.05787801 -0.02232329)
      PathPoint P3: tibia_r (0.00185215 -0.08807028 -0.01140535)
      PathWrap: wrap_object=ST_at_condyles_r method=hybrid
      PathWrap pathwrap_0: wrap_object=Post_at_pelvis_r method=hybrid
    DeGrooteFregly2016Muscle soleus_r: max_isometric_force=12389.69 optimal_fiber_length=0.05143777
        tendon_slack_length=0.3289094 pennation_angle_at_optimal=0.3814289
      PathPoint P1: tibia_r (-0.007408601 -0.1043627 0.009553197)
      PathPoint P2: calcn_r (0.004594469 0.02454807 -0.005166525)
    DeGrooteFregly2016Muscle tfl_r: max_isometric_force=822.4131 optimal_fiber_length=0.1227949
        tendon_slack_length=0.5810099 pennation_angle_at_optimal=0.05235988
      PathPoint P1: pelvis (-0.0339316 0.01819541 0.1381048)
      PathPoint P2: femur_r (0.02644987 -0.1411553 0.05370942)
      PathPoint P3: femur_r (0.009626312 -0.5745517 0.02914883)
      PathPoint P4: tibia_r (0.01052801 -0.04671257 0.03372863)
    DeGrooteFregly2016Muscle tibant_r: max_isometric_force=2454.905 optimal_fiber_length=0.0790362
        tendon_slack_length=0.2782595 pennation_angle_at_optimal=0.1951828
      PathPoint P1: tibia_r (0.01501217 -0.1494802 0.01579202)
      PathPoint P2: tibia_r (0.02446788 -0.2171565 0.01247764)
      PathPoint P3: tibia_r (0.02271321 -0.4168812 -0.01286757)
      PathPoint P4: calcn_r (0.1217534 0.01409535 -0.02973189)
    DeGrooteFregly2016Muscle tibpost_r: max_isometric_force=3460.308 optimal_fiber_length=0.04371332
        tendon_slack_length=0.3247039 pennation_angle_at_optimal=0.2264891
      PathPoint P1: tibia_r (-0.003996746 -0.1485688 0.0100406)
      PathPoint P2: tibia_r (-0.01598698 -0.4164255 -0.01705928)
      PathPoint P3: calcn_r (0.04354304 0.02644857 -0.02787974)
      PathPoint P4: calcn_r (0.08061205 0.01259079 -0.02739233)
    DeGrooteFregly2016Muscle vasint_r: max_isometric_force=3394.721 optimal_fiber_length=0.1572212
        tendon_slack_length=0.275473 pennation_angle_at_optimal=0.06309973
      PathPoint P1: femur_r (0.02609001 -0.2729475 0.02788932)
      PathPoint P2: femur_r (0.03013845 -0.2956459 0.02564018)
      PathPoint P3: patella_r (0.008228148 0.06809502 -0.0008511878)
      PathPoint P4: patella_r (0.007093231 0.003504056 -0.000553272)
      PathPoint P5: tibia_r (0.03174976 -0.07200572 0.0004191709)
      PathWrap: wrap_object=KnExt_at_fem_r method=hybrid
    DeGrooteFregly2016Muscle vaslat_r: max_isometric_force=10297.53 optimal_fiber_length=0.1557788
        tendon_slack_length=0.2942489 pennation_angle_at_optimal=0.2528673
      PathPoint P1: femur_r (0.004318346 -0.263017 0.03139797)
      PathPoint P2: femur_r (0.02420073 -0.3675712 0.0367959)
      PathPoint P3: patella_r (0.01461206 0.06000874 0.02000291)
      PathPoint P4: patella_r (0.007093231 0.003504056 0.01039868)
      PathPoint P5: tibia_r (0.03172051 -0.0722108 0.00498131)
      PathWrap: wrap_object=KnExtVL_at_fem_r method=hybrid
    DeGrooteFregly2016Muscle vasmed_r: max_isometric_force=5495.646 optimal_fiber_length=0.146612
        tendon_slack_length=0.27723 pennation_angle_at_optimal=0.4222225
      PathPoint P1: femur_r (0.01259517 -0.2977738 0.01691352)
      PathPoint P2: femur_r (0.03202773 -0.3928231 0.0008096898)
      PathPoint P3: patella_r (0.008937471 0.06312976 -0.02411699)
      PathPoint P4: patella_r (0.007093231 0.003504056 -0.01205849)
      PathPoint P5: tibia_r (0.03109663 -0.07242727 -0.006609252)
      PathWrap: wrap_object=KnExt_at_fem_r method=hybrid
    CoordinateActuator pelvis_tx_residual: coordinate=pelvis_tx optimal_force=5
    CoordinateActuator pelvis_ty_residual: coordinate=pelvis_ty optimal_force=5
    CoordinateActuator pelvis_tz_residual: coordinate=pelvis_tz optimal_force=5
    CoordinateActuator pelvis_tilt_residual: coordinate=pelvis_tilt optimal_force=2.5
    CoordinateActuator pelvis_list_residual: coordinate=pelvis_list optimal_force=2.5
    CoordinateActuator pelvis_rotation_residual: coordinate=pelvis_rotation optimal_force=2.5
    CoordinateActuator hip_flexion_r_reserve: coordinate=hip_flexion_r optimal_force=3
    CoordinateActuator hip_adduction_r_reserve: coordinate=hip_adduction_r optimal_force=2
    CoordinateActuator hip_rotation_r_reserve: coordinate=hip_rotation_r optimal_force=1
    CoordinateActuator knee_angle_r_reserve: coordinate=knee_angle_r optimal_force=3
    CoordinateActuator ankle_angle_r_reserve: coordinate=ankle_angle_r optimal_force=2
    CoordinateActuator hip_flexion_l_torque: coordinate=hip_flexion_l optimal_force=300
    CoordinateActuator hip_adduction_l_torque: coordinate=hip_adduction_l optimal_force=200
    CoordinateActuator hip_rotation_l_torque: coordinate=hip_rotation_l optimal_force=100
    CoordinateActuator knee_angle_l_torque: coordinate=knee_angle_l optimal_force=300
    CoordinateActuator ankle_angle_l_torque: coordinate=ankle_angle_l optimal_force=200
    CoordinateActuator lumbar_extension_torque: coordinate=lumbar_extension optimal_force=300
    CoordinateActuator lumbar_bending_torque: coordinate=lumbar_bending optimal_force=200
    CoordinateActuator lumbar_rotation_torque: coordinate=lumbar_rotation optimal_force=100
  MarkerSet:
    Marker RASI: pelvis (0.01113786 -0.004533234 0.1260812) fixed=true
    Marker LASI: pelvis (0.01113786 -0.004533232 -0.1260816) fixed=true
    Marker RPSI: pelvis (-0.1666271 0.02633487 0.05068303) fixed=true
    Marker LPSI: pelvis (-0.1666266 0.02633485 -0.05068298) fixed=true
    Marker RTHC: femur_r (-0.09780825 -0.3255561 0.0423415)
    Marker RTHL: femur_r (0.0281307 -0.2468466 0.08931321)
    Marker RTHR: femur_r (0.07299223 -0.3243769 -0.03181185)
    Marker RSHR: tibia_r (-0.008638754 -0.2465376 0.01632279)
    Marker RSHL: tibia_r (-0.1393898 -0.04468625 0.0668591)
    Marker RCAL: calcn_r (-0.03106686 0.01488022 -0.00727396) fixed=true
    Marker LTHC: femur_l (0.008751697 -0.183562 -0.1203095)
    Marker LTHL: femur_l (0.07969553 -0.2904372 -0.05275767)
    Marker LTHR: femur_l (-0.1045843 -0.2978123 -0.05175187)
    Marker LSHR: tibia_l (-0.08293306 -0.3022918 0.003597811)
    Marker LSHL: tibia_l (0.009746475 -0.2884276 -0.03753331)
    Marker LCAL: calcn_l (-0.03174776 0.01541639 0.007238508) fixed=true
    Marker RGTR: femur_r (-0.0211643 -0.04507706 0.06797562) fixed=true
    Marker RKNE: femur_r (0.008942682 -0.5572955 0.04810299) fixed=true
    Marker RMKNE: femur_r (0.008942685 -0.5778511 -0.04944384) fixed=true
    Marker RSHC: tibia_r (-0.1056185 -0.2710835 0.003822285)
    Marker RANK: tibia_r (-0.004875785 -0.4260977 0.04723163) fixed=true
    Marker RMANK: tibia_r (0.005519621 -0.4283759 -0.0410556) fixed=true
    Marker RMT1: toes_r (0.005445094 0.09181474 -0.06439929)
    Marker RMT5: toes_r (-0.006019587 0.0825825 0.05865394)
    Marker LGTR: femur_l (-0.02113246 -0.04154318 -0.06787349) fixed=true
    Marker LKNE: femur_l (0.008929244 -0.5136054 -0.04803067) fixed=true
    Marker LMKNE: femur_l (0.008929244 -0.5325501 0.0493695) fixed=true
    Marker LSHC: tibia_l (-0.1166922 -0.08025038 -0.06231951)
    Marker LANK: tibia_l (-0.004852022 -0.4410778 -0.04700139) fixed=true
    Marker LMANK: tibia_l (0.005492721 -0.4434366 0.04085554) fixed=true
    Marker LMT1: toes_l (0.02143145 0.05181709 0.02346735)
    Marker LMT5: toes_l (-0.03577378 0.04383807 -0.08800038)
    Marker C7: torso (-0.1178002 0.5727529 0) fixed=true
    Marker STRN: torso (0.1498908 0.4646658 0.001227512) fixed=true
    Marker LSHO: torso (-0.0005763814 0.5866868 -0.1597161) fixed=true
  ComponentSet:
    ExternalLoads: datafile=squats_1_grf.mot
      ExternalForce RightGRF: applied_to_body=calcn_r force_expressed_in_body=ground point_expressed_in_body=ground
          force_identifier=ground_force_right_v point_identifier=ground_force_right_p
          torque_identifier=ground_force_right_m data_source_name=squats_1_grf
      ExternalForce LeftGRF: applied_to_body=calcn_l force_expressed_in_body=ground point_expressed_in_body=ground
          force_identifier=ground_force_left_v point_identifier=ground_force_left_p
          torque_identifier=ground_force_left_m data_source_name=squats_1_grf
