# OpenSim document version 40600
Model AB11_complex:
  gravity: 0 -9.80665 0
  length_units: meters
  force_units: N
  credits:
    Rajagopal2016 LaiArnold2017 Model w/ updated wrapping surfaces, modified for movements involving high hip flexion
  publications:
    Catelli, DS; Wesseling, M; Jonkers, I; Lamontagne, M. A Musculoskeletal Model Customized for Squatting Task. Computer Methods in Biomechanics and Biomedical Engineering, in press (2018)
  Ground
  BodySet:
    Body pelvis: mass=10.17671 [kg] mass_center=(-0.08817849 0 0) inertia=(0.1095033 0.1095033 0.0598198 0 0 0)
        meshes=(r_pelvis.vtp l_pelvis.vtp sacrum.vtp)
      WrapCylinder Gmax1_at_pelvis_r: xyz_body_rotation=(-0.6 0.45 0.5) translation=(-0.07608045 -0.07429374 0.1005124)
          quadrant=-x radius=0.04350067 length=0.1325835
      WrapEllipsoid Gmax2_at_pelvis_r: xyz_body_rotation=(-0.5 0.39 0) translation=(-0.07233879 -0.04122104 0.1005124)
          quadrant=all dimensions=(0.08206033 0.06681296 0.1107821)
      WrapCylinder Gmax3_at_pelvis_r: xyz_body_rotation=(-0.1 0 0) translation=(-0.1035193 -0.08435934 0.07594269)
          quadrant=all radius=0.04415109 length=0.1115338
      WrapCylinder Post_at_pelvis_r: xyz_body_rotation=(-0.1 0 0) translation=(-0.07483323 -0.06710402 0.07594269)
          quadrant=all radius=0.04415109 length=0.1338406
      WrapCylinder Gmed_at_pelvis_r: xyz_body_rotation=(-1 0.6 0.7) translation=(-0.03741662 -0.05272459 0.1116804)
          quadrant=-x radius=0.04499245 length=0.1634386
      WrapCylinder Gmax1_at_pelvis_l: xyz_body_rotation=(0.6 -0.45 0.5)
          translation=(-0.07608045 -0.07429374 -0.1005124) quadrant=-x radius=0.04350067 length=0.1325835
      WrapEllipsoid Gmax2_at_pelvis_l: xyz_body_rotation=(0.5 -0.39 0) translation=(-0.07233879 -0.04122104 -0.1005124)
          quadrant=all dimensions=(0.08206033 0.06681296 0.1107821)
      WrapCylinder Gmax3_at_pelvis_l: xyz_body_rotation=(0.1 0 0) translation=(-0.1035193 -0.08435934 -0.07594269)
          quadrant=all radius=0.04415109 length=0.1115338
      WrapCylinder Post_at_pelvis_l: xyz_body_rotation=(0.1 0 0) translation=(-0.07483323 -0.06710402 -0.07594269)
          quadrant=all radius=0.04415109 length=0.1338406
      WrapCylinder Gmed_at_pelvis_l: xyz_body_rotation=(1 -0.6 0.7) translation=(-0.03741662 -0.05272459 -0.1116804)
          quadrant=-x radius=0.04499245 length=0.1634386
      WrapCylinder PS_at_brim_r: xyz_body_rotation=(-0.25 -0.27 0.1) translation=(-0.09229432 -0.05751773 0.07326236)
          quadrant=-y radius=0.0551995 length=0.1118268
      WrapCylinder PS_at_brim_l: xyz_body_rotation=(0.25 0.27 0.1) translation=(-0.09229432 -0.05751773 -0.07326236)
          quadrant=-y radius=0.0551995 length=0.1118268
      WrapCylinder IL_at_brim_r: xyz_body_rotation=(-0.32 -0.24 0.9) translation=(-0.08855266 -0.06231087 0.0844304)
          quadrant=-y radius=0.06119022 length=0.1110866
      WrapCylinder IL_at_brim_l: xyz_body_rotation=(0.32 0.24 0.9) translation=(-0.08855266 -0.06231087 -0.0844304)
          quadrant=-y radius=0.06119022 length=0.1110866
    Body femur_r: mass=8.0375 mass_center=(0 -0.1956314 0) inertia=(0.156179 0.04607202 0.156179 0 0 0)
        meshes=r_femur.vtp
      WrapCylinder GasLat_at_condyles_r: translation=(0.006162383 -0.4718169 0) quadrant=all radius=0.03098225
          length=0.1232477
      WrapCylinder GasMed_at_condyles_r: translation=(0.006162383 -0.4718169 0) quadrant=all radius=0.02979062
          length=0.1232477
      WrapCylinder KnExt_at_fem_r: xyz_body_rotation=(-0.0623366 0.0507601 0)
          translation=(-0.002341706 -0.4634531 0.002577244) quadrant=all radius=0.03575366 length=0.1232171
      WrapCylinder KnExtVL_at_fem_r: xyz_body_rotation=(-0.0623366 0.0507601 0)
          translation=(-0.004929907 -0.4634531 0.002577244) quadrant=all radius=0.03575366 length=0.1232171
      WrapCylinder AB_at_femshaft_r: xyz_body_rotation=(1.66157 0.186644 0)
          translation=(0.01804765 -0.1295713 0.02879682) quadrant=all radius=0.02030823 length=0.08080464
      WrapCylinder AL_at_femshaft_r: xyz_body_rotation=(1.77711 0.136489 0)
          translation=(0.03787734 -0.2668746 0.01862728) quadrant=all radius=0.02472533 length=0.1155813
      WrapCylinder AMprox_at_femshaft_r: xyz_body_rotation=(1.61126 0.18656 0)
          translation=(0.006387914 -0.08388537 0.03130861) quadrant=all radius=0.02597524 length=0.08076693
      WrapCylinder AMmid_at_femshaft_r: xyz_body_rotation=(1.61139 0.13656 0)
          translation=(0.02836237 -0.1849419 0.02536955) quadrant=all radius=0.02635796 length=0.1382972
      WrapCylinder AMdist_at_femshaft_r: xyz_body_rotation=(1.71188 0.186636 0)
          translation=(0.03895427 -0.300048 0.01154165) quadrant=all radius=0.02682186 length=0.2310585
      WrapCylinder AMisch_at_condyles_r: xyz_body_rotation=(1.71115 -0.463363 0)
          translation=(-0.02791695 -0.4336469 -0.003887688) quadrant=all radius=0.04895672 length=0.2805258
      WrapCylinder PECT_at_femshaft_r: xyz_body_rotation=(1.81295 0.276344 0)
          translation=(0.00750052 -0.09724366 0.03751721) quadrant=all radius=0.01841136 length=0.05807618
      WrapCylinder Flex_at_femhead_r: translation=(-0.006162383 0 0.01232477) quadrant=all radius=0.028599
          length=0.0739486
    Body tibia_r: mass=3.203715 mass_center=(0 -0.1760018 0) inertia=(0.03868249 0.003874686 0.03868249 0 0 0)
        meshes=(r_tibia.vtp r_fibula.vtp)
      WrapCylinder GasLat_at_shank_r: xyz_body_rotation=(2.96723 -0.279725 -1.47812)
          translation=(-0.006938707 -0.06975967 -0.003094288) quadrant=-y radius=0.05170611 length=0.09378034
      WrapCylinder GasMed_at_shank_r: xyz_body_rotation=(2.96723 0.0279725 -1.47812)
          translation=(-0.006938707 -0.06975967 -0.003094288) quadrant=-y radius=0.05546621 length=0.09378149
      WrapCylinder GR_at_condyles_r: xyz_body_rotation=(0 -0.4 0) translation=(-0.002812989 -0.01885396 0) quadrant=all
          radius=0.0338465 length=0.09376631
      WrapCylinder SM_at_condyles_r: xyz_body_rotation=(0 -0.1 0) translation=(-0.0009376631 -0.01885396 0)
          quadrant=all radius=0.03243623 length=0.09376631
      WrapCylinder ST_at_condyles_r: xyz_body_rotation=(0 -0.2 0) translation=(-0.001875326 -0.01932531 0) quadrant=all
          radius=0.03995768 length=0.09376631
      WrapCylinder BF140_at_gastroc_r: translation=(-0.03656886 -0.05656189 0) quadrant=y radius=0.02726524
          length=0.1406495
    Body patella_r: mass=0.07448691 mass_center=(0.002071391 0.03038041 0)
        inertia=(3.284233e-6 1.500219e-5 1.500219e-5 0 0 0) meshes=r_patella.vtp
    Body talus_r: mass=0.08641172 mass_center=(0 0 0) inertia=(0.000763822 0.0007617822 0.0007617822 0 0 0)
        meshes=r_talus.vtp
    Body calcn_r: mass=1.080147 mass_center=(0.09940661 0.02407379 0)
        inertia=(0.0009102709 0.003187592 0.003187592 0 0 0) meshes=r_foot.vtp
    Body toes_r: mass=0.1871678 mass_center=(0.03439469 0.004814757 -0.0164091)
        inertia=(6.501935e-5 0.0001605936 0.0001605936 0 0 0) meshes=r_bofoot.vtp
    Body femur_l: mass=8.0375 mass_center=(0 -0.2000387 0) inertia=(0.1599156 0.04141212 0.1599156 0 0 0)
        meshes=l_femur.vtp
      WrapCylinder GasLat_at_condyles_l: translation=(0.005842435 -0.4824462 0) quadrant=all radius=0.0304874
          length=0.1168487
      WrapCylinder Flex_at_femhead_r: translation=(-0.005842435 0 0.01168487) quadrant=all radius=0.02814222
          length=0.07010922
      WrapCylinder GasMed_at_condyles_l: translation=(0.005842435 -0.4824462 0) quadrant=all radius=0.02931481
          length=0.1168487
      WrapCylinder KnExt_at_fem_l: xyz_body_rotation=(0.0623366 -0.0507601 0)
          translation=(-0.002220125 -0.4738939 -0.002443435) quadrant=all radius=0.0351773 length=0.1168519
      WrapCylinder KnExtVL_at_fem_l: xyz_body_rotation=(0.0623366 -0.0507601 0)
          translation=(-0.004673948 -0.4738939 -0.002443435) quadrant=all radius=0.0351773 length=0.1168519
      WrapCylinder AB_at_femshaft_l: xyz_body_rotation=(-1.66157 -0.186644 0)
          translation=(0.01711062 -0.1324903 -0.0273017) quadrant=all radius=0.01928291 length=0.08234459
      WrapCylinder AL_at_femshaft_l: xyz_body_rotation=(-1.77711 -0.136489 0)
          translation=(0.03591076 -0.2728869 -0.01766016) quadrant=all radius=0.02349153 length=0.1176209
      WrapCylinder AMprox_at_femshaft_l: xyz_body_rotation=(-1.61126 -0.18656 0)
          translation=(0.006056256 -0.08577517 -0.02968307) quadrant=all radius=0.0246582 length=0.08234825
      WrapCylinder AMmid_at_femshaft_l: xyz_body_rotation=(-1.61139 -0.13656 0)
          translation=(0.02688981 -0.1891083 -0.02405237) quadrant=all radius=0.0250074 length=0.141184
      WrapCylinder AMdist_at_femshaft_l: xyz_body_rotation=(-1.71188 -0.186636 0)
          translation=(0.03693178 -0.3068075 -0.01094241) quadrant=all radius=0.02547782 length=0.235252
      WrapCylinder AMisch_at_condyles_l: xyz_body_rotation=(-1.71115 0.463363 0)
          translation=(-0.02646751 -0.4434163 0.00368584) quadrant=all radius=0.04677496 length=0.2819841
      WrapCylinder PECT_at_femshaft_l: xyz_body_rotation=(-1.81295 -0.276344 0)
          translation=(0.007111096 -0.09943439 -0.03556933) quadrant=all radius=0.01753519 length=0.05878265
      WrapCylinder Flex_at_femhead_l: translation=(-0.005842435 0 -0.01168487) quadrant=all radius=0.02814222
          length=0.07010922
    Body tibia_l: mass=3.203715 mass_center=(0 -0.1734236 0) inertia=(0.03766779 0.003982539 0.03766779 0 0 0)
        meshes=(l_tibia.vtp l_fibula.vtp)
      WrapCylinder GasLat_at_shank_l: xyz_body_rotation=(-2.96723 0.279725 -1.47812)
          translation=(-0.007034615 -0.0687378 0.003137058) quadrant=-y radius=0.05170366 length=0.09500261
      WrapCylinder GasMed_at_shank_l: xyz_body_rotation=(-2.96723 -0.0279725 -1.47812)
          translation=(-0.007034615 -0.0687378 0.003137058) quadrant=-y radius=0.05546524 length=0.09499773
      WrapCylinder GR_at_condyles_l: xyz_body_rotation=(0 0.4 0) translation=(-0.002851871 -0.01857778 0) quadrant=all
          radius=0.03383123 length=0.09506237
      WrapCylinder SM_at_condyles_l: xyz_body_rotation=(0 0.1 0) translation=(-0.0009506237 -0.01857778 0) quadrant=all
          radius=0.0324216 length=0.09506237
      WrapCylinder ST_at_condyles_l: xyz_body_rotation=(0 0.2 0) translation=(-0.001901247 -0.01904223 0) quadrant=all
          radius=0.03993965 length=0.09506237
      WrapCylinder BF140_at_gastroc_l: translation=(-0.03707432 -0.05573335 0) quadrant=all radius=0.02725294
          length=0.1425935
    Body patella_l: mass=0.07448691 mass_center=(0.002118056 0.03106483 0)
        inertia=(3.433876e-6 1.568575e-5 1.568575e-5 0 0 0) meshes=l_patella.vtp
    Body talus_l: mass=0.08641172 mass_center=(0 0 0) inertia=(0.0007630363 0.0007719632 0.0007719632 0 0 0)
        meshes=l_talus.vtp
    Body calcn_l: mass=1.080147 mass_center=(0.09763279 0.02514109 0)
        inertia=(0.0009637674 0.003117693 0.003117693 0 0 0) meshes=l_foot.vtp
    Body toes_l: mass=0.1871678 mass_center=(0.03378095 0.005028219 0.01663591)
        inertia=(6.884053e-5 0.0001579738 0.0001579738 0 0 0) meshes=l_bofoot.vtp
    Body torso: mass=29.58444 mass_center=(-0.0219908 0.2563864 0) inertia=(0.8755967 0.5344461 0.8755967 0 0 0)
        meshes=(hat_spine.vtp hat_jaw.vtp hat_skull.vtp hat_ribs_scap.vtp)
  JointSet:
    CustomJoint ground_pelvis: socket_parent_frame=ground_offset socket_child_frame=pelvis_offset
      Coordinate pelvis_tilt: default_value=0 range=(-1.570796 1.570796) clamped=true
      Coordinate pelvis_list: default_value=0 range=(-1.570796 1.570796) clamped=true
      Coordinate pelvis_rotation: default_value=0 range=(-3.141593 3.141593) clamped=true
      Coordinate pelvis_tx: default_value=0 range=(-5 5) clamped=true
      Coordinate pelvis_ty: default_value=0.93 range=(-1 2) clamped=true
      Coordinate pelvis_tz: default_value=0 range=(-10 10) clamped=true
      PhysicalOffsetFrame ground_offset: socket_parent=/ground translation=(0 0 0) [meters]
      PhysicalOffsetFrame pelvis_offset: socket_parent=/bodyset/pelvis translation=(0 0 0)
      SpatialTransform:
        TransformAxis rotation1: coordinates=pelvis_tilt axis=(0 0 1) LinearFunction(coefficients=1 0)
        TransformAxis rotation2: coordinates=pelvis_list axis=(1 0 0) LinearFunction(coefficients=1 0)
        TransformAxis rotation3: coordinates=pelvis_rotation axis=(0 1 0) LinearFunction(coefficients=1 0)
        TransformAxis translation1: coordinates=pelvis_tx axis=(1 0 0) LinearFunction(coefficients=1 0)
        TransformAxis translation2: coordinates=pelvis_ty axis=(0 1 0) LinearFunction(coefficients=1 0)
        TransformAxis translation3: coordinates=pelvis_tz axis=(0 0 1) LinearFunction(coefficients=1 0)
    CustomJoint hip_r: socket_parent_frame=pelvis_offset socket_child_frame=femur_r_offset
      Coordinate hip_flexion_r: default_value=2.332052e-9 range=(-0.5235988 2.40855) clamped=true
      Coordinate hip_adduction_r: default_value=-1.199293e-9 range=(-0.8726646 0.5235988) clamped=true
      Coordinate hip_rotation_r: default_value=0 range=(-0.6981317 0.6981317) clamped=true
      PhysicalOffsetFrame pelvis_offset: socket_parent=/bodyset/pelvis translation=(-0.07018858 -0.07524278 0.08628429)
      PhysicalOffsetFrame femur_r_offset: socket_parent=/bodyset/femur_r translation=(0 0 0)
      SpatialTransform: axes_held_at_zero=(translation1 translation2 translation3)
        TransformAxis rotation1: coordinates=hip_flexion_r axis=(0 0 1) LinearFunction(coefficients=1 0)
        TransformAxis rotation2: coordinates=hip_adduction_r axis=(1 0 0) LinearFunction(coefficients=1 0)
        TransformAxis rotation3: coordinates=hip_rotation_r axis=(0 1 0) LinearFunction(coefficients=1 0)
    CustomJoint walker_knee_r: socket_parent_frame=femur_r_offset socket_child_frame=tibia_r_offset
      Coordinate knee_angle_r: default_value=4.877666e-5 range=(0 2.53073) clamped=true
      PhysicalOffsetFrame femur_r_offset: socket_parent=/bodyset/femur_r
          translation=(-0.005546145 -0.4713566 -0.002156834) orientation=(-1.64157 1.44618 1.5708) [radians]
      PhysicalOffsetFrame tibia_r_offset: socket_parent=/bodyset/tibia_r
          translation=(-0.007585263 -0.00333225 -0.001392186) orientation=(-1.64157 1.44618 1.5708)
      SpatialTransform:
        TransformAxis rotation1: coordinates=knee_angle_r axis=(1 0 0) LinearFunction(coefficients=1 0)
        TransformAxis rotation2: coordinates=knee_angle_r axis=(0 0 1)
          SimmSpline: x=(0 0.174533 0.349066 0.523599 0.698132 0.872665 1.0472 1.22173 1.39626 1.5708 1.74533 1.91986 2.0944)
              y=(0 0.0126809 0.0226969 0.0296054 0.0332049 0.0335354 0.0308779 0.0257548 0.0189295 0.011407 0.00443314 -0.00050475 -0.0016782)
        TransformAxis rotation3: coordinates=knee_angle_r axis=(0 1 0)
          SimmSpline: x=(0 0.174533 0.349066 0.523599 0.698132 0.872665 1.0472 1.22173 1.39626 1.5708 1.74533 1.91986 2.0944)
              y=(0 0.059461 0.109399 0.150618 0.18392 0.210107 0.229983 0.24435 0.254012 0.25977 0.262428 0.262788 0.261654)
        TransformAxis translation1: coordinates=knee_angle_r axis=(1 0 0)
          MultiplierFunction: scale=1.232477
            SimmSpline: x=(0 0.174533 0.349066 0.523599 0.698132 0.872665 1.0472 1.22173 1.39626 1.5708 1.74533 1.91986 2.0944)
                y=(0 5.3e-5 0.000188 0.000378 0.000597 0.000825 0.001045 0.001247 0.00142 0.001558 0.001661 0.001728 0.00176)
        TransformAxis translation2: coordinates=knee_angle_r axis=(0 1 0)
          MultiplierFunction: scale=1.150773
            SimmSpline: x=(0 0.174533 0.349066 0.523599 0.698132 0.872665 1.0472 1.22173 1.39626 1.5708 1.74533 1.91986 2.0944)
                y=(0 0.000301 0.000143 -0.000401 -0.001233 -0.002243 -0.003316 -0.004346 -0.005239 -0.005924 -0.006361 -0.006539 -0.00648)
        TransformAxis translation3: coordinates=knee_angle_r axis=(0 0 1)
          MultiplierFunction: scale=1.232477
            SimmSpline: x=(0 0.174533 0.349066 0.523599 0.698132 0.872665 1.0472 1.22173 1.39626 1.5708 1.74533 1.91986 2.0944)
                y=(0 0.001055 0.002061 0.00289 0.003447 0.003676 0.003559 0.00311 0.002373 0.001418 0.000329 -0.000805 -0.001898)
    CustomJoint patellofemoral_r: socket_parent_frame=femur_r_offset socket_child_frame=patella_r_offset
      Coordinate knee_angle_r_beta: default_value=4.877666e-5 range=(-99999.9 99999.9) clamped=false
      PhysicalOffsetFrame femur_r_offset: socket_parent=/bodyset/femur_r
          translation=(-0.009970736 -0.4694694 -0.003389311)
      PhysicalOffsetFrame patella_r_offset: socket_parent=/bodyset/patella_r translation=(0 0 0)
      SpatialTransform: axes_held_at_zero=(rotation2 rotation3)
        TransformAxis rotation1: coordinates=knee_angle_r_beta axis=(0 0 1)
          SimmSpline: x=(0 0.174533 0.349066 0.523599 0.698132 0.872665 1.0472 1.22173 1.39626 1.5708 1.74533 1.91986 2.0944)
              y=(0.00113686 -0.00629212 -0.105582 -0.253683 -0.414245 -0.579047 -0.747244 -0.91799 -1.09044 -1.26379 -1.43763 -1.61186 -1.78634)
        TransformAxis translation1: coordinates=knee_angle_r_beta axis=(1 0 0)
          MultiplierFunction: scale=1.232477
            SimmSpline: x=(0 0.174533 0.349066 0.523599 0.698132 0.872665 1.0472 1.22173 1.39626 1.5708 1.74533 1.91986 2.0944)
                y=(0.0524 0.0488 0.0437 0.0371 0.0296 0.0216 0.0136 0.0057 -0.0019 -0.0088 -0.0148 -0.0196 -0.0227)
        TransformAxis translation2: coordinates=knee_angle_r_beta axis=(0 1 0)
          MultiplierFunction: scale=1.150773
            SimmSpline: x=(0 0.174533 0.349066 0.523599 0.698132 0.872665 1.0472 1.22173 1.39626 1.5708 1.74533 1.91986 2.0944)
                y=(-0.0108 -0.019 -0.0263 -0.0322 -0.0367 -0.0395 -0.0408 -0.0404 -0.0384 -0.0349 -0.0301 -0.0245 -0.0187)
        TransformAxis translation3: axis=(0 0 1) MultiplierFunction(scale=1.232477, Constant(value=0.00275))
    PinJoint ankle_r: socket_parent_frame=tibia_r_offset socket_child_frame=talus_r_offset
      Coordinate ankle_angle_r: default_value=-1.182866e-9 range=(-0.6981317 0.6981317) clamped=true
      PhysicalOffsetFrame tibia_r_offset: socket_parent=/bodyset/tibia_r translation=(-0.009376631 -0.3770793 0)
          orientation=(0.175895 -0.105208 0.0186622)
      PhysicalOffsetFrame talus_r_offset: socket_parent=/bodyset/talus_r translation=(0 0 0)
          orientation=(0.175895 -0.105208 0.0186622)
    CustomJoint hip_l: socket_parent_frame=pelvis_offset socket_child_frame=femur_l_offset
      Coordinate hip_flexion_l: default_value=2.332052e-9 range=(-0.5235988 2.40855) clamped=true
      Coordinate hip_adduction_l: default_value=-1.199293e-9 range=(-0.8726646 0.5235988) clamped=true
      Coordinate hip_rotation_l: default_value=0 range=(-0.6981317 0.6981317) clamped=true
      PhysicalOffsetFrame pelvis_offset: socket_parent=/bodyset/pelvis
          translation=(-0.07018858 -0.07524278 -0.08628429)
      PhysicalOffsetFrame femur_l_offset: socket_parent=/bodyset/femur_l translation=(0 0 0)
      SpatialTransform: axes_held_at_zero=(translation1 translation2 translation3)
        TransformAxis rotation1: coordinates=hip_flexion_l axis=(0 0 1) LinearFunction(coefficients=1 0)
        TransformAxis rotation2: coordinates=hip_adduction_l axis=(1 0 0) LinearFunction(coefficients=-1 0)
        TransformAxis rotation3: coordinates=hip_rotation_l axis=(0 1 0) LinearFunction(coefficients=-1 0)
    CustomJoint walker_knee_l: socket_parent_frame=femur_l_offset socket_child_frame=tibia_l_offset
      Coordinate knee_angle_l: default_value=4.877992e-5 range=(0 2.53073) clamped=true
      PhysicalOffsetFrame femur_l_offset: socket_parent=/bodyset/femur_l
          translation=(-0.005258191 -0.4819755 0.002044852) orientation=(1.64157 -1.44618 1.5708)
      PhysicalOffsetFrame tibia_l_offset: socket_parent=/bodyset/tibia_l
          translation=(-0.007690108 -0.003283438 0.001411429) orientation=(1.64157 -1.44618 1.5708)
      SpatialTransform:
        TransformAxis rotation1: coordinates=knee_angle_l axis=(-1 0 0) LinearFunction(coefficients=1 0)
        TransformAxis rotation2: coordinates=knee_angle_l axis=(0 0 1)
          SimmSpline: x=(0 0.174533 0.349066 0.523599 0.698132 0.872665 1.0472 1.22173 1.39626 1.5708 1.74533 1.91986 2.0944)
              y=(0 0.0126809 0.0226969 0.0296054 0.0332049 0.0335354 0.0308779 0.0257548 0.0189295 0.011407 0.00443314 -0.00050475 -0.0016782)
        TransformAxis rotation3: coordinates=knee_angle_l axis=(0 1 0)
          SimmSpline: x=(0 0.174533 0.349066 0.523599 0.698132 0.872665 1.0472 1.22173 1.39626 1.5708 1.74533 1.91986 2.0944)
              y=(0 -0.059461 -0.109399 -0.150618 -0.18392 -0.210107 -0.229983 -0.24435 -0.254012 -0.25977 -0.262428 -0.262788 -0.261654)
        TransformAxis translation1: coordinates=knee_angle_l axis=(1 0 0)
          MultiplierFunction: scale=1.168487
            SimmSpline: x=(0 0.174533 0.349066 0.523599 0.698132 0.872665 1.0472 1.22173 1.39626 1.5708 1.74533 1.91986 2.0944)
                y=(0 5.3e-5 0.000188 0.000378 0.000597 0.000825 0.001045 0.001247 0.00142 0.001558 0.001661 0.001728 0.00176)
        TransformAxis translation2: coordinates=knee_angle_l axis=(0 1 0)
          MultiplierFunction: scale=1.176698
            SimmSpline: x=(0 0.174533 0.349066 0.523599 0.698132 0.872665 1.0472 1.22173 1.39626 1.5708 1.74533 1.91986 2.0944)
                y=(0 0.000301 0.000143 -0.000401 -0.001233 -0.002243 -0.003316 -0.004346 -0.005239 -0.005924 -0.006361 -0.006539 -0.00648)
        TransformAxis translation3: coordinates=knee_angle_l axis=(0 0 1)
          MultiplierFunction: scale=1.168487
            SimmSpline: x=(0 0.174533 0.349066 0.523599 0.698132 0.872665 1.0472 1.22173 1.39626 1.5708 1.74533 1.91986 2.0944)
                y=(0 -0.001055 -0.002061 -0.00289 -0.003447 -0.003676 -0.003559 -0.00311 -0.002373 -0.001418 -0.000329 0.000805 0.001898)
    CustomJoint patellofemoral_l: socket_parent_frame=femur_l_offset socket_child_frame=patella_l_offset
      Coordinate knee_angle_l_beta: default_value=4.877992e-5 range=(-99999.9 99999.9) clamped=false
      PhysicalOffsetFrame femur_l_offset: socket_parent=/bodyset/femur_l
          translation=(-0.009453059 -0.4800457 0.003213339)
      PhysicalOffsetFrame patella_l_offset: socket_parent=/bodyset/patella_l translation=(0 0 0)
      SpatialTransform: axes_held_at_zero=(rotation2 rotation3)
        TransformAxis rotation1: coordinates=knee_angle_l_beta axis=(0 0 1)
          SimmSpline: x=(0 0.174533 0.349066 0.523599 0.698132 0.872665 1.0472 1.22173 1.39626 1.5708 1.74533 1.91986 2.0944)
              y=(0.00113686 -0.00629212 -0.105582 -0.253683 -0.414245 -0.579047 -0.747244 -0.91799 -1.09044 -1.26379 -1.43763 -1.61186 -1.78634)
        TransformAxis translation1: coordinates=knee_angle_l_beta axis=(1 0 0)
          MultiplierFunction: scale=1.168487
            SimmSpline: x=(0 0.174533 0.349066 0.523599 0.698132 0.872665 1.0472 1.22173 1.39626 1.5708 1.74533 1.91986 2.0944)
                y=(0.0524 0.0488 0.0437 0.0371 0.0296 0.0216 0.0136 0.0057 -0.0019 -0.0088 -0.0148 -0.0196 -0.0227)
        TransformAxis translation2: coordinates=knee_angle_l_beta axis=(0 1 0)
          MultiplierFunction: scale=1.176698
            SimmSpline: x=(0 0.174533 0.349066 0.523599 0.698132 0.872665 1.0472 1.22173 1.39626 1.5708 1.74533 1.91986 2.0944)
                y=(-0.0108 -0.019 -0.0263 -0.0322 -0.0367 -0.0395 -0.0408 -0.0404 -0.0384 -0.0349 -0.0301 -0.0245 -0.0187)
        TransformAxis translation3: axis=(0 0 1) MultiplierFunction(scale=1.168487, Constant(value=-0.00275))
    PinJoint ankle_l: socket_parent_frame=tibia_l_offset socket_child_frame=talus_l_offset
      Coordinate ankle_angle_l: default_value=8.352658e-11 range=(-0.6981317 0.6981317) clamped=true
      PhysicalOffsetFrame tibia_l_offset: socket_parent=/bodyset/tibia_l translation=(-0.009506237 -0.3715557 0)
          orientation=(-0.175895 0.105208 0.0186622)
      PhysicalOffsetFrame talus_l_offset: socket_parent=/bodyset/talus_l translation=(0 0 0)
          orientation=(-0.175895 0.105208 0.0186622)
    CustomJoint back: socket_parent_frame=pelvis_offset socket_child_frame=torso_offset
      Coordinate lumbar_extension: default_value=0 range=(-1.570796 1.570796) clamped=true
      Coordinate lumbar_bending: default_value=0 range=(-1.570796 1.570796) clamped=true
      Coordinate lumbar_rotation: default_value=0 range=(-1.570796 1.570796) clamped=true
      PhysicalOffsetFrame pelvis_offset: socket_parent=/bodyset/pelvis translation=(-0.1255951 0.07812825 0)
      PhysicalOffsetFrame torso_offset: socket_parent=/bodyset/torso translation=(0 0 0)
      SpatialTransform: axes_held_at_zero=(translation1 translation2 translation3)
        TransformAxis rotation1: coordinates=lumbar_extension axis=(0 0 1) LinearFunction(coefficients=1 0)
        TransformAxis rotation2: coordinates=lumbar_bending axis=(1 0 0) LinearFunction(coefficients=1 0)
        TransformAxis rotation3: coordinates=lumbar_rotation axis=(0 1 0) LinearFunction(coefficients=1 0)
    WeldJoint mtp_r: socket_parent_frame=calcn_r_offset socket_child_frame=toes_r_offset
      PhysicalOffsetFrame calcn_r_offset: socket_parent=/bodyset/calcn_r
          translation=(0.177739 -0.001604919 0.001012676) orientation=(-3.14159 0.619901 0)
      PhysicalOffsetFrame toes_r_offset: socket_parent=/bodyset/toes_r translation=(0 0 0)
          orientation=(-3.14159 0.619901 0)
    WeldJoint mtp_l: socket_parent_frame=calcn_l_offset socket_child_frame=toes_l_offset
      PhysicalOffsetFrame calcn_l_offset: socket_parent=/bodyset/calcn_l
          translation=(0.1745674 -0.001676073 -0.001026674) orientation=(-3.14159 -0.619901 0)
      PhysicalOffsetFrame toes_l_offset: socket_parent=/bodyset/toes_l translation=(0 0 0)
          orientation=(-3.14159 -0.619901 0)
    WeldJoint subtalar_r: socket_parent_frame=talus_r_offset socket_child_frame=calcn_r_offset
      PhysicalOffsetFrame talus_r_offset: socket_parent=/bodyset/talus_r
          translation=(-0.04572983 -0.03954619 0.007426292) orientation=(-1.76819 0.906223 1.8196)
      PhysicalOffsetFrame calcn_r_offset: socket_parent=/bodyset/calcn_r translation=(0 0 0)
          orientation=(-1.76819 0.906223 1.8196)
    WeldJoint subtalar_l: socket_parent_frame=talus_l_offset socket_child_frame=calcn_l_offset
      PhysicalOffsetFrame talus_l_offset: socket_parent=/bodyset/talus_l
          translation=(-0.04636192 -0.0389669 -0.007528939) orientation=(1.76819 -0.906223 1.8196)
      PhysicalOffsetFrame calcn_l_offset: socket_parent=/bodyset/calcn_l translation=(0 0 0)
          orientation=(1.76819 -0.906223 1.8196)
  ConstraintSet:
    CoordinateCouplerConstraint patellofemoral_knee_angle_r_con: independent_coordinate_names=knee_angle_r
        dependent_coordinate_name=knee_angle_r_beta scale_factor=1
        coupled_coordinates_function=LinearFunction(coefficients=1 0)
    CoordinateCouplerConstraint patellofemoral_knee_angle_l_con: independent_coordinate_names=knee_angle_l
        dependent_coordinate_name=knee_angle_l_beta scale_factor=1
        coupled_coordinates_function=LinearFunction(coefficients=1 0)
  MarkerSet:
    Marker RASI: pelvis (0.01273213 -0.005111057 0.1265291) fixed=true
    Marker LASI: pelvis (0.01273213 -0.005111054 -0.1265294) fixed=true
    Marker RPSI: pelvis (-0.190478 0.02969161 0.05086306) fixed=true
    Marker LPSI: pelvis (-0.1904775 0.02969158 -0.05086302) fixed=true
    Marker RTHC: femur_r (0.08790311 -0.3259728 -0.03239638)
    Marker RTHL: femur_r (0.02965377 -0.2176409 0.09735529)
    Marker RTHR: femur_r (-0.03871817 -0.2816277 0.07461111)
    Marker RSHR: tibia_r (-0.03466814 -0.1500486 0.07919651)
    Marker RSHL: tibia_r (-0.07358021 -0.2172249 0.01490163)
    Marker RCAL: calcn_r (-0.02957536 0.01507915 -0.00699673) fixed=true
    Marker LTHC: femur_l (-0.07082878 -0.2502338 -0.08738195)
    Marker LTHL: femur_l (0.07300004 -0.2981241 -0.03018684)
    Marker LTHR: femur_l (-0.1045314 -0.3383853 -0.001819641)
    Marker LSHR: tibia_l (-0.08347307 -0.1864611 0.01118555)
    Marker LSHL: tibia_l (0.01695339 -0.2063649 -0.03922634)
    Marker LCAL: calcn_l (-0.02904761 0.01574771 0.00709344) fixed=true
    Marker RGTR: femur_r (-0.02899389 -0.03656547 0.09312273) fixed=true
    Marker RKNE: femur_r (0.01225097 -0.4520652 0.06589836) fixed=true
    Marker RMKNE: femur_r (0.01225097 -0.4687394 -0.06773524) fixed=true
    Marker RSHC: tibia_r (0.03293701 -0.2127554 0.01267997)
    Marker RANK: tibia_r (-0.004689956 -0.3525591 0.0454315) fixed=true
    Marker RMANK: tibia_r (0.005309253 -0.3544441 -0.03949086) fixed=true
    Marker RMT1: toes_r (0.01528048 0.06499334 -0.02444587)
    Marker RMT5: toes_r (-0.01073943 0.04419613 0.05318017)
    Marker LGTR: femur_l (-0.02748849 -0.03738923 -0.08828785) fixed=true
    Marker LKNE: femur_l (0.0116149 -0.4622493 -0.06247689) fixed=true
    Marker LMKNE: femur_l (0.0116149 -0.4792997 0.06421841) fixed=true
    Marker LSHC: tibia_l (-0.07075121 -0.08795826 -0.07067818)
    Marker LANK: tibia_l (-0.004754782 -0.3473943 -0.04605943) fixed=true
    Marker LMANK: tibia_l (0.00538264 -0.3492521 0.04003675) fixed=true
    Marker LMT1: toes_l (0.02250637 0.05960069 0.008886441)
    Marker LMT5: toes_l (-0.02413698 0.04204533 -0.06615033)
    Marker C7: torso (-0.05918926 0.3325973 0) fixed=true
    Marker STRN: torso (0.07531336 0.2698311 0.001231873) fixed=true
    Marker LSHO: torso (-0.0002896055 0.3406887 -0.1602834) fixed=true
